Fri Oct 18 17:00:23 CEST 2019
;; PK-Pop model of sultiame with nonlinear distribution
;; Related article : Pharmacokinetic Profile of Sultiame in Healthy Volunteers with In Vitro Characterization of Its Uptake by Red Blood Cells
;; Kim Dao, Paul Thoueille, Laurent Arthur Decosterd, Thomas Mercier, Monia Guidi, Carine Bardinet, Sébastien Lebon, Eva Choong,
;; Arnaud Castang, Catherine Guittet, Luc-André Granier, Thierry Buclin
;; Under submission
;; Model author: Kim Dao
;; Date: 18.10.2019
;; NCOMP=4 which are 1= absorption site, 2= plasma, 3= erythrocytes, 4= urines

$PROBLEM PK
$INPUT ID TTT DAT1=DROP TIME DV UVOL AMT MDV EVID CMT WT AGE FLAG
TYPE
$DATA Real data.csv IGNORE=I IGNORE(FLAG.EQ.1)
$SUBROUTINE ADVAN13 TOL=3
$MODEL NCOMP=4
$PK
IF (AMT.GT.0) THEN
TDOS=TIME
TAD=0.0
ENDIF
IF (AMT.EQ.0) TAD=TIME-TDOS ; this is to calculate time after the dose

CL = THETA(1) * EXP(ETA(1)) ; clearance sultiame
V2 = THETA(2) ; volume of distribution of plasma (L)
V3 = THETA(3) ; volume of distribution of erythrocytes (L)
KON = THETA(4) ; association constant in h^-1· mg^-1
BTOT = THETA(5) ; maximal binding capacity in mg
KOFF = THETA(6) ; dissociation constant in h^-1
KA = THETA(7) ; absorption constant (h^-1) fixed to 1
KE = CL/V2 ; elimination constant
S2 = V2
S3 = V3
QREN = THETA(14) * EXP(ETA(2)) ; renal extraction fraction
S4 = UVOL/1000 ; conversion of units for volume of urines (L, in mL in dataset)

; differential equations according to model
$DES
DADT(1) = -KA * A(1) ; absorption compartment
DADT(2) = KA * A(1) - KE * A(2) - KON * A(2) * (BTOT - A(3)) + KOFF * A(3) ; plasma compartment
DADT(3) = KON * A(2) * (BTOT - A(3)) - KOFF * A(3) ; erythrocytes compartment
DADT(4) = KE * A(2) * QREN ; urine compartment

$ERROR
Q2=0
Q3=0
Q4=0

IF(CMT==2) THEN
Q2=1
IPRED2 = A(2)/S2
W2 = SQRT(THETA(8)**2*IPRED2**2 + THETA(9)**2)
Y2 = IPRED2 + W2*EPS(1)
IRES2 = DV-IPRED2
IWRES2 = IRES2/W2
ENDIF

IF(CMT==3) THEN
Q3=1
IPRED3 = A(3)/S3
W3 = SQRT(THETA(10)**2*IPRED3**2 + THETA(11)**2)
Y3 = IPRED3 + W3*EPS(1)
IRES3 = DV-IPRED3
IWRES3 = IRES3/W3
ENDIF

IF(CMT.EQ.4.AND.EVID.EQ.0) THEN
Q4=1
IPRED4 = A(4)/S4

W4 = SQRT(THETA(12)**2*IPRED4**2 + THETA(13)**2)
Y4 = IPRED4 + W4*EPS(1)
IRES4 = DV-IPRED4
IWRES4 = IRES4/W4
ENDIF

IPRED=Q2*IPRED2+Q3*IPRED3+Q4*IPRED4
Y=Y2*Q2+Q3*Y3+Y4*Q4
IRES=Q2*IRES2+Q3*IRES3+Q4*IRES4
IWRES=Q2*IWRES2+Q3*IWRES3+Q4*IWRES4

$THETA (0,9.9) ; Clearance
(0,56) ; V2 = Volume of distribution (plasma)
(0,3.3) ; V3 = Volume of distribution (erythrocytes)
6960 FIX ; Kon = association constant
(0,114) ; Btot = total binding capacity of the receptor
(0,6000) ; Koff = dissociation constant
(0,1.8) ; Ka = absorption constant
(0,0.70) ; Prop.RE (sd) plasma
0 FIX ; Add.RE (sd) plasma
(0,0.22) ; Prop.RE (sd) erythrocytes
0 FIX ; Add.RE (sd) erythrocytes
(0,0.39) ; Prop.RE (sd) urines
0 FIX ; Add.RE (sd) urines
(0,0.5,1) ; Qren = renal extraction ratio
$OMEGA 0.1 ; IIV CL
0.1 ; IIV Qren
$SIGMA 1 FIX ; Proportional error PK
$ESTIMATION METHOD=1 INTER MAXEVAL=9999 NOABORT SIGL=3 NSIG=1 PRINT=1
POSTHOC
$COVARIANCE
$TABLE ID TTT TIME TAD AMT DV UVOL MDV CMT WT AGE EVID IPRED
IWRES CWRES NPDE ONEHEADER NOPRINT FILE=sdtab
$TABLE ID TIME DV CMT AMT MDV EVID NOPRINT NOHEADER FILE=tab
$TABLE CL V2 V3 KA KE KON BTOT KOFF AGE WT FIRSTONLY ONEHEADER
NOPRINT FILE=patab

NM-TRAN MESSAGES
WARNINGS AND ERRORS (IF ANY) FOR PROBLEM 1
(WARNING 2) NM-TRAN INFERS THAT THE DATA ARE POPULATION.
(WARNING 3) THERE MAY BE AN ERROR IN THE ABBREVIATED CODE. THE FOLLOWING
ONE OR MORE RANDOM VARIABLES ARE DEFINED WITH "IF" STATEMENTS THAT DO NOT
PROVIDE DEFINITIONS FOR BOTH THE "THEN" AND "ELSE" CASES. IF ALL
CONDITIONS FAIL, THE VALUES OF THESE VARIABLES WILL BE ZERO.
IPRED2 W2 Y2 IRES2 IWRES2 IPRED3 W3 Y3 IRES3 IWRES3 IPRED4 W4 Y4 IRES4
IWRES4

1NONLINEAR MIXED EFFECTS MODEL PROGRAM (NONMEM) VERSION 7.4.2
ORIGINALLY DEVELOPED BY STUART BEAL, LEWIS SHEINER, AND ALISON BOECKMANN
CURRENT DEVELOPERS ARE ROBERT BAUER, ICON DEVELOPMENT SOLUTIONS,
AND ALISON BOECKMANN. IMPLEMENTATION, EFFICIENCY, AND STANDARDIZATION
PERFORMED BY NOUS INFOSYSTEMS.
PROBLEM NO.: 1
PK
TOT. NO. OF OBS RECS: 430
TOT. NO. OF INDIVIDUALS: 4
GENERAL NONLINEAR KINETICS MODEL WITH STIFF/NONSTIFF EQUATIONS (LSODA, ADVAN13)
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#TBLN: 1
#METH: First Order Conditional Estimation with Interaction
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
#TERM:
0MINIMIZATION TERMINATED
DUE TO ROUNDING ERRORS (ERROR=134)
NO. OF FUNCTION EVALUATIONS USED: 1626
NO. OF SIG. DIGITS UNREPORTABLE
0PARAMETER ESTIMATE IS NEAR ITS BOUNDARY

ETABAR IS THE ARITHMETIC MEAN OF THE ETA-ESTIMATES,
AND THE P-VALUE IS GIVEN FOR THE NULL HYPOTHESIS THAT THE TRUE MEAN IS 0.

ETABAR: -2.3436E-02 4.0500E+00
SE: 1.4310E-01 1.2760E-01
N: 4 4

P VAL.: 8.6991E-01 4.876E-221

ETASHRINKSD(%) 1.0000E-10 9.2935E+01
ETASHRINKVR(%) 1.0000E-10 9.9501E+01
EBVSHRINKSD(%) 1.2033E+00 2.4402E-02
EBVSHRINKVR(%) 2.3922E+00 4.8799E-02
EPSSHRINKSD(%) 1.0353E+00
EPSSHRINKVR(%) 2.0600E+00

TOTAL DATA POINTS NORMALLY DISTRIBUTED (N): 430
N*LOG(2PI) CONSTANT TO OBJECTIVE FUNCTION: 790.28713855601848
OBJECTIVE FUNCTION VALUE WITHOUT CONSTANT: -62.164834581362072
OBJECTIVE FUNCTION VALUE WITH CONSTANT: 728.12230397465646
REPORTED OBJECTIVE FUNCTION DOES NOT CONTAIN CONSTANT

TOTAL EFFECTIVE ETAS (NIND*NETA): 8

#TERE:
Elapsed estimation time in seconds: 181.78
Elapsed postprocess time in seconds: 2.45

******************** FIRST ORDER CONDITIONAL ESTIMATION WITH INTERACTION ********************
#OBJT:************** MINIMUM VALUE OF OBJECTIVE FUNCTION ********************
#OBJV:******************************************** -62.165 **************************************************

******************** FIRST ORDER CONDITIONAL ESTIMATION WITH INTERACTION ********************
******************** FINAL PARAMETER ESTIMATE ********************

THETA - VECTOR OF FIXED EFFECTS PARAMETERS *********
TH 1 TH 2 TH 3 TH 4 TH 5 TH 6 TH 7 TH 8 TH 9 TH10 TH11 TH12
TH13 TH14
1.02E+01 6.30E+01 3.28E+00 6.96E+03 1.12E+02 8.09E+03 1.89E+00 4.24E-01 0.00E+00 3.00E-01 1.92E-02 4.02E-01
0.00E+00 5.00E-03

OMEGA - COV MATRIX FOR RANDOM EFFECTS - ETAS ********
ETA1 ETA2
ETA1
+ 8.07E-02
ETA2
+ 0.00E+00 1.74E+01

SIGMA - COV MATRIX FOR RANDOM EFFECTS - EPSILONS ****
EPS1
EPS1
+ 1.00E+00

OMEGA - CORR MATRIX FOR RANDOM EFFECTS - ETAS *******
ETA1 ETA2
ETA1
+ 2.84E-01
ETA2
+ 0.00E+00 4.17E+00

SIGMA - CORR MATRIX FOR RANDOM EFFECTS - EPSILONS ***
EPS1
EPS1
+ 1.00E+00
Elapsed finaloutput time in seconds: 0.04
#CPUT: Total CPU Time in Seconds, 184.263
