Pauline Themans, Joseph J. Winkin, Flora T. Musuamba

Wed Sep 20 15:16:46 CEST 2017
;; 1. based on run1.mod
;; 2. Description: covariate model + WT on V2 + CPRED in pred3 ($TABLE)
;; x1. Author: user
$PROBLEM    MEROPENEM IV INFUSION 3COMP DESCRIPTION PLASMA AND ELF
;           CONCENTRATIONS FINAL COV MODEL

; ------------dataset------------
$INPUT      ID AGE WT GFRC GFR DV TIME MDV CMT AMT RATE SS II EVID GRP
; WT [kg], GFRC [0: poor hepatic function, 1: good hepatic function],
; GFR [mL/min], DV [mg/L], TIME [h], CMT [1: plasma conc., 2: ELF conc],
; AMT (DOSE) [g], RATE (K) [g/h], II (T) [h], GRP=AMT/RATE (delta) [h]

; CL [L/h], V1 V2 V3 [L], Q2 Q3 [L/h], S1 S2 [L]
$DATA      promessePK1.csv IGNORE=@

; ------------model------------
$SUBROUTINE ADVAN11 TRANS4
$PK
    ; parmacokinetic parameters
	TVCL=THETA(1)*((GFR/65)**THETA(2)) ; CENTRAL
	TVV1=THETA(3)*((WT/75)**THETA(4))
    TVQ2=THETA(5)                      ; ELF
	TVV2=THETA(6)*((WT/75)**THETA(9))
	TVQ3=THETA(7)                      ; PERIPHERAL
	TVV3=THETA(8)

	; interindividual variance model
	CL=TVCL*EXP(ETA(1))
	V1=TVV1*EXP(ETA(2))
	Q2=TVQ2
	V2=TVV2*EXP(ETA(3))
	Q3=TVQ3*EXP(ETA(4))
	V3=TVV3

	; scaling factor
	S1=V1/1000 ; dose [g] and conc. [mg/L]
	S2=V2/THETA(10)

$ERROR
; calcultate de result (i.e. model prediction)
	H1=0
	H2=0
	IF(CMT.EQ.1) H1=1
	IF(CMT.EQ.2) H2=1
	Y=H1*(F*(1+EPS(1))+EPS(2))+H2*(F*(1+EPS(3)))   ; +EPS(4)
	W=F

	IPRED=F ; prediction individuelle
	IRES=DV-IPRED ; (individual-specific residual)
	IWRES=IRES/W ;  (individual-specific weighted residual)


; Initial estimates
$THETA  (0,9.81355436018442) ; CL
$THETA  0.653109400662184    ; GFRCL
$THETA  (0,4.53480721643241) ; V1
$THETA  1.12475365584077     ; WTV1
$THETA  (0,11.7186301905937) ; Q2; ELF
$THETA  (0,9.69726252224871) ; V2
$THETA  (0,8.41511798967717) ; Q3; PERIPHERAL
$THETA  (0,10.8162112974179) ; V3
$THETA  0.805863122538834    ; WTV2
$THETA  231.229833848399     ; V2/S2
$OMEGA  BLOCK(4)
 0.19808195049767  ;      IIVCL
 0 0.195893036337555  ;      IIVV1
 0 0 0.184676645216004  ;      IIVV2
 0 0 0 0.181094660002612  ;      IIVQ3
$SIGMA  0.0198701414556805  ;   epsPROP1
 0.203004721167207  ;    epsADD1
 0.501989282726501  ;   epsPROP2
$ESTIMATION METHOD=1 INTER MAXEVAL=9999 SIGDIGITS=3 POSTHOC PRINT=5 ; PRINT=1 ;

; precision des estimation? standard error of estimates & matrice de correlation
$COVARIANCE PRINT=E

$TABLE      ID AGE WT GFRC GFR TIME MDV CMT RATE PRED CPRED RES WRES
            IPRED IRES IWRES CWRES EVID NOPRINT FILE=pred3 ; population and individual predictions and residuals
$TABLE      ID AGE WT GFRC GFR CL V1 Q2 V2 Q3 V3 ETA(1) ETA(2) ETA(3)
            ETA(4) TVCL TVV1 TVQ2 TVV2 TVQ3 TVV3 NOPRINT NOAPPEND
            FIRSTONLY FILE=param3 ; individual PK parameters (bayesiens,posthoc)

NM-TRAN MESSAGES
 WARNINGS AND ERRORS (IF ANY) FOR PROBLEM    1
 (WARNING  2) NM-TRAN INFERS THAT THE DATA ARE POPULATION.

1NONLINEAR MIXED EFFECTS MODEL PROGRAM (NONMEM) VERSION 7.3.0
 ORIGINALLY DEVELOPED BY STUART BEAL, LEWIS SHEINER, AND ALISON BOECKMANN
 CURRENT DEVELOPERS ARE ROBERT BAUER, ICON DEVELOPMENT SOLUTIONS,
  AND ALISON BOECKMANN. IMPLEMENTATION, EFFICIENCY, AND STANDARDIZATION
 PERFORMED BY NOUS INFOSYSTEMS.
 PROBLEM NO.:         1
 MEROPENEM IV INFUSION 3COMP DESCRIPTION PLASMA AND ELF
 TOT. NO. OF OBS RECS:      434
 TOT. NO. OF INDIVIDUALS:     60
 THREE COMPARTMENT MODEL (ADVAN11)
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 #TBLN:      1
 #METH: First Order Conditional Estimation with Interaction
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
 #TERM:
0MINIMIZATION SUCCESSFUL
 NO. OF FUNCTION EVALUATIONS USED:     1024
 NO. OF SIG. DIGITS IN FINAL EST.:  3.6

 ETABAR IS THE ARITHMETIC MEAN OF THE ETA-ESTIMATES,
 AND THE P-VALUE IS GIVEN FOR THE NULL HYPOTHESIS THAT THE TRUE MEAN IS 0.

 ETABAR:         6.3073E-04 -2.0283E-02  7.4928E-02 -2.3915E-02
 SE:             4.4990E-02  3.6884E-02  1.0978E-01  2.4700E-02
 N:                      60          60          60          60

 P VAL.:         9.8881E-01  5.8238E-01  4.9490E-01  3.3293E-01

 ETAshrink(%):   1.0245E+00  2.2959E+01  3.5435E+01  5.5370E+01
 EBVshrink(%):   1.6812E+00  2.2836E+01  2.9898E+01  5.6298E+01
 EPSshrink(%):   1.6924E+01  1.6924E+01  3.5124E+00

 #TERE:
 Elapsed estimation time in seconds:    14.83
 Elapsed covariance time in seconds:    26.77

 ********************               FIRST ORDER CONDITIONAL ESTIMATION WITH INTERACTION              ********************
 #OBJT:**************                       MINIMUM VALUE OF OBJECTIVE FUNCTION                      ********************
 #OBJV:********************************************     1488.719       **************************************************

 ********************               FIRST ORDER CONDITIONAL ESTIMATION WITH INTERACTION              ********************
 ********************                             FINAL PARAMETER ESTIMATE                           ********************

 THETA - VECTOR OF FIXED EFFECTS PARAMETERS   *********
         TH 1      TH 2      TH 3      TH 4      TH 5      TH 6      TH 7      TH 8      TH 9      TH10
         7.94E+00  7.22E-01  1.36E+01  9.49E-01  6.73E+00  4.08E+00  8.22E+00  1.01E+01  1.04E+00  2.49E+02

 OMEGA - COV MATRIX FOR RANDOM EFFECTS - ETAS  ********
            ETA1      ETA2      ETA3      ETA4
 ETA1
+        1.26E-01
 ETA2
+        0.00E+00  1.40E-01
 ETA3
+        0.00E+00  0.00E+00  1.76E+00
 ETA4
+        0.00E+00  0.00E+00  0.00E+00  1.87E-01

 SIGMA - COV MATRIX FOR RANDOM EFFECTS - EPSILONS  ****
            EPS1      EPS2      EPS3
 EPS1
+        2.40E-02
 EPS2
+        0.00E+00  2.08E-01
 EPS3
+        0.00E+00  0.00E+00  4.04E-01

 OMEGA - CORR MATRIX FOR RANDOM EFFECTS - ETAS  *******
            ETA1      ETA2      ETA3      ETA4
 ETA1
+        3.55E-01
 ETA2
+        0.00E+00  3.74E-01
 ETA3
+        0.00E+00  0.00E+00  1.33E+00
 ETA4
+        0.00E+00  0.00E+00  0.00E+00  4.32E-01

 SIGMA - CORR MATRIX FOR RANDOM EFFECTS - EPSILONS  ***
            EPS1      EPS2      EPS3
 EPS1
+        1.55E-01
 EPS2
+        0.00E+00  4.56E-01
 EPS3
+        0.00E+00  0.00E+00  6.36E-01

 ********************               FIRST ORDER CONDITIONAL ESTIMATION WITH INTERACTION              ********************
 ********************                            STANDARD ERROR OF ESTIMATE                          ********************

 THETA - VECTOR OF FIXED EFFECTS PARAMETERS   *********
         TH 1      TH 2      TH 3      TH 4      TH 5      TH 6      TH 7      TH 8      TH 9      TH10
         3.93E-01  6.37E-02  8.51E-01  2.86E-01  1.23E+00  1.36E+00  1.50E+00  1.56E+00  1.19E+00  2.41E+01

 OMEGA - COV MATRIX FOR RANDOM EFFECTS - ETAS  ********
            ETA1      ETA2      ETA3      ETA4
 ETA1
+        2.37E-02
 ETA2
+       .........  4.70E-02
 ETA3
+       ......... .........  7.23E-01
 ETA4
+       ......... ......... .........  1.05E-01

 SIGMA - COV MATRIX FOR RANDOM EFFECTS - EPSILONS  ****
            EPS1      EPS2      EPS3
 EPS1
+        2.84E-03
 EPS2
+       .........  6.75E-02
 EPS3
+       ......... .........  8.60E-02

 OMEGA - CORR MATRIX FOR RANDOM EFFECTS - ETAS  *******
            ETA1      ETA2      ETA3      ETA4
 ETA1
+        3.34E-02
 ETA2
+       .........  6.29E-02
 ETA3
+       ......... .........  2.72E-01
 ETA4
+       ......... ......... .........  1.22E-01

 SIGMA - CORR MATRIX FOR RANDOM EFFECTS - EPSILONS  ***
            EPS1      EPS2      EPS3
 EPS1
+        9.15E-03
 EPS2
+       .........  7.41E-02
 EPS3
+       ......... .........  6.76E-02
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
 ********************               FIRST ORDER CONDITIONAL ESTIMATION WITH INTERACTION              ********************
 ********************                      EIGENVALUES OF COR MATRIX OF ESTIMATE                     ********************

             1         2         3         4         5         6         7         8         9        10        11        12
             13        14        15        16        17
         1.68E-02  9.50E-02  1.38E-01  1.82E-01  3.16E-01  3.64E-01  4.17E-01  5.17E-01  5.74E-01  6.25E-01  1.01E+00  1.07E+00
          1.23E+00  1.44E+00  2.06E+00  2.64E+00  4.30E+00
 #CPUT: Total CPU Time in Seconds,       41.701
