Fri Dec 21 13:02:05 PST 2018
;; 1. Based on: run200
;; 2. Description: Final model, posthoc PK based on published unified model. Prityfied code
;; x1. Author: Matts
$SIZES NO=3000 LIM6=1000
$PROBLEM PN survival model With individual PK
; Implemented flip comments using PsN (e.g. sim_start and sim_end to define code to be used for VPC simulations).

;Sim_start
$INPUT MID TIME DUR RATE AMT EVID CMT DV CENS CENSD STUD ADC NDOS
NAMT_MAX PL_DOSE AV_DOSE CUMDOSE DFREQ ;18
RITUX SEXX AGE BW BHT RACE BMI BSA CTYPE ALB BUN BSLD=DROP
PDUR=DROP PCPLAT PCTAX PCVINCA PCPROT ;34
PPN DIAB ECOG1 DSBUILD=DROP PK ID ET1 ET2 ET3 ET4 ET5 ET6 ;48
$DATA nonmem_gr2_Nov13_2018.csv IGNORE=@ IGNORE(TIME.LT.0)
IGNORE(STUD.EQ.29006) IGNORE(ID.EQ.639)
; 13 patients
; Unrealistic PK

;$INPUT MID TIME DUR RATE AMT EVID CMT DV CENS CENSD STUD ADC NDOS NAMT_MAX PL_DOSE AV_DOSE CUMDOSE DFREQ

; RITUX SEXX AGE BW BHT RACE BMI BSA CTYPE ALB BUN BSLD=DROP PDUR=DROP PCPLAT PCTAX PCVINCA PCPROT

; PPN DIAB ECOG1 DSBUILD=DROP ET1 ET2 ET3 ET4 ET5 ET6 PK ID

;

; $DATA ../data/nonmem_gr2_Nov13_2018_sim.csv IGNORE=@

; IGNORE(TIME.LT.0)

; IGNORE(STUD.EQ.29006) ; 13 patients

; IGNORE(ID.EQ.639) ; Unrealistic PK

;Sim_end
$SUBROUTINE ADVAN13 TRANS1 TOL=6
$MODEL COMP=(central) COMP=(peri) COMP=(effcpt) COMP=(cumhaz)
COMP=(trcpt) COMP(AUC)
$PK
;for simulation
RTTE=0
;end for simulation

; Covariate imputations etc
ageRef = 65
albref=4.0
bunref=16
bodyWeightRef=85 ; Male

IF(SEXX.EQ.1) SEX=1 ; Male
IF(SEXX.EQ.2) THEN
SEX=0 ; Female
bodyWeightRef=68
ENDIF

BWT=BW
IF(BW.EQ.-99) BWT=bodyWeightRef

; PK parameters

THETA1=0.312;1 CL
THETA2=1.21;2 V1
THETA3= 0.957;3 V2
THETA4= -1.02;4 Q
THETA5= 1.48;5 KDES
THETA6= 1.02;6 CLT
THETA7= 0.476;7 WT to CLinf
THETA8= 0.527;8 WT to V1
THETA9= 0.484;9 WT to 2
THETA10= 0.303;10 WT to Q
THETA11= 0.149;11 SEX to V1
THETA12= 0.223;12 SEX to V
THETA13= -0.212;13 power NDOS to CL

LWT75 = LOG(BWT/75)
MUX1 = THETA1+THETA7*LWT75 +THETA13*LOG(NDOS/2.4)
MUX2 = THETA2+THETA8*LWT75+THETA11*SEX
MUX3 = THETA3+THETA9*LWT75+THETA12*SEX
MUX4 = THETA4+THETA10*LWT75
MUX5 = THETA5
MUX6 = THETA6

CLINF = EXP(MUX1+ET1)
V1 = EXP(MUX2+ET2)
V2 = EXP(MUX3+ET3)
Q = EXP(MUX4+ET4)
KDES = EXP(MUX5+ET5)
CLT = EXP(MUX6+ET6)

S1 = V1/1000

;Reparameterization
K12 = Q/V1
K21 = Q/V2

; PD parameters
LOGKTR = THETA(1)+ETA(1) ; Eta1 Fixed to zero
KTR = EXP(LOGKTR) ; first order transit rate to and from transit and effect compartment
ALPHA = EXP(THETA(2)) ; slope of drug effect
BETA = EXP(THETA(3)) ; weibul function parameter

covar = THETA(4) * (BWT - 75) + THETA(5) * PPN ; covariate effects on Hazard

$DES
; PK model
CL = CLT * EXP(-KDES * T) + CLINF
K10 = CL / V1

DADT(1) = K21 * A(2) - K12 * A(1) - K10 * A(1)
DADT(2) = -K21 * A(2) + K12 * A(1)
CPT = A(1) / S1

; PD model
DADT(5) = KTR * CPT - KTR * A(5) ; Transit compartment
DADT(3) = KTR * A(5) - KTR * A(3) ; Effect compartment
A5=A(5)
A3=A(3)

EDRUGT = ALPHA * A(3)
HAZT = 0
IF(T > 0) HAZT = BETA * (EDRUGT**BETA) * (T**(BETA - 1)) * EXP(covar); WEIBULL (not defined at time zero)
DADT(4) = HAZT ; Cumulative Hazard
DADT(6) = CPT ; Cumulative AUC
AUCT=A(6) ; AUC up to time T
CAV=AUCT/T ; Average concentration up to time T

$ERROR
CP = A(1) / S1
EDRUG = ALPHA * A(3) ; Drug effect
HAZ = 0 ; redefine Hazard in $Error. Needed to compute pdf
IF(TIME > 0) HAZ = BETA * (EDRUG**BETA) * (TIME**(BETA - 1)) * EXP(covar); WEIBULL
SURV = EXP(-A(4)) ; Survival probability
PDF=SURV*HAZ

;Estimation (defined by sim start and end)
;Sim_start
IF(DV.EQ.0) THEN
Y=SURV
CHLAST=A(4)
ELSE
CHLAST=CHLAST ; Keep nmtran happy
ENDIF

IF(DV.EQ.1) THEN
Y=PDF ;pdf
ENDIF
;Sim_end

;Simulation
IF(ICALL.EQ.4) THEN
IF (NEWIND.NE.2) CALL RANDOM (2,R) ; random uniform distribution
DV=0 ; NO EVENT OCCURS
RTTE=0 ; NO EVENT OCCURS
IF(CENS.EQ.1) RTTE=1 ; RTTE set to 1 for censoring and event rows
IF(R.GT.SURV) THEN ; Event when R > SURV
DV=1 ; DV set to 1 at time of event
RTTE=1 ; RTTE set to 1 for censoring and event rows
ENDIF
Y=DV
ENDIF

$THETA -4.53 ; 1 LOGKE0
-9.69 ; 2 LOGALPHA
-0.327 ; 3 LOGBETA
0.0145 ; 4 BWT
0.434 ; 5 PPN 1/0
$OMEGA 0 FIX
;Sim_start
;$SIGMA
;0 FIXED
$ESTIMATION MAXEVAL=9999 PRINT=1 LIKE METHOD=1 LAPLACE NUMERICAL
NOABORT SIG=3
;$SIMULATION(123456) (23000 UNIFORM) ONLYSIM ; Uncomment this for VPC generation

;Sim_end
$COVARIANCE MATRIX=S UNCONDITIONAL
$TABLE TIME ID MID EVID AV_DOSE CAV AUCT CP A5 A3 HAZ SURV
FORMAT=s1PE15.9 ONEHEADER NOPRINT FILE=HZtab202

NM-TRAN MESSAGES
WARNINGS AND ERRORS (IF ANY) FOR PROBLEM 1
(WARNING 2) NM-TRAN INFERS THAT THE DATA ARE POPULATION.
(WARNING 3) THERE MAY BE AN ERROR IN THE ABBREVIATED CODE. THE FOLLOWING
ONE OR MORE RANDOM VARIABLES ARE DEFINED WITH "IF" STATEMENTS THAT DO NOT
PROVIDE DEFINITIONS FOR BOTH THE "THEN" AND "ELSE" CASES. IF ALL
CONDITIONS FAIL, THE VALUES OF THESE VARIABLES WILL BE ZERO.
Y
(WARNING 90) WITH "NUMERICAL", "SLOW" IS ALSO REQUIRED ON $ESTIM RECORD.
NM-TRAN HAS SUPPLIED THIS OPTION.
(WARNING 97) A RANDOM QUANTITY IS RAISED TO A POWER. IF THE RESULT AFFECTS
THE VALUE OF THE OBJECTIVE FUNCTION, THE USER SHOULD ENSURE THAT THE
RANDOM QUANTITY IS NEVER 0 WHEN THE POWER IS < 1.
(WARNING 48) DES-DEFINED ITEMS ARE COMPUTED ONLY WHEN EVENT TIME
INCREASES. E.G., DISPLAYED VALUES ASSOCIATED WITH THE FIRST EVENT RECORD
OF AN INDIVIDUAL RECORD ARE COMPUTED WITH (THE LAST ADVANCE TO) AN EVENT
TIME OF THE PRIOR INDIVIDUAL RECORD.
(WARNING 27) THE ABBREVIATED CODE CONTAINS A SIMULATION BLOCK BUT THERE IS
NO $SIMULATION RECORD.

1NONLINEAR MIXED EFFECTS MODEL PROGRAM (NONMEM) VERSION 7.3.0
ORIGINALLY DEVELOPED BY STUART BEAL, LEWIS SHEINER, AND ALISON BOECKMANN
CURRENT DEVELOPERS ARE ROBERT BAUER, ICON DEVELOPMENT SOLUTIONS,
AND ALISON BOECKMANN. IMPLEMENTATION, EFFICIENCY, AND STANDARDIZATION
PERFORMED BY NOUS INFOSYSTEMS.
PROBLEM NO.: 1
PN survival model With individual PK
TOT. NO. OF OBS RECS: 693
TOT. NO. OF INDIVIDUALS: 693
GENERAL NONLINEAR KINETICS MODEL USING LSODA (ADVAN13)
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#TBLN: 1
#METH: Laplacian Conditional Estimation
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
#TERM:
0MINIMIZATION SUCCESSFUL
HOWEVER, PROBLEMS OCCURRED WITH THE MINIMIZATION.
REGARD THE RESULTS OF THE ESTIMATION STEP CAREFULLY, AND ACCEPT THEM ONLY
AFTER CHECKING THAT THE COVARIANCE STEP PRODUCES REASONABLE OUTPUT.
NO. OF FUNCTION EVALUATIONS USED: 74
NO. OF SIG. DIGITS IN FINAL EST.: 3.4

ETABAR IS THE ARITHMETIC MEAN OF THE ETA-ESTIMATES,
AND THE P-VALUE IS GIVEN FOR THE NULL HYPOTHESIS THAT THE TRUE MEAN IS 0.

ETABAR: 0.0000E+00
SE: 0.0000E+00
N: 693

P VAL.: 1.0000E+00

ETAshrink(%): 1.0000E+02
EBVshrink(%): 0.0000E+00
EPSshrink(%): 1.0000E+02

#TERE:
Elapsed estimation time in seconds: 3.72
Elapsed covariance time in seconds: 0.71

******************** LAPLACIAN CONDITIONAL ESTIMATION ********************
#OBJT:************** MINIMUM VALUE OF OBJECTIVE FUNCTION ********************
#OBJV:******************************************** 2515.122 **************************************************

******************** LAPLACIAN CONDITIONAL ESTIMATION ********************
******************** FINAL PARAMETER ESTIMATE ********************

THETA - VECTOR OF FIXED EFFECTS PARAMETERS *********
TH 1 TH 2 TH 3 TH 4 TH 5
-4.53E+00 -9.69E+00 -3.27E-01 1.45E-02 4.34E-01

OMEGA - COV MATRIX FOR RANDOM EFFECTS - ETAS ********
ETA1
ETA1
+ 0.00E+00

OMEGA - CORR MATRIX FOR RANDOM EFFECTS - ETAS *******
ETA1
ETA1
+ 0.00E+00

******************** LAPLACIAN CONDITIONAL ESTIMATION ********************
******************** STANDARD ERROR OF ESTIMATE ********************

THETA - VECTOR OF FIXED EFFECTS PARAMETERS *********
TH 1 TH 2 TH 3 TH 4 TH 5
4.46E-01 5.11E-01 9.09E-02 4.20E-03 1.54E-01

OMEGA - COV MATRIX FOR RANDOM EFFECTS - ETAS ********
ETA1
ETA1
+ .........

OMEGA - CORR MATRIX FOR RANDOM EFFECTS - ETAS *******
ETA1
ETA1
+ .........

******************** LAPLACIAN CONDITIONAL ESTIMATION ********************
******************** COVARIANCE MATRIX OF ESTIMATE ********************

TH 1 TH 2 TH 3 TH 4 TH 5 OM11
TH 1
+ 1.99E-01
TH 2
+ -2.19E-01 2.62E-01
TH 3
+ 3.45E-02 -3.84E-02 8.26E-03
TH 4
+ -2.73E-04 1.42E-04 -3.99E-05 1.76E-05
TH 5
+ -2.53E-03 -1.24E-02 9.20E-04 2.31E-05 2.36E-02
OM11
+ ......... ......... ......... ......... ......... .........

******************** LAPLACIAN CONDITIONAL ESTIMATION ********************
******************** CORRELATION MATRIX OF ESTIMATE ********************

TH 1 TH 2 TH 3 TH 4 TH 5 OM11
TH 1
+ 4.46E-01
TH 2
+ -9.57E-01 5.11E-01
TH 3
+ 8.50E-01 -8.27E-01 9.09E-02
TH 4
+ -1.46E-01 6.62E-02 -1.05E-01 4.20E-03
TH 5
+ -3.69E-02 -1.57E-01 6.59E-02 3.58E-02 1.54E-01
OM11
+ ......... ......... ......... ......... ......... .........
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#CPUT: Total CPU Time in Seconds, 39.825
