17-08-20
15:40
;; Description:
;; Author: user
$PROBLEM HCQ 1CMT ORAL PK MODEL (BASED ON CARMICHAEL ET AL (2003))
; ------------dataset------------
$INPUT ID SEX WT AGE TIME AMT ADDL II CMT DV MDV EVID
$DATA HCQdata5.csv IGNORE=@

; ------------model------------
$SUBROUTINE ADVAN2 TRANS2
$PK

TVCL=THETA(1)*((WT/80)**THETA(5));*((AGE/57)**THETA(5));
TVV=THETA(2)
TVKA=THETA(3)
TVF1=THETA(4)
; TVALAG1=THETA(4)

CL=TVCL*EXP(ETA(1))
V=TVV*EXP(ETA(2))
KA=TVKA;*EXP(ETA(3))
F1=TVF1;*EXP(ETA(4))
; ALAG1=TVALAG1;*EXP(ETA(3))

; scaling factor
KE=CL/V
S2=V/1000 ; dose [mg] and conc. [ng/mL]

$ERROR
Y=F*(1+EPS(1));+EPS(2)
W=F

IPRED=F ; prediction individuelle
IRES=DV-IPRED ; (individual-specific residual)
IWRES=IRES/W ; (individual-specific weighted residual)

$THETA (0,14.9207) ; CL
$THETA (0,861.385) ; V
$THETA (0,9.3023,10) ; KA
$THETA (0,0.746) FIX ; F1
;$THETA (0,0.00445) ; ALAG1
$THETA 1.20407 ; WTonCL
$OMEGA 0.163126 ; IIVCL
0.27101 ; IIVV
; 0.94 ; IVVKA
; 0.004 FIXED ; IIVF
; 0.02 ; IIVALAG
$SIGMA 0.0290039 ; epsPROP1
;0.000365773 ; epsADD1
$ESTIMATION METHOD=1 INTER MAXEVAL=9999 PRINT=5 SIG=3 POSTHOC
; standard error of estimates :
$COVARIANCE
$TABLE ID SEX WT AGE TIME DV PRED CPRED IPRED EVID RES WRES IRES
IWRES CWRES NPDE ESAMPLE=300 NOPRINT FILE=pred
; population and individual predictions and residuals
$TABLE ID SEX WT AGE CL V KA ETA(1) ETA(2) NOPRINT NOAPPEND
FIRSTONLY FILE=param
; individual PK parameters (bayesiens,posthoc)

NM-TRAN MESSAGES
WARNINGS AND ERRORS (IF ANY) FOR PROBLEM 1
(WARNING 2) NM-TRAN INFERS THAT THE DATA ARE POPULATION.

1NONLINEAR MIXED EFFECTS MODEL PROGRAM (NONMEM) VERSION 7.3.0
ORIGINALLY DEVELOPED BY STUART BEAL, LEWIS SHEINER, AND ALISON BOECKMANN
CURRENT DEVELOPERS ARE ROBERT BAUER, ICON DEVELOPMENT SOLUTIONS,
AND ALISON BOECKMANN. IMPLEMENTATION, EFFICIENCY, AND STANDARDIZATION
PERFORMED BY NOUS INFOSYSTEMS.
PROBLEM NO.: 1
HCQ 1CMT ORAL PK MODEL (BASED ON CARMICHAEL ET AL (2003))
TOT. NO. OF OBS RECS: 76
TOT. NO. OF INDIVIDUALS: 48
ONE COMPARTMENT MODEL WITH FIRST-ORDER ABSORPTION (ADVAN2)
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#TBLN: 1
#METH: First Order Conditional Estimation with Interaction
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
#TERM:
0MINIMIZATION SUCCESSFUL
NO. OF FUNCTION EVALUATIONS USED: 120
NO. OF SIG. DIGITS IN FINAL EST.: 3.1

ETABAR IS THE ARITHMETIC MEAN OF THE ETA-ESTIMATES,
AND THE P-VALUE IS GIVEN FOR THE NULL HYPOTHESIS THAT THE TRUE MEAN IS 0.

ETABAR: 2.0383E-03 -3.1903E-02
SE: 4.2241E-02 5.3895E-02
N: 48 48

P VAL.: 9.6151E-01 5.5388E-01

ETAshrink(%): 2.3312E+01 2.7614E+01
EBVshrink(%): 2.4480E+01 2.9753E+01
EPSshrink(%): 4.0741E+01

#TERE:
Elapsed estimation time in seconds: 26.44
0R MATRIX ALGORITHMICALLY SINGULAR
AND ALGORITHMICALLY NON-POSITIVE-SEMIDEFINITE
0R MATRIX IS OUTPUT
0COVARIANCE STEP ABORTED
Elapsed covariance time in seconds: 41.73

******************** FIRST ORDER CONDITIONAL ESTIMATION WITH INTERACTION ********************
#OBJT:************** MINIMUM VALUE OF OBJECTIVE FUNCTION ********************
#OBJV:******************************************** 865.901 **************************************************

******************** FIRST ORDER CONDITIONAL ESTIMATION WITH INTERACTION ********************
******************** FINAL PARAMETER ESTIMATE ********************

THETA - VECTOR OF FIXED EFFECTS PARAMETERS *********
TH 1 TH 2 TH 3 TH 4 TH 5
1.57E+01 8.61E+02 9.30E+00 7.46E-01 1.38E+00

OMEGA - COV MATRIX FOR RANDOM EFFECTS - ETAS ********
ETA1 ETA2
ETA1
+ 1.49E-01
ETA2
+ 0.00E+00 2.72E-01

SIGMA - COV MATRIX FOR RANDOM EFFECTS - EPSILONS ****
EPS1
EPS1
+ 2.86E-02

OMEGA - CORR MATRIX FOR RANDOM EFFECTS - ETAS *******
ETA1 ETA2
ETA1
+ 3.86E-01
ETA2
+ 0.00E+00 5.21E-01

SIGMA - CORR MATRIX FOR RANDOM EFFECTS - EPSILONS ***
EPS1
EPS1
+ 1.69E-01
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#CPUT: Total CPU Time in Seconds, 73.375
