Tue 03/12/2019
10:08 AM
$PROB Phase IIa Study, One Compartment Model 504m.ctl
; Place column names of data file here:
$INPUT C ID TIME DV AMT RATE WT AGE SEX
$DATA 501.csv IGNORE=C ; Ignore records beginning with letter C
; Select One compartment model ADVAN1, Parameterization TRANS2 (CL, V)
$SUBROUTINE ADVAN1 TRANS2
; Section to define PK parameters, relationship to fixed effects THETA
; and inter-subject random effects ETA.
$PK
; Define typical values
  LTVCL=THETA(1)+LOG(WT/70)*THETA(3)+LOG(AGE/50)*THETA(5)+SEX*THETA(7)
  LTVV=THETA(2)+LOG(WT/70)*THETA(4)+LOG(AGE/50)*THETA(6)+SEX*THETA(8)
  MU_1=LTVCL
  MU_2=LTVV
  CL=EXP(MU_1+ETA(1))
  V=EXP(MU_2+ETA(2))
  S1=V

$THETA ; Enter initial starting values for THETAS
  0.7    ;[LCL]
  3.0    ;[LV]
  0.8    ;[CL~WT]
  0.8    ;[V~WT]
  -0.1   ;[CL~AGE]
  0.1    ;[V~AGE]
  0.7    ;[CL~SEX]
  0.7    ;[V~SEX]

; Section to relate predicted function F and residual error
; relationship to data DV.  EPS are random error coefficients
$ERROR
  IPRE=A(1)/V
  Y=IPRE*(1+EPS(1))
$OMEGA BLOCK(2) ; Initial OMEGA values in lower triangular format
  0.1         ;[P]
  0.001 0.1   ;[P]
$SIGMA ; Initial SIGMA
  0.04        ;[P]

$EST METHOD=COND INTERACTION MAXEVAL=9999 PRINT=5 NOABORT
$COV UNCONDITIONAL MATRIX=R PRINT=E
; Print out individual predicted results
; Various parameters and built in diagnostics may be printed.
; DV=DEPENDENT VARIABLE
; CIPRED=individual predicted function, f(eta_hat), at mode of
; posterior density, because FOCE performs estimations at mode
; CIRES=DV-F(ETA_HAT)
; CIWRES=conditional individual residual
; (DV-F(ETA_HAT)/SQRT(SIGMA(1,1)*F(ETA_HAT))
; PRED=Population Predicted value F(ETA=0)
; CWRES=conditional Population weighted Residual
; Note numerical Format may be specified for table outputs
$TABLE ID TIME DV IPRE CIPRED CIRES CIWRES PRED RES CWRES CL V ETA1 ETA2
       NOPRINT NOAPPEND ONEHEADER FORMAT=,1PE13.6 FILE=504_foce.tab

NM-TRAN MESSAGES
 WARNINGS AND ERRORS (IF ANY) FOR PROBLEM    1
 (WARNING  2) NM-TRAN INFERS THAT THE DATA ARE POPULATION.
 (MU_WARNING 26) DATA ITEM(S) USED IN DEFINITION OF MU_(S) SHOULD BE CONSTANT FOR INDIV. REC.:
  WT AGE SEX

1NONLINEAR MIXED EFFECTS MODEL PROGRAM (NONMEM) VERSION 7.4.3
 ORIGINALLY DEVELOPED BY STUART BEAL, LEWIS SHEINER, AND ALISON BOECKMANN
 CURRENT DEVELOPERS ARE ROBERT BAUER, ICON DEVELOPMENT SOLUTIONS,
 AND ALISON BOECKMANN. IMPLEMENTATION, EFFICIENCY, AND STANDARDIZATION
 PERFORMED BY NOUS INFOSYSTEMS.
 PROBLEM NO.:         1
 Phase IIa Study, One Compartment Model 504m.ctl
 TOT. NO. OF OBS RECS:      240
 TOT. NO. OF INDIVIDUALS:       60
 ONE COMPARTMENT MODEL (ADVAN1)
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 #TBLN:      1
 #METH: First Order Conditional Estimation with Interaction
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
 #TERM:
0MINIMIZATION SUCCESSFUL
 NO. OF FUNCTION EVALUATIONS USED:      504
 NO. OF SIG. DIGITS IN FINAL EST.:  3.7

 ETABAR IS THE ARITHMETIC MEAN OF THE ETA-ESTIMATES,
 AND THE P-VALUE IS GIVEN FOR THE NULL HYPOTHESIS THAT THE TRUE MEAN IS 0.

 ETABAR:         4.1243E-03 -9.3904E-03
 SE:             1.8818E-02  2.2907E-02
 N:                      60          60

 P VAL.:         8.2651E-01  6.8186E-01

 ETASHRINKSD(%)  1.6140E+01  1.7118E+01
 ETASHRINKVR(%)  2.9675E+01  3.1306E+01
 EBVSHRINKSD(%)  1.7123E+01  1.7497E+01
 EBVSHRINKVR(%)  3.1314E+01  3.1933E+01
 EPSSHRINKSD(%)  1.7013E+01
 EPSSHRINKVR(%)  3.1132E+01


 TOTAL DATA POINTS NORMALLY DISTRIBUTED (N):          240
 N*LOG(2PI) CONSTANT TO OBJECTIVE FUNCTION:    441.090495938243
 OBJECTIVE FUNCTION VALUE WITHOUT CONSTANT:    1058.30371167602
 OBJECTIVE FUNCTION VALUE WITH CONSTANT:       1499.39420761427
 REPORTED OBJECTIVE FUNCTION DOES NOT CONTAIN CONSTANT

 TOTAL EFFECTIVE ETAS (NIND*NETA):                           120


 #TERE:
 Elapsed estimation  time in seconds:     1.53
 Elapsed covariance  time in seconds:     1.41
 Elapsed postprocess time in seconds:     0.02

 ********************               FIRST ORDER CONDITIONAL ESTIMATION WITH INTERACTION              ********************
 #OBJT:**************                       MINIMUM VALUE OF OBJECTIVE FUNCTION                      ********************
 #OBJV:********************************************     1058.304       **************************************************

 ********************               FIRST ORDER CONDITIONAL ESTIMATION WITH INTERACTION              ********************
 ********************                             FINAL PARAMETER ESTIMATE                           ********************

 THETA - VECTOR OF FIXED EFFECTS PARAMETERS   *********
         TH 1      TH 2      TH 3      TH 4      TH 5      TH 6      TH 7      TH 8
         1.11E+00  3.48E+00  6.60E-01  1.32E+00 -5.34E-01  5.23E-02 -1.01E-01 -5.48E-02

 OMEGA - COV MATRIX FOR RANDOM EFFECTS - ETAS  ********
         ETA1      ETA2
 ETA1
+        3.07E-02
 ETA2
+        1.48E-03  4.66E-02

 SIGMA - COV MATRIX FOR RANDOM EFFECTS - EPSILONS  ****
         EPS1
 EPS1
+        5.03E-02

 OMEGA - CORR MATRIX FOR RANDOM EFFECTS - ETAS  *******
         ETA1      ETA2
 ETA1
+        1.75E-01
 ETA2
+        3.91E-02  2.16E-01

 SIGMA - CORR MATRIX FOR RANDOM EFFECTS - EPSILONS  ***
         EPS1
 EPS1
+        2.24E-01

 ********************               FIRST ORDER CONDITIONAL ESTIMATION WITH INTERACTION              ********************
 ********************                            STANDARD ERROR OF ESTIMATE                          ********************

 THETA - VECTOR OF FIXED EFFECTS PARAMETERS   *********
         TH 1      TH 2      TH 3      TH 4      TH 5      TH 6      TH 7      TH 8
         3.83E-02  4.87E-02  1.60E-01  2.02E-01  1.03E-01  1.29E-01  5.68E-02  7.13E-02

 OMEGA - COV MATRIX FOR RANDOM EFFECTS - ETAS  ********
         ETA1      ETA2
 ETA1
+        9.16E-03
 ETA2
+        7.59E-03  1.39E-02

 SIGMA - COV MATRIX FOR RANDOM EFFECTS - EPSILONS  ****
         EPS1
 EPS1
+        6.76E-03

 OMEGA - CORR MATRIX FOR RANDOM EFFECTS - ETAS  *******
         ETA1      ETA2
 ETA1
+        2.61E-02
 ETA2
+        1.99E-01  3.21E-02

 SIGMA - CORR MATRIX FOR RANDOM EFFECTS - EPSILONS  ***
         EPS1
 EPS1
+        1.51E-02

 ********************               FIRST ORDER CONDITIONAL ESTIMATION WITH INTERACTION              ********************
 ********************                          COVARIANCE MATRIX OF ESTIMATE                         ********************

            TH 1      TH 2      TH 3      TH 4      TH 5      TH 6      TH 7      TH 8      OM11      OM12      OM22      SG11
 TH 1
+        1.47E-03
 TH 2
+        2.96E-04  2.38E-03
 TH 3
+       -9.16E-04 -3.49E-04  2.56E-02
 TH 4
+       -3.42E-04 -1.73E-03  4.29E-03  4.07E-02
 TH 5
+        1.12E-04 -7.55E-05 -1.29E-03 -3.59E-04  1.06E-02
 TH 6
+       -5.35E-05  1.04E-04 -4.06E-04 -2.65E-03  2.27E-03  1.68E-02
 TH 7
+       -1.32E-03 -2.39E-04 -2.02E-03 -3.91E-04  6.94E-04 -1.05E-04  3.23E-03
 TH 8
+       -2.20E-04 -2.13E-03 -3.90E-04 -3.24E-03 -1.03E-04  9.45E-04  5.27E-04  5.08E-03
 OM11
+       -8.61E-06  1.49E-05  1.04E-05  4.33E-05  2.79E-05 -1.54E-05  9.96E-06 -1.67E-05  8.39E-05
 OM12
+        2.13E-05  6.45E-06  3.37E-05  2.98E-05  7.52E-06 -2.65E-05 -1.11E-05 -6.00E-06  1.01E-05  5.76E-05
 OM22
+       -2.38E-05  6.79E-05 -8.98E-06  2.85E-05 -3.98E-05 -4.30E-05  5.46E-06 -6.77E-05  1.40E-05  2.45E-05  1.92E-04
 SG11
+        3.92E-05  1.64E-05 -5.75E-06 -1.96E-05 -6.26E-06  1.68E-05 -7.28E-06  2.19E-05 -1.73E-05 -3.41E-06 -2.38E-05  4.57E-05

 ********************               FIRST ORDER CONDITIONAL ESTIMATION WITH INTERACTION              ********************
 ********************                          CORRELATION MATRIX OF ESTIMATE                        ********************

            TH 1      TH 2      TH 3      TH 4      TH 5      TH 6      TH 7      TH 8      OM11      OM12      OM22      SG11
 TH 1
+        3.83E-02
 TH 2
+        1.58E-01  4.87E-02
 TH 3
+       -1.49E-01 -4.47E-02  1.60E-01
 TH 4
+       -4.43E-02 -1.76E-01  1.33E-01  2.02E-01
 TH 5
+        2.83E-02 -1.50E-02 -7.79E-02 -1.72E-02  1.03E-01
 TH 6
+       -1.08E-02  1.64E-02 -1.96E-02 -1.01E-01  1.70E-01  1.29E-01
 TH 7
+       -6.07E-01 -8.63E-02 -2.22E-01 -3.41E-02  1.18E-01 -1.43E-02  5.68E-02
 TH 8
+       -8.05E-02 -6.14E-01 -3.41E-02 -2.25E-01 -1.40E-02  1.02E-01  1.30E-01  7.13E-02
 OM11
+       -2.45E-02  3.33E-02  7.08E-03  2.34E-02  2.96E-02 -1.30E-02  1.91E-02 -2.55E-02  9.16E-03
 OM12
+        7.34E-02  1.74E-02  2.77E-02  1.95E-02  9.60E-03 -2.70E-02 -2.57E-02 -1.11E-02  1.45E-01  7.59E-03
 OM22
+       -4.49E-02  1.01E-01 -4.05E-03  1.02E-02 -2.79E-02 -2.40E-02  6.93E-03 -6.86E-02  1.11E-01  2.33E-01  1.39E-02
 SG11
+        1.51E-01  4.98E-02 -5.32E-03 -1.44E-02 -8.97E-03  1.92E-02 -1.89E-02  4.54E-02 -2.79E-01 -6.64E-02 -2.54E-01  6.76E-03
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
 ********************               FIRST ORDER CONDITIONAL ESTIMATION WITH INTERACTION              ********************
 ********************                      EIGENVALUES OF COR MATRIX OF ESTIMATE                     ********************

             1         2         3         4         5         6         7         8         9        10        11        12
         2.36E-01  2.95E-01  6.22E-01  7.68E-01  8.43E-01  9.63E-01  1.00E+00  1.09E+00  1.32E+00  1.37E+00  1.63E+00  1.86E+00
 Elapsed finaloutput time in seconds:     0.19
 #CPUT: Total CPU Time in Seconds,        2.590
