Fri 03/08/2019
10:34 AM
;Model Desc: Full model
;Project Name: chapter6
;Project ID: NO PROJECT DESCRIPTION

$PROB
$INPUT C ID TIME DV AMT RATE WT AGE SEX
$DATA 501.csv IGNORE=C
$SUBROUTINE ADVAN1 TRANS2
$PK
include \nonmem\nonmem_reserved_general
MUFIRSTREC=1
OBJQUICK=1
  LTVCL=THETA(1)+LOG(WT/70)*THETA(3)+LOG(AGE/50)*THETA(5)+SEX*THETA(7)
  LTVV=THETA(2)+LOG(WT/70)*THETA(4)+LOG(AGE/50)*THETA(6)+SEX*THETA(8)
  MU_1=LTVCL
  MU_2=LTVV
  CL=EXP(MU_1+ETA(1))
  V=EXP(MU_2+ETA(2))
  S1=V
$THETA
  0.7  ;[LCL]
  3.0 ;[LV]
  0.8    ;[CL~WT]
  0.8    ;[V~WT]
  -0.1   ;[CL~AGE]
  0.1    ;[V~AGE]
  0.7    ;[CL~SEX]
  0.7    ;[V~SEX]

$ERROR
  IPRE=A(1)/V
  Y=IPRE*(1+EPS(1))

$OMEGA BLOCK(2)
  0.1 ;[p]
  0.001 ;[f]
  0.1 ;[p]
$SIGMA
  0.04 ;[p]

$PRIOR NWPRI
$THETAP (0.01 FIXED)X8
$THETAPV BLOCK(8) VALUES(100000.0,0.0) FIXED
$OMEGAP  BLOCK(2) VALUES(0.04,0.0) FIXED
$OMEGAPD (2 FIXED)
$SIGMAP BLOCK(1) (0.05 FIXED)
$SIGMAPD (1 FIXED)

$EST METHOD=NUTS AUTO=1 PRINT=50 NITER=2000
$COV UNCONDITIONAL MATRIX=R PRINT=E
; Unless FNLETA=0, table items are evaluated at mode of posterior of each subject
$TABLE ID TIME DV IPRE CL V ETA1 ETA2 NOPRINT NOAPPEND ONEHEADER FORMAT=,1PE13.6 FILE=504_nuts.tab

NM-TRAN MESSAGES
 WARNINGS AND ERRORS (IF ANY) FOR PROBLEM    1
 (WARNING  2) NM-TRAN INFERS THAT THE DATA ARE POPULATION.
 (WARNING  121) INTERACTION IS IMPLIED WITH EM/BAYES ESTIMATION METHODS
 (MU_WARNING 20) MU_001: MU_ VARIABLE SHOULD NOT BE DEFINED AFTER VERBATIM CODE.
 (MU_WARNING 26) DATA ITEM(S) USED IN DEFINITION OF MU_(S) SHOULD BE CONSTANT FOR INDIV. REC.:
  WT AGE SEX

1NONLINEAR MIXED EFFECTS MODEL PROGRAM (NONMEM) VERSION 7.4.3
 ORIGINALLY DEVELOPED BY STUART BEAL, LEWIS SHEINER, AND ALISON BOECKMANN
 CURRENT DEVELOPERS ARE ROBERT BAUER, ICON DEVELOPMENT SOLUTIONS,
 AND ALISON BOECKMANN. IMPLEMENTATION, EFFICIENCY, AND STANDARDIZATION
 PERFORMED BY NOUS INFOSYSTEMS.
 PROBLEM NO.:         1

 TOT. NO. OF OBS RECS:      240
 TOT. NO. OF INDIVIDUALS:       60
 ONE COMPARTMENT MODEL (ADVAN1)
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 #TBLN:      1
 #METH: NUTS Bayesian Analysis
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
 #TERM:
 BURN-IN WAS NOT TESTED FOR CONVERGENCE
 STATISTICAL PORTION WAS COMPLETED

 TOTAL DATA POINTS NORMALLY DISTRIBUTED (N):          240
 N*LOG(2PI) CONSTANT TO OBJECTIVE FUNCTION:    441.090495938243
 OBJECTIVE FUNCTION VALUE WITHOUT CONSTANT:    638.217042339171
 OBJECTIVE FUNCTION VALUE WITH CONSTANT:       1079.30753827741
 REPORTED OBJECTIVE FUNCTION DOES NOT CONTAIN CONSTANT

 TOTAL EFFECTIVE ETAS (NIND*NETA):                           120
 NIND*NETA*LOG(2PI) CONSTANT TO OBJECTIVE FUNCTION:    220.545247969121
 OBJECTIVE FUNCTION VALUE WITHOUT CONSTANT:    638.217042339171
 OBJECTIVE FUNCTION VALUE WITH CONSTANT:       858.762290308292
 REPORTED OBJECTIVE FUNCTION DOES NOT CONTAIN CONSTANT

 PRIOR CONSTANT TO OBJECTIVE FUNCTION:    126.804992662172
 OBJECTIVE FUNCTION VALUE WITHOUT CONSTANT:    638.217042339171
 OBJECTIVE FUNCTION VALUE WITH CONSTANT:       765.022035001342
 REPORTED OBJECTIVE FUNCTION DOES NOT CONTAIN CONSTANT


 #TERE:
 Elapsed estimation  time in seconds:    26.01
 Elapsed covariance  time in seconds:     0.00

 ********************                              NUTS BAYESIAN ANALYSIS                            ********************
 #OBJT:**************                       AVERAGE VALUE OF LIKELIHOOD FUNCTION                     ********************
 #OBJV:********************************************      638.217       **************************************************
 #OBJS:********************************************       20.762 (STD) **************************************************

 ********************                              NUTS BAYESIAN ANALYSIS                            ********************
 ********************                             FINAL PARAMETER ESTIMATE                           ********************

 THETA - VECTOR OF FIXED EFFECTS PARAMETERS   *********
         TH 1      TH 2      TH 3      TH 4      TH 5      TH 6      TH 7      TH 8
         1.07E+00  3.46E+00  6.44E-01  1.32E+00 -5.57E-01  5.95E-02 -1.04E-01 -4.96E-02

 OMEGA - COV MATRIX FOR RANDOM EFFECTS - ETAS  ********
         ETA1      ETA2
 ETA1
+        3.40E-02
 ETA2
+       -8.98E-04  5.25E-02

 SIGMA - COV MATRIX FOR RANDOM EFFECTS - EPSILONS  ****
         EPS1
 EPS1
+        5.22E-02

 OMEGA - CORR MATRIX FOR RANDOM EFFECTS - ETAS  *******
         ETA1      ETA2
 ETA1
+        1.82E-01
 ETA2
+       -2.94E-02  2.27E-01

 SIGMA - CORR MATRIX FOR RANDOM EFFECTS - EPSILONS  ***
         EPS1
 EPS1
+        2.28E-01

 ********************                              NUTS BAYESIAN ANALYSIS                            ********************
 ********************                STANDARD ERROR OF ESTIMATE (From Sample Variance)               ********************

 THETA - VECTOR OF FIXED EFFECTS PARAMETERS   *********
         TH 1      TH 2      TH 3      TH 4      TH 5      TH 6      TH 7      TH 8
         4.07E-02  5.11E-02  1.66E-01  2.10E-01  1.11E-01  1.38E-01  5.99E-02  7.46E-02

 OMEGA - COV MATRIX FOR RANDOM EFFECTS - ETAS  ********
         ETA1      ETA2
 ETA1
+        1.07E-02
 ETA2
+        8.61E-03  1.53E-02

 SIGMA - COV MATRIX FOR RANDOM EFFECTS - EPSILONS  ****
         EPS1
 EPS1
+        7.02E-03

 OMEGA - CORR MATRIX FOR RANDOM EFFECTS - ETAS  *******
         ETA1      ETA2
 ETA1
+        2.86E-02
 ETA2
+        2.02E-01  3.28E-02

 SIGMA - CORR MATRIX FOR RANDOM EFFECTS - EPSILONS  ***
         EPS1
 EPS1
+        1.52E-02

 ********************                              NUTS BAYESIAN ANALYSIS                            ********************
 ********************               COVARIANCE MATRIX OF ESTIMATE (From Sample Variance)             ********************

            TH 1      TH 2      TH 3      TH 4      TH 5      TH 6      TH 7      TH 8      OM11      OM12      OM22      SG11
 TH 1
+        1.66E-03
 TH 2
+        2.97E-04  2.61E-03
 TH 3
+       -9.54E-04 -1.10E-05  2.76E-02
 TH 4
+       -2.24E-04 -2.15E-03  3.30E-03  4.39E-02
 TH 5
+        3.56E-04  2.59E-04 -2.46E-03 -1.05E-03  1.23E-02
 TH 6
+       -8.81E-05  5.39E-05 -2.98E-04 -3.84E-03  1.43E-03  1.91E-02
 TH 7
+       -1.47E-03 -1.60E-04 -2.21E-03 -1.93E-04  9.77E-04  2.31E-05  3.59E-03
 TH 8
+       -1.36E-04 -2.33E-03 -9.08E-04 -3.55E-03 -2.78E-04  1.13E-03  1.49E-04  5.56E-03
 OM11
+       -2.24E-05 -1.15E-05 -2.57E-05  1.26E-04  9.08E-05  1.90E-05  4.67E-05 -2.05E-05  1.15E-04
 OM12
+        3.07E-05  3.26E-06  9.36E-05  6.54E-05  6.31E-05 -3.42E-05 -1.20E-05 -2.77E-05  8.20E-06  7.41E-05
 OM22
+       -3.01E-05  4.56E-06 -6.37E-05  1.20E-04 -2.66E-05 -3.39E-05  4.37E-05 -6.16E-05  4.64E-06  1.63E-05  2.35E-04
 SG11
+        2.76E-05  2.34E-05 -3.48E-06 -3.06E-05 -4.09E-05  3.27E-05 -2.66E-05  2.89E-05 -2.01E-05 -5.29E-06 -2.20E-05  4.93E-05

 ********************                              NUTS BAYESIAN ANALYSIS                            ********************
 ********************              CORRELATION MATRIX OF ESTIMATE (From Sample Variance)             ********************

            TH 1      TH 2      TH 3      TH 4      TH 5      TH 6      TH 7      TH 8      OM11      OM12      OM22      SG11
 TH 1
+        4.07E-02
 TH 2
+        1.43E-01  5.11E-02
 TH 3
+       -1.41E-01 -1.30E-03  1.66E-01
 TH 4
+       -2.62E-02 -2.01E-01  9.47E-02  2.10E-01
 TH 5
+        7.89E-02  4.56E-02 -1.33E-01 -4.53E-02  1.11E-01
 TH 6
+       -1.56E-02  7.63E-03 -1.30E-02 -1.32E-01  9.29E-02  1.38E-01
 TH 7
+       -6.01E-01 -5.22E-02 -2.22E-01 -1.54E-02  1.47E-01  2.79E-03  5.99E-02
 TH 8
+       -4.48E-02 -6.12E-01 -7.33E-02 -2.27E-01 -3.36E-02  1.10E-01  3.33E-02  7.46E-02
 OM11
+       -5.13E-02 -2.11E-02 -1.45E-02  5.59E-02  7.63E-02  1.28E-02  7.27E-02 -2.57E-02  1.07E-02
 OM12
+        8.77E-02  7.41E-03  6.55E-02  3.62E-02  6.60E-02 -2.87E-02 -2.33E-02 -4.32E-02  8.89E-02  8.61E-03
 OM22
+       -4.83E-02  5.83E-03 -2.50E-02  3.73E-02 -1.57E-02 -1.60E-02  4.77E-02 -5.40E-02  2.82E-02  1.24E-01  1.53E-02
 SG11
+        9.66E-02  6.52E-02 -2.98E-03 -2.08E-02 -5.24E-02  3.36E-02 -6.33E-02  5.51E-02 -2.67E-01 -8.75E-02 -2.04E-01  7.02E-03
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
 ********************                              NUTS BAYESIAN ANALYSIS                            ********************
 ********************           EIGENVALUES OF COR MATRIX OF ESTIMATE (From Sample Variance)         ********************

             1         2         3         4         5         6         7         8         9        10        11        12
         2.44E-01  2.89E-01  6.58E-01  7.82E-01  8.89E-01  9.61E-01  1.01E+00  1.07E+00  1.32E+00  1.39E+00  1.60E+00  1.79E+00
 Elapsed postprocess time in seconds:     0.02
 Elapsed finaloutput time in seconds:     0.20
 #CPUT: Total CPU Time in Seconds,       24.009
