Tue 03/12/2019
09:23 AM
$PROB  AD3TR4_loqb
$INPUT  C SET ID JID TIME CONC AMT RATE EVID MDV CMT DV

$DATA  ad3tr4.csv IGNORE = C
$SUBROUTINES ADVAN3 TRANS4

$PK
MU_1 = THETA(1)
MU_2 = THETA(2)
MU_3 = THETA(3)
MU_4 = THETA(4)
CL = EXP(MU_1 + ETA(1))
V1 = EXP(MU_2 + ETA(2))
Q = EXP(MU_3 + ETA(3))
V2 = EXP(MU_4 + ETA(4))
S1=V1

$ERROR
IEPRED=A(1)/S1
LLOQ=-3.5
SD = THETA(5)

DEL=1.0E-30
; The following coding for LOG() prevents numerical errors from occuring when F<=0
; DEL can be 10E-10 or smaller
IPRED = LOG(ABS(IEPRED)+DEL)
IF(COMACT==1) PREDV=IPRED
DUM = (LLOQ - IPRED) / SD
; Adding DEL to CUMD prevents it from becoming 0, which is not good when NONMEM evaluates -2*LOG(CUMD)
CUMD = PHI(DUM)+DEL
TYPE=1
IF(DV<LLOQ) TYPE=2
IF(MDV==1) TYPE=0
IF(TYPE.EQ.2) DV_LOQ=LLOQ
IF (TYPE .NE. 2.OR.NPDE_MODE==1) THEN
      F_FLAG = 0
      Y = IPRED + SD * ERR(1)
ENDIF
IF (TYPE .EQ. 2.AND.NPDE_MODE==0) THEN
      F_FLAG = 1
      Y = CUMD
      MDVRES=1
ENDIF

$THETA
( 2.0) ;[LN(CL)]
(2.0) ;[LN(V1)]
( 2.0) ;[LN(Q)]
( 2.0) ;[LN(V2)]
 0.2
;INITIAL values of OMEGA
$OMEGA BLOCK(4)
0.15   ;[P]
0.01  ;[F]
0.15   ;[P]
0.01  ;[F]
0.01  ;[F]
0.15   ;[P]
0.01  ;[F]
0.01  ;[F]
0.01  ;[F]
0.15   ;[P]
;Initial value of SIGMA
$SIGMA
1.0 FIXED   ;[P]

$EST METHOD=COND INTERACTION LAPLACE MAXEVAL=9999 NSIG=3 PRINT=5 NOABORT SIGL=10 MCETA=10
$COV MATRIX=S PRINT=E UNCONDITIONAL
$TABLE ID TIME DV IPRED TYPE PRED PREDV CWRES NPDE CIWRES NOAPPEND ONEHEADER ESAMPLE=1000
 FILE=ad3tr4_loqb_lap.tab NOPRINT

NM-TRAN MESSAGES
 WARNINGS AND ERRORS (IF ANY) FOR PROBLEM    1
 (WARNING  2) NM-TRAN INFERS THAT THE DATA ARE POPULATION.
 (WARNING  3) THERE MAY BE AN ERROR IN THE ABBREVIATED CODE. THE FOLLOWING
 ONE OR MORE RANDOM VARIABLES ARE DEFINED WITH "IF" STATEMENTS THAT DO NOT
 PROVIDE DEFINITIONS FOR BOTH THE "THEN" AND "ELSE" CASES. IF ALL
 CONDITIONS FAIL, THE VALUES OF THESE VARIABLES WILL BE ZERO.
   Y
 (WARNING  87) WITH "LAPLACIAN" AND "INTERACTION", "NUMERICAL" AND "SLOW"
 ARE ALSO REQUIRED ON $ESTIM RECORD, AND "SLOW" IS REQUIRED ON $COV
 RECORD. NM-TRAN HAS SUPPLIED THESE OPTIONS.
 (WARNING  26) THE DERIVATIVE OF THE ABSOLUTE VALUE OF A RANDOM VARIABLE IS
 BEING COMPUTED. IF THE ABSOLUTE VALUE AFFECTS THE VALUE OF THE OBJECTIVE
 FUNCTION, THE USER SHOULD ENSURE THAT THE RANDOM VARIABLE IS ALWAYS
 POSITIVE OR ALWAYS NEGATIVE.

1NONLINEAR MIXED EFFECTS MODEL PROGRAM (NONMEM) VERSION 7.4.3
 ORIGINALLY DEVELOPED BY STUART BEAL, LEWIS SHEINER, AND ALISON BOECKMANN
 CURRENT DEVELOPERS ARE ROBERT BAUER, ICON DEVELOPMENT SOLUTIONS,
 AND ALISON BOECKMANN. IMPLEMENTATION, EFFICIENCY, AND STANDARDIZATION
 PERFORMED BY NOUS INFOSYSTEMS.
 PROBLEM NO.:         1
 AD3TR4_loqb
 TOT. NO. OF OBS RECS:      500
 TOT. NO. OF INDIVIDUALS:      100
 TWO COMPARTMENT MODEL (ADVAN3)
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 #TBLN:      1
 #METH: Laplacian Conditional Estimation with Interaction
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
 #TERM:
0MINIMIZATION TERMINATED
 DUE TO ROUNDING ERRORS (ERROR=134)
 NO. OF FUNCTION EVALUATIONS USED:      633
 NO. OF SIG. DIGITS UNREPORTABLE

 ETABAR IS THE ARITHMETIC MEAN OF THE ETA-ESTIMATES,
 AND THE P-VALUE IS GIVEN FOR THE NULL HYPOTHESIS THAT THE TRUE MEAN IS 0.

 ETABAR:        -1.8936E-03  1.5013E-03 -1.3674E-02 -9.4456E-03
 SE:             3.8757E-02  2.2878E-02  1.2884E-02  2.5121E-02
 N:                     100         100         100         100

 P VAL.:         9.6103E-01  9.4768E-01  2.8852E-01  7.0691E-01

 ETASHRINKSD(%)  5.5906E+00  2.6436E+01  4.9033E+01  4.0135E+01
 ETASHRINKVR(%)  1.0869E+01  4.5884E+01  7.4023E+01  6.4162E+01
 EBVSHRINKSD(%)  5.0974E+00  1.0000E+02  1.0000E+02  5.7211E+01
 EBVSHRINKVR(%)  9.9350E+00  1.0000E+02  1.0000E+02  8.1691E+01
 EPSSHRINKSD(%)  2.6385E+01
 EPSSHRINKVR(%)  4.5808E+01


 TOTAL DATA POINTS NORMALLY DISTRIBUTED (N):          396
 N*LOG(2PI) CONSTANT TO OBJECTIVE FUNCTION:    727.799318298101
 OBJECTIVE FUNCTION VALUE WITHOUT CONSTANT:   -131.093869350157
 OBJECTIVE FUNCTION VALUE WITH CONSTANT:       596.705448947944
 REPORTED OBJECTIVE FUNCTION DOES NOT CONTAIN CONSTANT

 TOTAL EFFECTIVE ETAS (NIND*NETA):                           400


 #TERE:
 Elapsed estimation  time in seconds:    10.36
 Elapsed covariance  time in seconds:     0.73
 Elapsed postprocess time in seconds:     0.63

 ********************                LAPLACIAN CONDITIONAL ESTIMATION WITH INTERACTION               ********************
 #OBJT:**************                       MINIMUM VALUE OF OBJECTIVE FUNCTION                      ********************
 #OBJV:********************************************     -131.094       **************************************************

 ********************                LAPLACIAN CONDITIONAL ESTIMATION WITH INTERACTION               ********************
 ********************                             FINAL PARAMETER ESTIMATE                           ********************

 THETA - VECTOR OF FIXED EFFECTS PARAMETERS   *********
         TH 1      TH 2      TH 3      TH 4      TH 5
         1.70E+00  1.65E+00  8.09E-01  2.45E+00  2.92E-01

 OMEGA - COV MATRIX FOR RANDOM EFFECTS - ETAS  ********
         ETA1      ETA2      ETA3      ETA4
 ETA1
+        1.70E-01
 ETA2
+       -4.46E-03  9.77E-02
 ETA3
+       -1.97E-02 -2.52E-02  6.45E-02
 ETA4
+       -7.23E-03  1.19E-02  3.73E-02  1.78E-01

 SIGMA - COV MATRIX FOR RANDOM EFFECTS - EPSILONS  ****
         EPS1
 EPS1
+        1.00E+00

 OMEGA - CORR MATRIX FOR RANDOM EFFECTS - ETAS  *******
         ETA1      ETA2      ETA3      ETA4
 ETA1
+        4.13E-01
 ETA2
+       -3.46E-02  3.13E-01
 ETA3
+       -1.88E-01 -3.17E-01  2.54E-01
 ETA4
+       -4.16E-02  9.04E-02  3.48E-01  4.22E-01

 SIGMA - CORR MATRIX FOR RANDOM EFFECTS - EPSILONS  ***
         EPS1
 EPS1
+        1.00E+00

 ********************                LAPLACIAN CONDITIONAL ESTIMATION WITH INTERACTION               ********************
 ********************                            STANDARD ERROR OF ESTIMATE                          ********************

 THETA - VECTOR OF FIXED EFFECTS PARAMETERS   *********
         TH 1      TH 2      TH 3      TH 4      TH 5
         4.90E-02  5.06E-02  7.02E-02  8.00E-02  2.21E-02

 OMEGA - COV MATRIX FOR RANDOM EFFECTS - ETAS  ********
         ETA1      ETA2      ETA3      ETA4
 ETA1
+        3.10E-02
 ETA2
+        2.29E-02  1.30E-02
 ETA3
+        2.90E-02  3.49E-02  4.95E-02
 ETA4
+        3.53E-02  3.31E-02  5.43E-02  6.99E-02

 SIGMA - COV MATRIX FOR RANDOM EFFECTS - EPSILONS  ****
         EPS1
 EPS1
+       .........

 OMEGA - CORR MATRIX FOR RANDOM EFFECTS - ETAS  *******
         ETA1      ETA2      ETA3      ETA4
 ETA1
+        3.76E-02
 ETA2
+        1.78E-01  2.07E-02
 ETA3
+        3.11E-01  4.81E-01  9.75E-02
 ETA4
+        2.03E-01  2.47E-01  3.72E-01  8.29E-02

 SIGMA - CORR MATRIX FOR RANDOM EFFECTS - EPSILONS  ***
         EPS1
 EPS1
+       .........

 ********************                LAPLACIAN CONDITIONAL ESTIMATION WITH INTERACTION               ********************
 ********************                          COVARIANCE MATRIX OF ESTIMATE                         ********************

            TH 1      TH 2      TH 3      TH 4      TH 5      OM11      OM12      OM13      OM14      OM22      OM23      OM24
             OM33      OM34      OM44      SG11
 TH 1
+        2.40E-03
 TH 2
+        3.62E-04  2.56E-03
 TH 3
+       -5.48E-05 -9.33E-04  4.93E-03
 TH 4
+        2.07E-04  7.23E-04  2.54E-03  6.40E-03
 TH 5
+       -9.71E-05  1.60E-04 -3.41E-04 -2.70E-04  4.88E-04
 OM11
+       -1.60E-04  1.07E-04  2.35E-04 -9.59E-06 -7.72E-05  9.63E-04
 OM12
+        1.86E-04  1.35E-04  1.81E-04  2.68E-04 -1.62E-04  2.71E-04  5.24E-04
 OM13
+        3.73E-05  4.15E-05 -3.98E-04 -1.50E-04 -1.29E-04 -3.57E-05  1.41E-04  8.40E-04
 OM14
+       -4.53E-05  1.38E-04 -6.63E-05  8.94E-04 -1.52E-04  1.63E-04  3.41E-04  5.07E-04  1.24E-03
 OM22
+        1.57E-06 -1.20E-04 -1.94E-05 -2.29E-04  1.59E-05 -3.46E-05 -7.29E-05  1.22E-04 -9.79E-06  1.68E-04
 OM23
+       -8.10E-05 -3.47E-04  7.63E-04  4.14E-04 -1.99E-04  2.00E-04  1.29E-05 -1.00E-04 -4.53E-05 -5.44E-05  1.22E-03
 OM24
+       -1.94E-04 -2.82E-04  8.00E-04  2.38E-04 -6.75E-05  1.78E-04  4.03E-05  3.96E-05 -2.48E-05  4.96E-05  6.46E-04  1.10E-03
 OM33
+       -3.45E-04 -5.26E-04  8.39E-04  8.68E-06 -4.40E-04  6.36E-06  6.41E-05  5.38E-04  1.36E-05 -9.23E-05  4.31E-04  2.41E-04
          2.45E-03
 OM34
+       -2.38E-04 -1.22E-04  3.45E-04  1.25E-04 -3.31E-04  1.78E-05 -2.41E-05  2.72E-04 -1.79E-04 -4.27E-04  6.89E-04  1.17E-04
          2.09E-03  2.95E-03
 OM44
+       -1.56E-04 -4.16E-04  7.44E-04 -3.53E-04 -4.08E-04  4.92E-05 -9.72E-05  2.26E-04 -4.79E-05 -1.92E-04  7.00E-04  5.43E-04
          1.77E-03  2.45E-03  4.89E-03
 SG11
+       ......... ......... ......... ......... ......... ......... ......... ......... ......... ......... ......... .........
         ......... ......... ......... .........

 ********************                LAPLACIAN CONDITIONAL ESTIMATION WITH INTERACTION               ********************
 ********************                          CORRELATION MATRIX OF ESTIMATE                        ********************

            TH 1      TH 2      TH 3      TH 4      TH 5      OM11      OM12      OM13      OM14      OM22      OM23      OM24
             OM33      OM34      OM44      SG11
 TH 1
+        4.90E-02
 TH 2
+        1.46E-01  5.06E-02
 TH 3
+       -1.59E-02 -2.63E-01  7.02E-02
 TH 4
+        5.29E-02  1.78E-01  4.52E-01  8.00E-02
 TH 5
+       -8.97E-02  1.44E-01 -2.19E-01 -1.53E-01  2.21E-02
 OM11
+       -1.05E-01  6.80E-02  1.08E-01 -3.86E-03 -1.13E-01  3.10E-02
 OM12
+        1.66E-01  1.16E-01  1.13E-01  1.46E-01 -3.20E-01  3.81E-01  2.29E-02
 OM13
+        2.62E-02  2.83E-02 -1.95E-01 -6.46E-02 -2.02E-01 -3.96E-02  2.12E-01  2.90E-02
 OM14
+       -2.62E-02  7.74E-02 -2.68E-02  3.17E-01 -1.96E-01  1.49E-01  4.22E-01  4.96E-01  3.53E-02
 OM22
+        2.46E-03 -1.82E-01 -2.13E-02 -2.21E-01  5.56E-02 -8.60E-02 -2.46E-01  3.25E-01 -2.14E-02  1.30E-02
 OM23
+       -4.74E-02 -1.97E-01  3.11E-01  1.48E-01 -2.59E-01  1.85E-01  1.61E-02 -9.90E-02 -3.69E-02 -1.20E-01  3.49E-02
 OM24
+       -1.20E-01 -1.68E-01  3.44E-01  9.00E-02 -9.23E-02  1.73E-01  5.32E-02  4.13E-02 -2.13E-02  1.16E-01  5.60E-01  3.31E-02
 OM33
+       -1.42E-01 -2.10E-01  2.41E-01  2.19E-03 -4.02E-01  4.14E-03  5.66E-02  3.75E-01  7.77E-03 -1.44E-01  2.49E-01  1.47E-01
          4.95E-02
 OM34
+       -8.94E-02 -4.43E-02  9.05E-02  2.88E-02 -2.76E-01  1.05E-02 -1.94E-02  1.73E-01 -9.37E-02 -6.06E-01  3.64E-01  6.53E-02
          7.79E-01  5.43E-02
 OM44
+       -4.56E-02 -1.18E-01  1.52E-01 -6.32E-02 -2.64E-01  2.26E-02 -6.07E-02  1.12E-01 -1.94E-02 -2.11E-01  2.87E-01  2.35E-01
          5.10E-01  6.44E-01  6.99E-02
 SG11
+       ......... ......... ......... ......... ......... ......... ......... ......... ......... ......... ......... .........
         ......... ......... ......... .........
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
 ********************                LAPLACIAN CONDITIONAL ESTIMATION WITH INTERACTION               ********************
 ********************                      EIGENVALUES OF COR MATRIX OF ESTIMATE                     ********************

             1         2         3         4         5         6         7         8         9        10        11        12
             13        14        15
         6.93E-08  1.70E-01  2.32E-01  2.95E-01  4.88E-01  5.42E-01  6.13E-01  6.75E-01  9.49E-01  1.05E+00  1.21E+00  1.67E+00
          1.82E+00  2.07E+00  3.22E+00
 Elapsed finaloutput time in seconds:     0.05
 #CPUT: Total CPU Time in Seconds,       11.045
