Wed 03/06/2019
10:34 PM
$PROB RUN# from r2compl, using FAST
$INPUT C SET ID JID TIME DV AMT RATE EVID MDV CMT
$DATA r2comp.csv IGNORE=C

; The new numerical integration solver is used, although ADVAN=9 is also efficient
; for this problem.
$SUBROUTINES ADVAN13 TRANS1 TOL=9
$MODEL NCOMPARTMENTS=3

$PK
MU_1=THETA(1)
MU_2=THETA(2)
MU_3=THETA(3)
MU_4=THETA(4)
MU_5=THETA(5)
MU_6=THETA(6)
MU_7=THETA(7)
MU_8=THETA(8)
VC=EXP(MU_1+ETA(1))
K10=EXP(MU_2+ETA(2))
K12=EXP(MU_3+ETA(3))
K21=EXP(MU_4+ETA(4))
VM=EXP(MU_5+ETA(5))
KMC=EXP(MU_6+ETA(6))
K03=EXP(MU_7+ETA(7))
K30=EXP(MU_8+ETA(8))
S3=VC
S1=VC
KM=KMC*S1
A_0(3)=K03/K30

$DES
DADT(1) = -(K10+K12)*A(1) + K21*A(2) - VM*A(1)*A(3)/(A(1)+KM)
DADT(2) = K12*A(1) - K21*A(2)
DADT(3) =  -(VM-K30)*A(1)*A(3)/(A(1)+KM) - K30*A(3) + K03

$ERROR
ETYPE=1
IF(CMT.NE.1) ETYPE=0
CP=A(1)/S1
CR=A(3)/S3
IPRE=CP
IF(CMT.NE.1) IPRE=CR
Y = IPRE + IPRE*ETYPE*EPS(1) + IPRE*(1.0-ETYPE)*EPS(2)

$THETA
;Initial Thetas
( 4.0 )  ;[LN(VC)]
( -3.1 ) ;[LN(K10)]
( 0.5 )  ;[LN(K12)]
( -0.2 );[LN(K21)]
( 3.2 ) ;[LN(VM)]
( 0.01 )  ;[LN(KMC)]
( 4.0 )  ;[LN(K03)]
( -0.1) ;[LN(K30)]

;Initial Omegas
$OMEGA BLOCK(8) VALUES(0.5,0.01) ;[P]

$SIGMA
0.1 ;[p]
0.1 ;[p]

$EST METHOD=1 INTERACTION PRINT=1 NOHABORT NOPRIOR=1 SIGL=9 ATOL=9 MAXEVAL=9999 NSIG=3 MCETA=1
     NOTHETABOUNDTEST NOOMEGABOUNDTEST NOSIGMABOUNDTEST
$COV MATRIX=R UNCONDITIONAL PRINT=E

NM-TRAN MESSAGES
 WARNINGS AND ERRORS (IF ANY) FOR PROBLEM    1
 (WARNING  2) NM-TRAN INFERS THAT THE DATA ARE POPULATION.

1NONLINEAR MIXED EFFECTS MODEL PROGRAM (NONMEM) VERSION 7.4.3
 ORIGINALLY DEVELOPED BY STUART BEAL, LEWIS SHEINER, AND ALISON BOECKMANN
 CURRENT DEVELOPERS ARE ROBERT BAUER, ICON DEVELOPMENT SOLUTIONS,
 AND ALISON BOECKMANN. IMPLEMENTATION, EFFICIENCY, AND STANDARDIZATION
 PERFORMED BY NOUS INFOSYSTEMS.
 PROBLEM NO.:         1
 RUN# from r2compl, using FAST
 TOT. NO. OF OBS RECS:     1568
 TOT. NO. OF INDIVIDUALS:       50
 GENERAL NONLINEAR KINETICS MODEL WITH STIFF/NONSTIFF EQUATIONS (LSODA, ADVAN13)
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 #TBLN:      1
 #METH: First Order Conditional Estimation with Interaction (No Prior)
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
 #TERM:
0MINIMIZATION TERMINATED
 DUE TO MAX. NO. OF FUNCTION EVALUATIONS EXCEEDED
 NO. OF FUNCTION EVALUATIONS USED:    10058
 NO. OF SIG. DIGITS UNREPORTABLE

 ETABAR IS THE ARITHMETIC MEAN OF THE ETA-ESTIMATES,
 AND THE P-VALUE IS GIVEN FOR THE NULL HYPOTHESIS THAT THE TRUE MEAN IS 0.

 ETABAR:        -2.5065E-03  2.3849E-03  2.4601E-03 -1.1042E-03  2.6774E-03 -1.7534E-03 -3.6473E-05 -5.4793E-04
 SE:             6.9266E-02  5.7762E-02  3.7534E-02  6.6521E-02  5.4908E-02  5.7533E-02  6.4590E-02  5.8762E-02
 N:                      50          50          50          50          50          50          50          50

 P VAL.:         9.7113E-01  9.6707E-01  9.4774E-01  9.8676E-01  9.6111E-01  9.7569E-01  9.9955E-01  9.9256E-01

 ETASHRINKSD(%)  1.0000E-10  2.8779E+00  9.5411E+00  1.4547E+00  6.6506E-01  4.8087E+00  1.0000E-10  6.7558E-01
 ETASHRINKVR(%)  1.0000E-10  5.6730E+00  1.8172E+01  2.8882E+00  1.3257E+00  9.3862E+00  1.0000E-10  1.3466E+00
 EBVSHRINKSD(%)  6.5944E-01  3.8184E+00  1.0038E+01  2.0884E+00  1.5007E+00  5.5462E+00  3.2995E-01  1.8254E+00
 EBVSHRINKVR(%)  1.3145E+00  7.4909E+00  1.9068E+01  4.1333E+00  2.9789E+00  1.0785E+01  6.5882E-01  3.6175E+00
 EPSSHRINKSD(%)  1.5733E+01  7.1309E+00
 EPSSHRINKVR(%)  2.8990E+01  1.3753E+01


 TOTAL DATA POINTS NORMALLY DISTRIBUTED (N):         1568
 N*LOG(2PI) CONSTANT TO OBJECTIVE FUNCTION:    2881.79124012985
 OBJECTIVE FUNCTION VALUE WITHOUT CONSTANT:   -4702.75923779274
 OBJECTIVE FUNCTION VALUE WITH CONSTANT:      -1820.96799766289
 REPORTED OBJECTIVE FUNCTION DOES NOT CONTAIN CONSTANT

 TOTAL EFFECTIVE ETAS (NIND*NETA):                           400


 #TERE:
 Elapsed estimation  time in seconds: 23776.76
 Elapsed covariance  time in seconds:  1202.29
 Elapsed postprocess time in seconds:     0.00

 ********************          FIRST ORDER CONDITIONAL ESTIMATION WITH INTERACTION (NO PRIOR)        ********************
 #OBJT:**************                       MINIMUM VALUE OF OBJECTIVE FUNCTION                      ********************
 #OBJV:********************************************    -4702.759       **************************************************

 ********************          FIRST ORDER CONDITIONAL ESTIMATION WITH INTERACTION (NO PRIOR)        ********************
 ********************                             FINAL PARAMETER ESTIMATE                           ********************

 THETA - VECTOR OF FIXED EFFECTS PARAMETERS   *********
         TH 1      TH 2      TH 3      TH 4      TH 5      TH 6      TH 7      TH 8
         3.89E+00 -2.23E+00  5.87E-01 -1.69E-01  2.31E+00  2.67E-01  3.66E+00 -7.21E-01

 OMEGA - COV MATRIX FOR RANDOM EFFECTS - ETAS  ********
         ETA1      ETA2      ETA3      ETA4      ETA5      ETA6      ETA7      ETA8
 ETA1
+        2.43E-01
 ETA2
+       -4.18E-02  1.80E-01
 ETA3
+        4.68E-02 -2.11E-02  8.78E-02
 ETA4
+        2.92E-02  6.30E-02 -6.27E-03  2.32E-01
 ETA5
+        3.21E-02  2.86E-02 -3.29E-03 -3.17E-02  1.56E-01
 ETA6
+       -2.30E-02  1.16E-02  2.57E-02  1.98E-02 -8.20E-02  1.86E-01
 ETA7
+        2.76E-02 -5.61E-02  2.54E-02 -7.80E-02  3.24E-02  5.81E-03  2.11E-01
 ETA8
+        9.19E-02  8.01E-02  4.07E-02  4.35E-02  1.14E-02 -4.64E-02  4.52E-02  1.79E-01

 SIGMA - COV MATRIX FOR RANDOM EFFECTS - EPSILONS  ****
         EPS1      EPS2
 EPS1
+        9.42E-03
 EPS2
+        0.00E+00  2.27E-02

 OMEGA - CORR MATRIX FOR RANDOM EFFECTS - ETAS  *******
         ETA1      ETA2      ETA3      ETA4      ETA5      ETA6      ETA7      ETA8
 ETA1
+        4.93E-01
 ETA2
+       -1.99E-01  4.25E-01
 ETA3
+        3.20E-01 -1.67E-01  2.96E-01
 ETA4
+        1.23E-01  3.08E-01 -4.38E-02  4.82E-01
 ETA5
+        1.65E-01  1.71E-01 -2.81E-02 -1.66E-01  3.95E-01
 ETA6
+       -1.08E-01  6.33E-02  2.01E-01  9.53E-02 -4.81E-01  4.32E-01
 ETA7
+        1.22E-01 -2.87E-01  1.86E-01 -3.52E-01  1.79E-01  2.93E-02  4.59E-01
 ETA8
+        4.41E-01  4.46E-01  3.25E-01  2.14E-01  6.84E-02 -2.55E-01  2.33E-01  4.23E-01

 SIGMA - CORR MATRIX FOR RANDOM EFFECTS - EPSILONS  ***
         EPS1      EPS2
 EPS1
+        9.71E-02
 EPS2
+        0.00E+00  1.51E-01

 ********************          FIRST ORDER CONDITIONAL ESTIMATION WITH INTERACTION (NO PRIOR)        ********************
 ********************                            STANDARD ERROR OF ESTIMATE                          ********************

 THETA - VECTOR OF FIXED EFFECTS PARAMETERS   *********
         TH 1      TH 2      TH 3      TH 4      TH 5      TH 6      TH 7      TH 8
         7.05E-02  7.27E-02  4.98E-02  7.05E-02  5.76E-02  6.84E-02  6.56E-02  6.15E-02

 OMEGA - COV MATRIX FOR RANDOM EFFECTS - ETAS  ********
         ETA1      ETA2      ETA3      ETA4      ETA5      ETA6      ETA7      ETA8
 ETA1
+        4.96E-02
 ETA2
+        3.49E-02  4.99E-02
 ETA3
+        2.46E-02  2.32E-02  2.46E-02
 ETA4
+        3.50E-02  3.58E-02  2.57E-02  5.11E-02
 ETA5
+        2.90E-02  2.67E-02  1.98E-02  2.89E-02  3.31E-02
 ETA6
+        3.40E-02  3.20E-02  2.30E-02  3.41E-02  2.95E-02  4.77E-02
 ETA7
+        3.29E-02  3.55E-02  2.25E-02  3.42E-02  2.73E-02  3.17E-02  4.31E-02
 ETA8
+        3.32E-02  3.05E-02  2.22E-02  3.11E-02  2.52E-02  3.01E-02  2.93E-02  3.80E-02

 SIGMA - COV MATRIX FOR RANDOM EFFECTS - EPSILONS  ****
         EPS1      EPS2
 EPS1
+        6.41E-04
 EPS2
+       .........  1.22E-03

 OMEGA - CORR MATRIX FOR RANDOM EFFECTS - ETAS  *******
         ETA1      ETA2      ETA3      ETA4      ETA5      ETA6      ETA7      ETA8
 ETA1
+        5.03E-02
 ETA2
+        1.54E-01  5.87E-02
 ETA3
+        1.51E-01  1.81E-01  4.16E-02
 ETA4
+        1.44E-01  1.51E-01  1.80E-01  5.30E-02
 ETA5
+        1.44E-01  1.55E-01  1.69E-01  1.46E-01  4.19E-02
 ETA6
+        1.59E-01  1.75E-01  1.77E-01  1.62E-01  1.38E-01  5.53E-02
 ETA7
+        1.42E-01  1.56E-01  1.60E-01  1.29E-01  1.42E-01  1.60E-01  4.70E-02
 ETA8
+        1.20E-01  1.37E-01  1.48E-01  1.42E-01  1.50E-01  1.52E-01  1.38E-01  4.49E-02

 SIGMA - CORR MATRIX FOR RANDOM EFFECTS - EPSILONS  ***
         EPS1      EPS2
 EPS1
+        3.30E-03
 EPS2
+       .........  4.06E-03
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
 ********************          FIRST ORDER CONDITIONAL ESTIMATION WITH INTERACTION (NO PRIOR)        ********************
 ********************                      EIGENVALUES OF COR MATRIX OF ESTIMATE                     ********************

             1         2         3         4         5         6         7         8         9        10        11        12
             13        14        15        16        17        18        19        20        21        22        23        24
            25        26        27        28        29        30        31        32        33        34        35        36
             37        38        39        40        41        42        43        44        45        46
         1.62E-02  7.77E-02  8.43E-02  1.11E-01  1.25E-01  1.41E-01  2.07E-01  2.66E-01  2.77E-01  3.24E-01  3.45E-01  3.79E-01
          4.57E-01  4.69E-01  4.84E-01  5.05E-01  5.52E-01  6.11E-01  6.23E-01  6.88E-01  7.06E-01  7.30E-01  8.07E-01  8.57E-01
         9.20E-01  9.51E-01  9.59E-01  9.80E-01  9.92E-01  1.06E+00  1.17E+00  1.21E+00  1.27E+00  1.28E+00  1.33E+00  1.39E+00
          1.53E+00  1.62E+00  1.71E+00  1.86E+00  1.88E+00  2.37E+00  2.46E+00  2.78E+00  3.06E+00  3.35E+00
 Elapsed finaloutput time in seconds:     0.05
 #CPUT: Total CPU Time in Seconds,    24892.004
