Tue 03/12/2019
10:54 AM
$PROB RUN# r2compl Indirect Response Model (r2complb.ctl)
$INPUT C SET ID JID TIME DV=CONC DOSE=AMT RATE EVID MDV CMT
$DATA r2comp.csv IGNORE=C

$SUBROUTINES ADVAN13 TRANS1 TOL=6
$MODEL NCOMPARTMENTS=3

$PK
MU_1=THETA(1)
MU_2=THETA(2)
MU_3=THETA(3)
MU_4=THETA(4)
MU_5=THETA(5)
MU_6=THETA(6)
MU_7=THETA(7)
MU_8=THETA(8)
VC=EXP(MU_1+ETA(1))
K10=EXP(MU_2+ETA(2))
K12=EXP(MU_3+ETA(3))
K21=EXP(MU_4+ETA(4))
VM=EXP(MU_5+ETA(5))
KMC=EXP(MU_6+ETA(6))
K03=EXP(MU_7+ETA(7))
K30=EXP(MU_8+ETA(8))
S3=VC
S1=VC
KM=KMC*S1
A_0(3)=K03/K30

$DES
DADT(1) = -(K10+K12)*A(1) + K21*A(2) - VM*A(1)*A(3)/(A(1)+KM)
DADT(2) = K12*A(1) - K21*A(2)
DADT(3) =  -(VM-K30)*A(1)*A(3)/(A(1)+KM) - K30*A(3) + K03

$ERROR
ETYPE=1
IF(CMT.NE.1) ETYPE=0
IF(ETYPE==1) THEN
IPRED=A(1)/S1
Y = IPRED + IPRED*EPS(1)
ELSE
IPRED=A(3)/S3
Y = IPRED + IPRED*EPS(2)
ENDIF

$THETA (1.5)X8

$OMEGA BLOCK(8) VALUES(2.0,0.01) ;[P]

$SIGMA
0.1 ;[p]
0.1 ;[p]

$EST METHOD=IMP INTERACTION AUTO=1 PRINT=1 SIGL=6 MCETA=100
$COV MATRIX=R UNCONDITIONAL

NM-TRAN MESSAGES
 WARNINGS AND ERRORS (IF ANY) FOR PROBLEM    1
 (WARNING  2) NM-TRAN INFERS THAT THE DATA ARE POPULATION.

1NONLINEAR MIXED EFFECTS MODEL PROGRAM (NONMEM) VERSION 7.4.3
 ORIGINALLY DEVELOPED BY STUART BEAL, LEWIS SHEINER, AND ALISON BOECKMANN
 CURRENT DEVELOPERS ARE ROBERT BAUER, ICON DEVELOPMENT SOLUTIONS,
 AND ALISON BOECKMANN. IMPLEMENTATION, EFFICIENCY, AND STANDARDIZATION
 PERFORMED BY NOUS INFOSYSTEMS.
 PROBLEM NO.:         1
 RUN# r2compl Indirect Response Model (r2complb.ctl)
 TOT. NO. OF OBS RECS:     1568
 TOT. NO. OF INDIVIDUALS:       50
 GENERAL NONLINEAR KINETICS MODEL WITH STIFF/NONSTIFF EQUATIONS (LSODA, ADVAN13)
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 #TBLN:      1
 #METH: Importance Sampling (No Prior)
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
 #TERM:
 OPTIMIZATION WAS COMPLETED

 ETABAR IS THE ARITHMETIC MEAN OF THE ETA-ESTIMATES,
 AND THE P-VALUE IS GIVEN FOR THE NULL HYPOTHESIS THAT THE TRUE MEAN IS 0.

 ETABAR:        -1.1361E-03 -2.4037E-03  5.3893E-03  3.5547E-03  1.1040E-03  7.1996E-05  7.6031E-04  2.6171E-03
 SE:             6.9055E-02  5.7687E-02  3.8095E-02  6.7346E-02  5.5078E-02  5.7198E-02  6.4853E-02  5.8797E-02
 N:                      50          50          50          50          50          50          50          50

 P VAL.:         9.8687E-01  9.6676E-01  8.8750E-01  9.5791E-01  9.8401E-01  9.9900E-01  9.9065E-01  9.6450E-01

 ETASHRINKSD(%)  9.3583E-01  3.4684E+00  1.0850E+01  1.7183E+00  1.5152E+00  6.1224E+00  4.2109E-01  2.0263E+00
 ETASHRINKVR(%)  1.8629E+00  6.8165E+00  2.0522E+01  3.4070E+00  3.0074E+00  1.1870E+01  8.4040E-01  4.0115E+00
 EBVSHRINKSD(%)  6.7427E-01  4.1328E+00  1.0072E+01  2.1806E+00  1.5922E+00  5.8291E+00  3.5321E-01  1.8304E+00
 EBVSHRINKVR(%)  1.3440E+00  8.0948E+00  1.9129E+01  4.3137E+00  3.1590E+00  1.1318E+01  7.0517E-01  3.6272E+00
 EPSSHRINKSD(%)  1.6298E+01  7.2334E+00
 EPSSHRINKVR(%)  2.9941E+01  1.3944E+01


 TOTAL DATA POINTS NORMALLY DISTRIBUTED (N):         1568
 N*LOG(2PI) CONSTANT TO OBJECTIVE FUNCTION:    2881.79124012985
 OBJECTIVE FUNCTION VALUE WITHOUT CONSTANT:   -4706.23274334490
 OBJECTIVE FUNCTION VALUE WITH CONSTANT:      -1824.44150321505
 REPORTED OBJECTIVE FUNCTION DOES NOT CONTAIN CONSTANT

 TOTAL EFFECTIVE ETAS (NIND*NETA):                           400


 #TERE:
 Elapsed estimation  time in seconds:   238.73
 Elapsed covariance  time in seconds:     6.56

 ********************                          IMPORTANCE SAMPLING (NO PRIOR)                        ********************
 #OBJT:**************                        FINAL VALUE OF OBJECTIVE FUNCTION                       ********************
 #OBJV:********************************************    -4706.233       **************************************************

 ********************                          IMPORTANCE SAMPLING (NO PRIOR)                        ********************
 ********************                             FINAL PARAMETER ESTIMATE                           ********************

 THETA - VECTOR OF FIXED EFFECTS PARAMETERS   *********
         TH 1      TH 2      TH 3      TH 4      TH 5      TH 6      TH 7      TH 8
         3.89E+00 -2.23E+00  5.88E-01 -1.68E-01  2.31E+00  2.71E-01  3.66E+00 -7.25E-01

 OMEGA - COV MATRIX FOR RANDOM EFFECTS - ETAS  ********
         ETA1      ETA2      ETA3      ETA4      ETA5      ETA6      ETA7      ETA8
 ETA1
+        2.48E-01
 ETA2
+       -4.25E-02  1.82E-01
 ETA3
+        4.95E-02 -1.98E-02  9.32E-02
 ETA4
+        3.01E-02  6.64E-02 -3.38E-03  2.40E-01
 ETA5
+        3.30E-02  2.78E-02 -4.46E-03 -3.34E-02  1.60E-01
 ETA6
+       -2.50E-02  8.51E-03  2.55E-02  1.85E-02 -8.24E-02  1.89E-01
 ETA7
+        2.87E-02 -5.70E-02  2.39E-02 -8.21E-02  3.33E-02  7.21E-03  2.16E-01
 ETA8
+        9.27E-02  8.25E-02  4.37E-02  4.36E-02  1.22E-02 -4.82E-02  4.67E-02  1.84E-01

 SIGMA - COV MATRIX FOR RANDOM EFFECTS - EPSILONS  ****
         EPS1      EPS2
 EPS1
+        9.51E-03
 EPS2
+        0.00E+00  2.26E-02

 OMEGA - CORR MATRIX FOR RANDOM EFFECTS - ETAS  *******
         ETA1      ETA2      ETA3      ETA4      ETA5      ETA6      ETA7      ETA8
 ETA1
+        4.98E-01
 ETA2
+       -2.00E-01  4.27E-01
 ETA3
+        3.26E-01 -1.52E-01  3.05E-01
 ETA4
+        1.24E-01  3.18E-01 -2.26E-02  4.89E-01
 ETA5
+        1.66E-01  1.63E-01 -3.66E-02 -1.71E-01  3.99E-01
 ETA6
+       -1.16E-01  4.58E-02  1.92E-01  8.70E-02 -4.74E-01  4.35E-01
 ETA7
+        1.24E-01 -2.87E-01  1.68E-01 -3.60E-01  1.79E-01  3.56E-02  4.65E-01
 ETA8
+        4.34E-01  4.51E-01  3.34E-01  2.08E-01  7.12E-02 -2.58E-01  2.34E-01  4.29E-01

 SIGMA - CORR MATRIX FOR RANDOM EFFECTS - EPSILONS  ***
         EPS1      EPS2
 EPS1
+        9.75E-02
 EPS2
+        0.00E+00  1.50E-01

 ********************                          IMPORTANCE SAMPLING (NO PRIOR)                        ********************
 ********************                          STANDARD ERROR OF ESTIMATE (R)                        ********************

 THETA - VECTOR OF FIXED EFFECTS PARAMETERS   *********
         TH 1      TH 2      TH 3      TH 4      TH 5      TH 6      TH 7      TH 8
         7.13E-02  7.21E-02  5.14E-02  7.15E-02  5.85E-02  6.96E-02  6.65E-02  6.24E-02

 OMEGA - COV MATRIX FOR RANDOM EFFECTS - ETAS  ********
         ETA1      ETA2      ETA3      ETA4      ETA5      ETA6      ETA7      ETA8
 ETA1
+        5.08E-02
 ETA2
+        3.44E-02  4.64E-02
 ETA3
+        2.58E-02  2.48E-02  2.70E-02
 ETA4
+        3.59E-02  3.52E-02  2.73E-02  5.24E-02
 ETA5
+        2.94E-02  2.69E-02  2.11E-02  2.95E-02  3.39E-02
 ETA6
+        3.48E-02  3.21E-02  2.43E-02  3.49E-02  3.11E-02  4.86E-02
 ETA7
+        3.38E-02  3.49E-02  2.34E-02  3.52E-02  2.78E-02  3.28E-02  4.38E-02
 ETA8
+        3.40E-02  3.09E-02  2.38E-02  3.21E-02  2.59E-02  3.14E-02  3.05E-02  3.97E-02

 SIGMA - COV MATRIX FOR RANDOM EFFECTS - EPSILONS  ****
         EPS1      EPS2
 EPS1
+        6.56E-04
 EPS2
+        0.00E+00  1.20E-03

 OMEGA - CORR MATRIX FOR RANDOM EFFECTS - ETAS  *******
         ETA1      ETA2      ETA3      ETA4      ETA5      ETA6      ETA7      ETA8
 ETA1
+        5.10E-02
 ETA2
+        1.50E-01  5.44E-02
 ETA3
+        1.51E-01  1.88E-01  4.42E-02
 ETA4
+        1.44E-01  1.44E-01  1.83E-01  5.36E-02
 ETA5
+        1.43E-01  1.53E-01  1.73E-01  1.45E-01  4.24E-02
 ETA6
+        1.60E-01  1.74E-01  1.81E-01  1.62E-01  1.40E-01  5.58E-02
 ETA7
+        1.43E-01  1.52E-01  1.60E-01  1.28E-01  1.43E-01  1.61E-01  4.71E-02
 ETA8
+        1.23E-01  1.35E-01  1.52E-01  1.43E-01  1.50E-01  1.57E-01  1.40E-01  4.63E-02

 SIGMA - CORR MATRIX FOR RANDOM EFFECTS - EPSILONS  ***
         EPS1      EPS2
 EPS1
+        3.37E-03
 EPS2
+       .........  4.01E-03
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 Elapsed postprocess time in seconds:     0.00
 Elapsed finaloutput time in seconds:     0.00
 #CPUT: Total CPU Time in Seconds,      241.209
