Tue 03/05/2019
02:19 PM
$PROB Testing Inter-occasion with Inter-Site (example30_1.ctl)

$INPUT C SID ID OCC TIME AMT RATE EVID MDV CMT DV ROWNUM
$ABBR REPLACE ETA(OCC_CL)=ETA(5,7,9)
$ABBR REPLACE ETA(OCC_V)=ETA(6,8,10)
$DATA superid30.csv IGNORE=@

$SUBROUTINES ADVAN1 TRANS2

$PK
MU_1=THETA(1)
MU_2=THETA(2)
CL=EXP(MU_1+ETA(1)+ETA(3)+ETA(OCC_CL))
V=EXP(MU_2+ETA(2)+ETA(4)+ETA(OCC_V))
S1=V

$ERROR
IPRED=A(1)/S1
IF(IPRED==0.0) IPRED=0.00001
Y = IPRED+IPRED*EPS(1)

;Initial Thetas
$THETA
 2.0  ;[CL]
 3.0  ;[V]

;Individual omegas (1,2)
$OMEGA BLOCK(2)
 .1
 -.0001  .1

;SID OMEGAS (3,4)
$OMEGA BLOCK(2)
 .3
-.0001 .3

; inter-occasion omegas for occasion 1 (5,6)
$OMEGA BLOCK(2)
 .03
 -.0001 .03

; inter-occasion omegas for occasion 2 and 3
; SAME(n) means repeat block structure n times;
; and omega parameters used for occasions 2 and 3 are shared
; with those of occasion 1.
$OMEGA BLOCK(2) SAME(2)

$SIGMA
 0.1

; PRIOR INFORMATION
$PRIOR NWPRI
;Individual omegas
$OMEGAP BLOCK(2)
 .03 FIXED
 0.0   .03
$OMEGAPD (2.0 FIXED)

;SID OMEGAS
$OMEGAP BLOCK(2)
 .1 FIXED
 0.0 .1
$OMEGAPD (2.0 FIXED)

; inter-occasion omegas
$OMEGAP BLOCK(2)
 .01 FIXED
 0.0 .01
$OMEGAP BLOCK(2) SAME(2)
$OMEGAPD (2.0 FIXED)

$LEVEL
SID=(3[1],4[2])

$EST METHOD=ITS INTERACTION PRINT=1 NSIG=2 NITER=40 SIGL=10 FNLETA=0 NOHABORT CTYPE=3 NOPRIOR=1
$EST METHOD=1 INTERACTION PRINT=1 NSIG=2 SIGL=12 FNLETA=0 NOHABORT SLOW NONINFETA=1 MAXEVAL=9999 NOPRIOR=1 MCETA=20
$COV MATRIX=R UNCONDITIONAL

$TABLE ID SID OCC TIME IPRED ETAS(1:LAST)
       FILE=superid30_1_foce.tab NOPRINT NOAPPEND ONEHEADER

NM-TRAN MESSAGES
 WARNINGS AND ERRORS (IF ANY) FOR PROBLEM    1
 (WARNING  126) ONLY THE LAST FNLETA LISTED IN THE SERIES OF $EST RECORDS FOR
 THIS PROBLEM WILL BE USED
 (WARNING  2) NM-TRAN INFERS THAT THE DATA ARE POPULATION.
 (WARNING  3) THERE MAY BE AN ERROR IN THE ABBREVIATED CODE. THE FOLLOWING
 ONE OR MORE RANDOM VARIABLES ARE DEFINED WITH "IF" STATEMENTS THAT DO NOT
 PROVIDE DEFINITIONS FOR BOTH THE "THEN" AND "ELSE" CASES. IF ALL
 CONDITIONS FAIL, THE VALUES OF THESE VARIABLES WILL BE ZERO.
   ETA(OCC_CL) ETA(OCC_V)
 (MU_WARNING 12) MU_001: SHOULD NOT BE ASSOCIATED WITH ETA(003)
 (MU_WARNING 11) MU_001: SHOULD NOT BE ASSOCIATED WITH MORE THAN ONE ETA.
 (MU_WARNING 12) MU_002: SHOULD NOT BE ASSOCIATED WITH ETA(004)
 (MU_WARNING 11) MU_002: SHOULD NOT BE ASSOCIATED WITH MORE THAN ONE ETA.

1NONLINEAR MIXED EFFECTS MODEL PROGRAM (NONMEM) VERSION 7.4.3
 ORIGINALLY DEVELOPED BY STUART BEAL, LEWIS SHEINER, AND ALISON BOECKMANN
 CURRENT DEVELOPERS ARE ROBERT BAUER, ICON DEVELOPMENT SOLUTIONS,
 AND ALISON BOECKMANN. IMPLEMENTATION, EFFICIENCY, AND STANDARDIZATION
 PERFORMED BY NOUS INFOSYSTEMS.
 PROBLEM NO.:         1
 Testing Inter-occasion with Inter-Site (example30_1.ctl)
 TOT. NO. OF OBS RECS:     6000
 TOT. NO. OF INDIVIDUALS:      200
 ONE COMPARTMENT MODEL (ADVAN1)
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 #TBLN:      1
 #METH: Iterative Two Stage (No Prior)
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
 #TERM:
 OPTIMIZATION WAS COMPLETED

 ETABAR IS THE ARITHMETIC MEAN OF THE ETA-ESTIMATES,
 AND THE P-VALUE IS GIVEN FOR THE NULL HYPOTHESIS THAT THE TRUE MEAN IS 0.

 ETABAR:        -1.7013E-07 -1.5228E-07  7.4107E-17  7.2164E-17 -3.6869E-03 -3.8920E-03 -1.8991E-03 -4.9895E-03  5.5860E-03  8.8814E-03
 SE:             1.0680E-02  1.0695E-02  5.6431E-02  9.5683E-02  5.9674E-03  6.1618E-03  5.6444E-03  5.5760E-03  5.7886E-03  5.7026E-03
 N:                     200         200          20          20         200         200         200         200         200         200

 P VAL.:         9.9999E-01  9.9999E-01  1.0000E+00  1.0000E+00  5.3668E-01  5.2763E-01  7.3652E-01  3.7088E-01  3.3455E-01  1.1937E-01

 ETASHRINKSD(%)  6.1244E+00  6.3192E+00  1.0523E-04  5.9331E-05  1.7527E+01  1.5884E+01  2.1991E+01  2.3881E+01  1.9998E+01  2.2152E+01
 ETASHRINKVR(%)  1.1874E+01  1.2239E+01  2.1047E-04  1.1866E-04  3.1982E+01  2.9244E+01  3.9145E+01  4.2059E+01  3.5997E+01  3.9397E+01
 EBVSHRINKSD(%)  6.1242E+00  6.3190E+00  0.0000E+00  0.0000E+00  1.9717E+01  2.0333E+01  1.9717E+01  2.0333E+01  1.9734E+01  2.0334E+01
 EBVSHRINKVR(%)  1.1873E+01  1.2239E+01  0.0000E+00  0.0000E+00  3.5547E+01  3.6532E+01  3.5546E+01  3.6532E+01  3.5574E+01  3.6534E+01
 EPSSHRINKSD(%)  9.5776E+00
 EPSSHRINKVR(%)  1.8238E+01


 TOTAL DATA POINTS NORMALLY DISTRIBUTED (N):         6000
 N*LOG(2PI) CONSTANT TO OBJECTIVE FUNCTION:    11027.2623984561
 OBJECTIVE FUNCTION VALUE WITHOUT CONSTANT:    1772.05470849072
 OBJECTIVE FUNCTION VALUE WITH CONSTANT:       12799.3171069468
 REPORTED OBJECTIVE FUNCTION DOES NOT CONTAIN CONSTANT

 TOTAL EFFECTIVE ETAS (NIND*NETA):                          1598


 #TERE:
 Elapsed estimation  time in seconds:    43.58
 Elapsed covariance  time in seconds:     0.13

 ********************                          ITERATIVE TWO STAGE (NO PRIOR)                        ********************
 #OBJT:**************                        FINAL VALUE OF OBJECTIVE FUNCTION                       ********************
 #OBJV:********************************************     1772.055       **************************************************

 ********************                          ITERATIVE TWO STAGE (NO PRIOR)                        ********************
 ********************                             FINAL PARAMETER ESTIMATE                           ********************

 THETA - VECTOR OF FIXED EFFECTS PARAMETERS   *********
         TH 1      TH 2
         1.23E+00  4.01E+00

 OMEGA - COV MATRIX FOR RANDOM EFFECTS - ETAS  ********
         ETA1      ETA2      ETA3      ETA4      ETA5      ETA6      ETA7      ETA8      ETA9      ET10
 ETA1
+        2.88E-02
 ETA2
+        3.01E-03  2.90E-02
 ETA3
+        0.00E+00  0.00E+00  6.70E-02
 ETA4
+        0.00E+00  0.00E+00  3.56E-03  1.93E-01
 ETA5
+        0.00E+00  0.00E+00  0.00E+00  0.00E+00  1.05E-02
 ETA6
+        0.00E+00  0.00E+00  0.00E+00  0.00E+00 -3.58E-04  1.08E-02
 ETA7
+        0.00E+00  0.00E+00  0.00E+00  0.00E+00  0.00E+00  0.00E+00  1.05E-02
 ETA8
+        0.00E+00  0.00E+00  0.00E+00  0.00E+00  0.00E+00  0.00E+00 -3.58E-04  1.08E-02
 ETA9
+        0.00E+00  0.00E+00  0.00E+00  0.00E+00  0.00E+00  0.00E+00  0.00E+00  0.00E+00  1.05E-02
 ET10
+        0.00E+00  0.00E+00  0.00E+00  0.00E+00  0.00E+00  0.00E+00  0.00E+00  0.00E+00 -3.58E-04  1.08E-02

 SIGMA - COV MATRIX FOR RANDOM EFFECTS - EPSILONS  ****
         EPS1
 EPS1
+        9.90E-03

 OMEGA - CORR MATRIX FOR RANDOM EFFECTS - ETAS  *******
         ETA1      ETA2      ETA3      ETA4      ETA5      ETA6      ETA7      ETA8      ETA9      ET10
 ETA1
+        1.70E-01
 ETA2
+        1.04E-01  1.70E-01
 ETA3
+        0.00E+00  0.00E+00  2.59E-01
 ETA4
+        0.00E+00  0.00E+00  3.13E-02  4.39E-01
 ETA5
+        0.00E+00  0.00E+00  0.00E+00  0.00E+00  1.03E-01
 ETA6
+        0.00E+00  0.00E+00  0.00E+00  0.00E+00 -3.36E-02  1.04E-01
 ETA7
+        0.00E+00  0.00E+00  0.00E+00  0.00E+00  0.00E+00  0.00E+00  1.03E-01
 ETA8
+        0.00E+00  0.00E+00  0.00E+00  0.00E+00  0.00E+00  0.00E+00 -3.36E-02  1.04E-01
 ETA9
+        0.00E+00  0.00E+00  0.00E+00  0.00E+00  0.00E+00  0.00E+00  0.00E+00  0.00E+00  1.03E-01
 ET10
+        0.00E+00  0.00E+00  0.00E+00  0.00E+00  0.00E+00  0.00E+00  0.00E+00  0.00E+00 -3.36E-02  1.04E-01

 SIGMA - CORR MATRIX FOR RANDOM EFFECTS - EPSILONS  ***
         EPS1
 EPS1
+        9.95E-02

 ********************                          ITERATIVE TWO STAGE (NO PRIOR)                        ********************
 ********************                          STANDARD ERROR OF ESTIMATE (S)                        ********************

 THETA - VECTOR OF FIXED EFFECTS PARAMETERS   *********
         TH 1      TH 2
         1.38E-02  1.46E-02

 OMEGA - COV MATRIX FOR RANDOM EFFECTS - ETAS  ********
         ETA1      ETA2      ETA3      ETA4      ETA5      ETA6      ETA7      ETA8      ETA9      ET10
 ETA1
+        3.54E-03
 ETA2
+        2.45E-03  3.59E-03
 ETA3
+        0.00E+00  0.00E+00  2.03E-02
 ETA4
+        0.00E+00  0.00E+00  2.88E-02  1.09E-01
 ETA5
+        0.00E+00  0.00E+00  0.00E+00  0.00E+00  8.01E-04
 ETA6
+        0.00E+00  0.00E+00  0.00E+00  0.00E+00  7.84E-04  9.72E-04
 ETA7
+        0.00E+00  0.00E+00  0.00E+00  0.00E+00  0.00E+00  0.00E+00  8.01E-04
 ETA8
+        0.00E+00  0.00E+00  0.00E+00  0.00E+00  0.00E+00  0.00E+00  7.84E-04  9.72E-04
 ETA9
+        0.00E+00  0.00E+00  0.00E+00  0.00E+00  0.00E+00  0.00E+00  0.00E+00  0.00E+00  8.01E-04
 ET10
+        0.00E+00  0.00E+00  0.00E+00  0.00E+00  0.00E+00  0.00E+00  0.00E+00  0.00E+00  7.84E-04  9.72E-04

 SIGMA - COV MATRIX FOR RANDOM EFFECTS - EPSILONS  ****
         EPS1
 EPS1
+        2.08E-04

 OMEGA - CORR MATRIX FOR RANDOM EFFECTS - ETAS  *******
         ETA1      ETA2      ETA3      ETA4      ETA5      ETA6      ETA7      ETA8      ETA9      ET10
 ETA1
+        1.05E-02
 ETA2
+        8.30E-02  1.06E-02
 ETA3
+       ......... .........  3.93E-02
 ETA4
+       ......... .........  2.57E-01  1.25E-01
 ETA5
+       ......... ......... ......... .........  3.91E-03
 ETA6
+       ......... ......... ......... .........  7.41E-02  4.68E-03
 ETA7
+       ......... ......... ......... ......... ......... ......... .........
 ETA8
+       ......... ......... ......... ......... ......... ......... ......... .........
 ETA9
+       ......... ......... ......... ......... ......... ......... ......... ......... .........
 ET10
+       ......... ......... ......... ......... ......... ......... ......... ......... ......... .........

 SIGMA - CORR MATRIX FOR RANDOM EFFECTS - EPSILONS  ***
         EPS1
 EPS1
+        1.05E-03
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 #TBLN:      2
 #METH: First Order Conditional Estimation with Interaction (No Prior)
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
 #TERM:
0MINIMIZATION SUCCESSFUL
 NO. OF FUNCTION EVALUATIONS USED:      387
 NO. OF SIG. DIGITS IN FINAL EST.:  2.0

 ETABAR IS THE ARITHMETIC MEAN OF THE ETA-ESTIMATES,
 AND THE P-VALUE IS GIVEN FOR THE NULL HYPOTHESIS THAT THE TRUE MEAN IS 0.

 ETABAR:         1.0734E-04 -3.1578E-04 -6.5226E-17  3.4417E-17 -3.6674E-03 -3.9310E-03 -1.8796E-03 -5.0287E-03  5.6016E-03  8.8373E-03
 SE:             1.0704E-02  1.0721E-02  5.6408E-02  9.5645E-02  5.9608E-03  6.1547E-03  5.6405E-03  5.5712E-03  5.7814E-03  5.6961E-03
 N:                     200         200          20          20         200         200         200         200         200         200

 P VAL.:         9.9200E-01  9.7650E-01  1.0000E+00  1.0000E+00  5.3839E-01  5.2302E-01  7.3896E-01  3.6673E-01  3.3259E-01  1.2079E-01

 ETASHRINKSD(%)  6.7119E+00  6.9312E+00  1.0000E-10  1.0000E-10  1.7546E+01  1.5920E+01  2.1976E+01  2.3892E+01  2.0028E+01  2.2186E+01
 ETASHRINKVR(%)  1.2973E+01  1.3382E+01  1.0000E-10  1.0000E-10  3.2013E+01  2.9306E+01  3.9122E+01  4.2075E+01  3.6045E+01  3.9450E+01
 EBVSHRINKSD(%)  6.0213E+00  6.2102E+00  0.0000E+00  0.0000E+00  1.9761E+01  2.0378E+01  1.9760E+01  2.0378E+01  1.9777E+01  2.0379E+01
 EBVSHRINKVR(%)  1.1680E+01  1.2035E+01  0.0000E+00  0.0000E+00  3.5616E+01  3.6603E+01  3.5616E+01  3.6603E+01  3.5643E+01  3.6605E+01
 EPSSHRINKSD(%)  9.5785E+00
 EPSSHRINKVR(%)  1.8240E+01


 TOTAL DATA POINTS NORMALLY DISTRIBUTED (N):         6000
 N*LOG(2PI) CONSTANT TO OBJECTIVE FUNCTION:    11027.2623984561
 OBJECTIVE FUNCTION VALUE WITHOUT CONSTANT:    1771.98954396937
 OBJECTIVE FUNCTION VALUE WITH CONSTANT:       12799.2519424254
 REPORTED OBJECTIVE FUNCTION DOES NOT CONTAIN CONSTANT

 TOTAL EFFECTIVE ETAS (NIND*NETA):                          1598


 #TERE:
 Elapsed estimation  time in seconds:   153.54
 Elapsed covariance  time in seconds:   113.36
 SKIPPING EXECUTION OF SLOW FNLMOD/FNLETA BY USER REQUEST
 Elapsed postprocess time in seconds:     0.02

 ********************          FIRST ORDER CONDITIONAL ESTIMATION WITH INTERACTION (NO PRIOR)        ********************
 #OBJT:**************                       MINIMUM VALUE OF OBJECTIVE FUNCTION                      ********************
 #OBJV:********************************************     1771.990       **************************************************

 ********************          FIRST ORDER CONDITIONAL ESTIMATION WITH INTERACTION (NO PRIOR)        ********************
 ********************                             FINAL PARAMETER ESTIMATE                           ********************

 THETA - VECTOR OF FIXED EFFECTS PARAMETERS   *********
         TH 1      TH 2
         1.23E+00  4.01E+00

 OMEGA - COV MATRIX FOR RANDOM EFFECTS - ETAS  ********
         ETA1      ETA2      ETA3      ETA4      ETA5      ETA6      ETA7      ETA8      ETA9      ET10
 ETA1
+        2.93E-02
 ETA2
+        3.00E-03  2.95E-02
 ETA3
+        0.00E+00  0.00E+00  6.54E-02
 ETA4
+        0.00E+00  0.00E+00  3.32E-03  1.87E-01
 ETA5
+        0.00E+00  0.00E+00  0.00E+00  0.00E+00  1.05E-02
 ETA6
+        0.00E+00  0.00E+00  0.00E+00  0.00E+00 -3.63E-04  1.08E-02
 ETA7
+        0.00E+00  0.00E+00  0.00E+00  0.00E+00  0.00E+00  0.00E+00  1.05E-02
 ETA8
+        0.00E+00  0.00E+00  0.00E+00  0.00E+00  0.00E+00  0.00E+00 -3.63E-04  1.08E-02
 ETA9
+        0.00E+00  0.00E+00  0.00E+00  0.00E+00  0.00E+00  0.00E+00  0.00E+00  0.00E+00  1.05E-02
 ET10
+        0.00E+00  0.00E+00  0.00E+00  0.00E+00  0.00E+00  0.00E+00  0.00E+00  0.00E+00 -3.63E-04  1.08E-02

 SIGMA - COV MATRIX FOR RANDOM EFFECTS - EPSILONS  ****
         EPS1
 EPS1
+        9.90E-03

 OMEGA - CORR MATRIX FOR RANDOM EFFECTS - ETAS  *******
         ETA1      ETA2      ETA3      ETA4      ETA5      ETA6      ETA7      ETA8      ETA9      ET10
 ETA1
+        1.71E-01
 ETA2
+        1.02E-01  1.72E-01
 ETA3
+        0.00E+00  0.00E+00  2.56E-01
 ETA4
+        0.00E+00  0.00E+00  3.00E-02  4.33E-01
 ETA5
+        0.00E+00  0.00E+00  0.00E+00  0.00E+00  1.02E-01
 ETA6
+        0.00E+00  0.00E+00  0.00E+00  0.00E+00 -3.42E-02  1.04E-01
 ETA7
+        0.00E+00  0.00E+00  0.00E+00  0.00E+00  0.00E+00  0.00E+00  1.02E-01
 ETA8
+        0.00E+00  0.00E+00  0.00E+00  0.00E+00  0.00E+00  0.00E+00 -3.42E-02  1.04E-01
 ETA9
+        0.00E+00  0.00E+00  0.00E+00  0.00E+00  0.00E+00  0.00E+00  0.00E+00  0.00E+00  1.02E-01
 ET10
+        0.00E+00  0.00E+00  0.00E+00  0.00E+00  0.00E+00  0.00E+00  0.00E+00  0.00E+00 -3.42E-02  1.04E-01

 SIGMA - CORR MATRIX FOR RANDOM EFFECTS - EPSILONS  ***
         EPS1
 EPS1
+        9.95E-02

 ********************          FIRST ORDER CONDITIONAL ESTIMATION WITH INTERACTION (NO PRIOR)        ********************
 ********************                            STANDARD ERROR OF ESTIMATE                          ********************

 THETA - VECTOR OF FIXED EFFECTS PARAMETERS   *********
         TH 1      TH 2
         1.29E-02  1.29E-02

 OMEGA - COV MATRIX FOR RANDOM EFFECTS - ETAS  ********
         ETA1      ETA2      ETA3      ETA4      ETA5      ETA6      ETA7      ETA8      ETA9      ET10
 ETA1
+        3.51E-03
 ETA2
+        2.57E-03  3.56E-03
 ETA3
+       ......... .........  2.33E-02
 ETA4
+       ......... .........  2.49E-02  6.80E-02
 ETA5
+       ......... ......... ......... .........  8.17E-04
 ETA6
+       ......... ......... ......... .........  6.24E-04  8.54E-04
 ETA7
+       ......... ......... ......... ......... ......... ......... .........
 ETA8
+       ......... ......... ......... ......... ......... ......... ......... .........
 ETA9
+       ......... ......... ......... ......... ......... ......... ......... ......... .........
 ET10
+       ......... ......... ......... ......... ......... ......... ......... ......... ......... .........

 SIGMA - COV MATRIX FOR RANDOM EFFECTS - EPSILONS  ****
         EPS1
 EPS1
+        2.04E-04

 OMEGA - CORR MATRIX FOR RANDOM EFFECTS - ETAS  *******
         ETA1      ETA2      ETA3      ETA4      ETA5      ETA6      ETA7      ETA8      ETA9      ET10
 ETA1
+        1.03E-02
 ETA2
+        8.64E-02  1.04E-02
 ETA3
+       ......... .........  4.55E-02
 ETA4
+       ......... .........  2.24E-01  7.86E-02
 ETA5
+       ......... ......... ......... .........  3.99E-03
 ETA6
+       ......... ......... ......... .........  5.88E-02  4.12E-03
 ETA7
+       ......... ......... ......... ......... ......... ......... .........
 ETA8
+       ......... ......... ......... ......... ......... ......... ......... .........
 ETA9
+       ......... ......... ......... ......... ......... ......... ......... ......... .........
 ET10
+       ......... ......... ......... ......... ......... ......... ......... ......... ......... .........

 SIGMA - CORR MATRIX FOR RANDOM EFFECTS - EPSILONS  ***
         EPS1
 EPS1
+        1.02E-03
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 Elapsed finaloutput time in seconds:     0.57
 #CPUT: Total CPU Time in Seconds,      305.138
