Mon 03/11/2019
11:22 AM
;Model Desc: Population Mixture Problem in 1 Compartment model, with Volume and rate constant parameters
;            and their inter-subject variances modeled from two sub-populations
;Project Name: nm7examples
;Project ID: NO PROJECT DESCRIPTION

$PROB RUN#  pmixture.ctl
$INPUT C SET ID JID TIME CONC=DV DOSE=AMT RATE EVID MDV CMT VC1 K101 VC2 K102 SIGZ PROB
$DATA pmixture.csv IGNORE=C

$SUBROUTINES ADVAN1 TRANS1

; The mixture model uses THETA(5) as the mixture proportion parameter, defining the proportion
; of subjects in sub-population 1 (P(1), and in sub-population 2 (P(2)
$MIX
P(1)=THETA(5)
P(2)=1.0-THETA(5)
NSPOP=2

; Prior information setup for OMEGAS only

$PK
;  The MUs should always be unconditionally defined, that is, they should never be
; defined in IF?THEN blocks
; THETA(1) models the Volume of sub-population 1
MU_1=THETA(1)
; THETA(2) models the clearance of sub-population 1
MU_2=THETA(2)
; THETA(3) models the Volume of sub-population 2
MU_3=THETA(3)
; THETA(4) models the clearance of sub-population 2
MU_4=THETA(4)
VCM=DEXP(MU_1+ETA(1))
K10M=DEXP(MU_2+ETA(2))
VCF=DEXP(MU_3+ETA(3))
K10F=DEXP(MU_4+ETA(4))
Q=1
IF(MIXNUM.EQ.2) Q=0
V=Q*VCM+(1.0-Q)*VCF
K=Q*K10M+(1.0-Q)*K10F
S1=V
BESTSUB=MIXEST

$ERROR
Y = F + F*EPS(1)

; Initial THETAs
$THETA 4.3 -2.9 4.3 -0.67 (0.00001,0.5,0.99999)

;Initial OMEGA block 1, for sub-population 1
$OMEGA BLOCK(2)
 .04 ;[p]
 .01 ; [f]
.027; [p]

;Initial OMEGA block 2, for sub-population 2
$OMEGA BLOCK(2)
 .05; [p]
 .01; [f]
.06; [p]

$PRIOR NWPRI
; Degrees of Freedom defined for Priors. One for each OMEGA block defining each sub-popluation

; Prior OMEGA block 1.  Note that because the OMEGA is separated into blocks, so their priors
; should have the same block design.
$OMEGAP BLOCK(2)
 0.05 FIX
 0.0 0.05

; Prior OMEGA block 2
$OMEGAP BLOCK(2)
0.05 FIX
0.0 0.05
$OMEGAPD (2 FIX) (2 FIX)

$SIGMA
0.01 ;[p]

$EST METHOD=ITS INTERACTION NITER=100 PRINT=1 NOABORT SIGL=8 CTYPE=3 CITER=10
     CALPHA=0.05 NOPRIOR=1
$EST METHOD=BAYES NITER=10000 AUTO=1 PRINT=100 FILE=pmixture_bayes.txt NOPRIOR=0
$COV MATRIX=R UNCONDITIONAL

$TABLE ID V K BESTSUB FIRSTONLY NOPRINT NOAPPEND FILE=pmixture_bayes.par

NM-TRAN MESSAGES
 WARNINGS AND ERRORS (IF ANY) FOR PROBLEM    1
 (WARNING  2) NM-TRAN INFERS THAT THE DATA ARE POPULATION.

1NONLINEAR MIXED EFFECTS MODEL PROGRAM (NONMEM) VERSION 7.4.3
 ORIGINALLY DEVELOPED BY STUART BEAL, LEWIS SHEINER, AND ALISON BOECKMANN
 CURRENT DEVELOPERS ARE ROBERT BAUER, ICON DEVELOPMENT SOLUTIONS,
 AND ALISON BOECKMANN. IMPLEMENTATION, EFFICIENCY, AND STANDARDIZATION
 PERFORMED BY NOUS INFOSYSTEMS.
 PROBLEM NO.:         1
 RUN#  pmixture.ctl
 TOT. NO. OF OBS RECS:     2400
 TOT. NO. OF INDIVIDUALS:      300
 ONE COMPARTMENT MODEL (ADVAN1)
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 #TBLN:      1
 #METH: Iterative Two Stage (No Prior)
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
 #TERM:
 OPTIMIZATION WAS COMPLETED

 ETABAR IS THE ARITHMETIC MEAN OF THE ETA-ESTIMATES,
 AND SE IS THE ASSOCIATED STANDARD ERROR.

 SUBMODEL    1

 ETABAR:        -2.3733E-07  1.4669E-06  0.0000E+00  0.0000E+00
 SE:             1.4891E-02  1.1044E-02  0.0000E+00  0.0000E+00
 N:                     200         200         200         200

 ETASHRINKSD(%)  1.9092E+00  5.0008E+00  1.0000E+02  1.0000E+02
 ETASHRINKVR(%)  3.7820E+00  9.7516E+00  1.0000E+02  1.0000E+02
 EBVSHRINKSD(%)  1.9912E+00  5.0815E+00  1.0000E+02  1.0000E+02
 EBVSHRINKVR(%)  3.9427E+00  9.9047E+00  1.0000E+02  1.0000E+02
 EPSSHRINKSD(%)  1.1410E+01
 EPSSHRINKVR(%)  2.1518E+01


 SUBMODEL    2

 ETABAR:         0.0000E+00  0.0000E+00  3.8813E-07  7.4580E-06
 SE:             0.0000E+00  0.0000E+00  2.1782E-02  2.4454E-02
 N:                     100         100         100         100

 ETASHRINKSD(%)  1.0000E+02  1.0000E+02  1.5775E+00  1.0000E-10
 ETASHRINKVR(%)  1.0000E+02  1.0000E+02  3.1301E+00  1.0000E-10
 EBVSHRINKSD(%)  1.0000E+02  1.0000E+02  1.9073E+00  1.0444E-01
 EBVSHRINKVR(%)  1.0000E+02  1.0000E+02  3.7781E+00  2.0877E-01
 EPSSHRINKSD(%)  1.4366E+01
 EPSSHRINKVR(%)  2.6669E+01


 TOTAL DATA POINTS NORMALLY DISTRIBUTED (N):         2400
 N*LOG(2PI) CONSTANT TO OBJECTIVE FUNCTION:    4410.90495938243
 OBJECTIVE FUNCTION VALUE WITHOUT CONSTANT:   -9961.69655957345
 OBJECTIVE FUNCTION VALUE WITH CONSTANT:      -5550.79160019102
 REPORTED OBJECTIVE FUNCTION DOES NOT CONTAIN CONSTANT

 TOTAL EFFECTIVE ETAS (NIND*NETA):                          1200


 #TERE:
 Elapsed estimation  time in seconds:     8.84
 Elapsed covariance  time in seconds:     0.51

 ********************                          ITERATIVE TWO STAGE (NO PRIOR)                        ********************
 #OBJT:**************                        FINAL VALUE OF OBJECTIVE FUNCTION                       ********************
 #OBJV:********************************************    -9961.697       **************************************************

 ********************                          ITERATIVE TWO STAGE (NO PRIOR)                        ********************
 ********************                             FINAL PARAMETER ESTIMATE                           ********************

 THETA - VECTOR OF FIXED EFFECTS PARAMETERS   *********
         TH 1      TH 2      TH 3      TH 4      TH 5
         4.24E+00 -2.29E+00  4.26E+00 -6.75E-01  6.67E-01

 OMEGA - COV MATRIX FOR RANDOM EFFECTS - ETAS  ********
         ETA1      ETA2      ETA3      ETA4
 ETA1
+        4.63E-02
 ETA2
+       -8.56E-03  2.72E-02
 ETA3
+        0.00E+00  0.00E+00  4.95E-02
 ETA4
+        0.00E+00  0.00E+00 -1.10E-02  6.01E-02

 SIGMA - COV MATRIX FOR RANDOM EFFECTS - EPSILONS  ****
         EPS1
 EPS1
+        1.02E-02

 OMEGA - CORR MATRIX FOR RANDOM EFFECTS - ETAS  *******
         ETA1      ETA2      ETA3      ETA4
 ETA1
+        2.15E-01
 ETA2
+       -2.41E-01  1.65E-01
 ETA3
+        0.00E+00  0.00E+00  2.22E-01
 ETA4
+        0.00E+00  0.00E+00 -2.02E-01  2.45E-01

 SIGMA - CORR MATRIX FOR RANDOM EFFECTS - EPSILONS  ***
         EPS1
 EPS1
+        1.01E-01

 ********************                          ITERATIVE TWO STAGE (NO PRIOR)                        ********************
 ********************                          STANDARD ERROR OF ESTIMATE (S)                        ********************

 THETA - VECTOR OF FIXED EFFECTS PARAMETERS   *********
         TH 1      TH 2      TH 3      TH 4      TH 5
         1.57E-02  1.26E-02  2.27E-02  2.46E-02  2.72E-02

 OMEGA - COV MATRIX FOR RANDOM EFFECTS - ETAS  ********
         ETA1      ETA2      ETA3      ETA4
 ETA1
+        5.41E-03
 ETA2
+        2.73E-03  2.51E-03
 ETA3
+        0.00E+00  0.00E+00  7.40E-03
 ETA4
+        0.00E+00  0.00E+00  5.80E-03  8.89E-03

 SIGMA - COV MATRIX FOR RANDOM EFFECTS - EPSILONS  ****
         EPS1
 EPS1
+        3.43E-04

 OMEGA - CORR MATRIX FOR RANDOM EFFECTS - ETAS  *******
         ETA1      ETA2      ETA3      ETA4
 ETA1
+        1.26E-02
 ETA2
+        6.75E-02  7.61E-03
 ETA3
+       ......... .........  1.66E-02
 ETA4
+       ......... .........  9.69E-02  1.81E-02

 SIGMA - CORR MATRIX FOR RANDOM EFFECTS - EPSILONS  ***
         EPS1
 EPS1
+        1.70E-03

 ********************                          ITERATIVE TWO STAGE (NO PRIOR)                        ********************
 ********************                        COVARIANCE MATRIX OF ESTIMATE (S)                       ********************

            TH 1      TH 2      TH 3      TH 4      TH 5      OM11      OM12      OM13      OM14      OM22      OM23      OM24
             OM33      OM34      OM44      SG11
 TH 1
+        2.48E-04
 TH 2
+       -5.26E-05  1.58E-04
 TH 3
+        1.71E-07 -4.40E-07  5.17E-04
 TH 4
+        1.44E-07 -3.55E-07 -1.13E-04  6.07E-04
 TH 5
+       -2.71E-07  7.07E-07 -8.96E-07 -7.27E-07  7.42E-04
 OM11
+       -8.31E-06  3.04E-06  3.16E-07  2.63E-07 -5.01E-07  2.93E-05
 OM12
+        3.48E-06  3.41E-06 -9.09E-08 -7.64E-08  1.43E-07 -7.69E-06  7.46E-06
 OM13
+       ......... ......... ......... ......... ......... ......... ......... .........
 OM14
+       ......... ......... ......... ......... ......... ......... ......... ......... .........
 OM22
+        3.17E-06 -5.21E-06 -4.79E-08 -3.49E-08  7.98E-08  1.02E-07 -2.28E-06  0.00E+00  0.00E+00  6.30E-06
 OM23
+       ......... ......... ......... ......... ......... ......... ......... ......... ......... ......... .........
 OM24
+       ......... ......... ......... ......... ......... ......... ......... ......... ......... ......... ......... .........
 OM33
+       -1.33E-08  3.57E-08 -5.68E-06  4.20E-06  7.21E-08 -2.53E-08  7.28E-09  0.00E+00  0.00E+00  4.08E-09  0.00E+00  0.00E+00
          5.48E-05
 OM34
+       -5.19E-08  1.35E-07  4.24E-06 -4.39E-06  2.74E-07 -9.71E-08  2.80E-08  0.00E+00  0.00E+00  1.47E-08  0.00E+00  0.00E+00
         -1.48E-05  3.36E-05
 OM44
+       -1.09E-07  2.64E-07 -5.92E-06 -7.07E-06  5.42E-07 -1.97E-07  5.74E-08  0.00E+00  0.00E+00  2.52E-08  0.00E+00  0.00E+00
          3.59E-06 -2.06E-05  7.91E-05
 SG11
+        7.80E-08 -2.02E-07  2.59E-07  2.17E-07 -4.10E-07  1.44E-07 -4.13E-08  0.00E+00  0.00E+00 -2.22E-08  0.00E+00  0.00E+00
         -2.05E-08 -7.93E-08 -1.64E-07  1.18E-07

 ********************                          ITERATIVE TWO STAGE (NO PRIOR)                        ********************
 ********************                        CORRELATION MATRIX OF ESTIMATE (S)                      ********************

            TH 1      TH 2      TH 3      TH 4      TH 5      OM11      OM12      OM13      OM14      OM22      OM23      OM24
             OM33      OM34      OM44      SG11
 TH 1
+        1.57E-02
 TH 2
+       -2.66E-01  1.26E-02
 TH 3
+        4.77E-04 -1.54E-03  2.27E-02
 TH 4
+        3.72E-04 -1.15E-03 -2.02E-01  2.46E-02
 TH 5
+       -6.32E-04  2.07E-03 -1.45E-03 -1.08E-03  2.72E-02
 OM11
+       -9.75E-02  4.47E-02  2.57E-03  1.97E-03 -3.40E-03  5.41E-03
 OM12
+        8.10E-02  9.94E-02 -1.46E-03 -1.14E-03  1.93E-03 -5.20E-01  2.73E-03
 OM13
+       ......... ......... ......... ......... ......... ......... ......... .........
 OM14
+       ......... ......... ......... ......... ......... ......... ......... ......... .........
 OM22
+        8.02E-02 -1.65E-01 -8.39E-04 -5.65E-04  1.17E-03  7.47E-03 -3.33E-01  0.00E+00  0.00E+00  2.51E-03
 OM23
+       ......... ......... ......... ......... ......... ......... ......... ......... ......... ......... .........
 OM24
+       ......... ......... ......... ......... ......... ......... ......... ......... ......... ......... ......... .........
 OM33
+       -1.14E-04  3.84E-04 -3.38E-02  2.31E-02  3.58E-04 -6.32E-04  3.60E-04  0.00E+00  0.00E+00  2.20E-04  0.00E+00  0.00E+00
          7.40E-03
 OM34
+       -5.69E-04  1.86E-03  3.21E-02 -3.07E-02  1.73E-03 -3.09E-03  1.77E-03  0.00E+00  0.00E+00  1.01E-03  0.00E+00  0.00E+00
         -3.46E-01  5.80E-03
 OM44
+       -7.78E-04  2.37E-03 -2.93E-02 -3.23E-02  2.24E-03 -4.10E-03  2.36E-03  0.00E+00  0.00E+00  1.13E-03  0.00E+00  0.00E+00
          5.46E-02 -3.99E-01  8.89E-03
 SG11
+        1.44E-02 -4.68E-02  3.31E-02  2.57E-02 -4.38E-02  7.75E-02 -4.40E-02  0.00E+00  0.00E+00 -2.58E-02  0.00E+00  0.00E+00
         -8.07E-03 -3.98E-02 -5.35E-02  3.43E-04
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 #TBLN:      2
 #METH: MCMC Bayesian Analysis
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
 #TERM:
 BURN-IN WAS COMPLETED
 STATISTICAL PORTION WAS COMPLETED

 TOTAL DATA POINTS NORMALLY DISTRIBUTED (N):         2400
 N*LOG(2PI) CONSTANT TO OBJECTIVE FUNCTION:    4410.90495938243
 OBJECTIVE FUNCTION VALUE WITHOUT CONSTANT:   -14659.2819479338
 OBJECTIVE FUNCTION VALUE WITH CONSTANT:      -10248.3769885514
 REPORTED OBJECTIVE FUNCTION DOES NOT CONTAIN CONSTANT

 TOTAL EFFECTIVE ETAS (NIND*NETA):                          1200
 NIND*NETA*LOG(2PI) CONSTANT TO OBJECTIVE FUNCTION:    2205.45247969121
 OBJECTIVE FUNCTION VALUE WITHOUT CONSTANT:   -14659.2819479338
 OBJECTIVE FUNCTION VALUE WITH CONSTANT:      -12453.8294682426
 REPORTED OBJECTIVE FUNCTION DOES NOT CONTAIN CONSTANT

 PRIOR CONSTANT TO OBJECTIVE FUNCTION:    28.5447777318297
 OBJECTIVE FUNCTION VALUE WITHOUT CONSTANT:   -14659.2819479338
 OBJECTIVE FUNCTION VALUE WITH CONSTANT:      -14630.7371702020
 REPORTED OBJECTIVE FUNCTION DOES NOT CONTAIN CONSTANT


 #TERE:
 Elapsed estimation  time in seconds:   903.18
 Elapsed covariance  time in seconds:     0.00

 ********************                              MCMC BAYESIAN ANALYSIS                            ********************
 #OBJT:**************                       AVERAGE VALUE OF LIKELIHOOD FUNCTION                     ********************
 #OBJV:********************************************   -14659.282       **************************************************
 #OBJS:********************************************       68.462 (STD) **************************************************

 ********************                              MCMC BAYESIAN ANALYSIS                            ********************
 ********************                             FINAL PARAMETER ESTIMATE                           ********************

 THETA - VECTOR OF FIXED EFFECTS PARAMETERS   *********
         TH 1      TH 2      TH 3      TH 4      TH 5
         4.24E+00 -2.30E+00  4.26E+00 -6.77E-01  6.66E-01

 OMEGA - COV MATRIX FOR RANDOM EFFECTS - ETAS  ********
         ETA1      ETA2      ETA3      ETA4
 ETA1
+        4.71E-02
 ETA2
+       -8.66E-03  2.82E-02
 ETA3
+        0.00E+00  0.00E+00  5.13E-02
 ETA4
+        0.00E+00  0.00E+00 -1.10E-02  6.25E-02

 SIGMA - COV MATRIX FOR RANDOM EFFECTS - EPSILONS  ****
         EPS1
 EPS1
+        1.02E-02

 OMEGA - CORR MATRIX FOR RANDOM EFFECTS - ETAS  *******
         ETA1      ETA2      ETA3      ETA4
 ETA1
+        2.17E-01
 ETA2
+       -2.37E-01  1.68E-01
 ETA3
+        0.00E+00  0.00E+00  2.26E-01
 ETA4
+        0.00E+00  0.00E+00 -1.93E-01  2.49E-01

 SIGMA - CORR MATRIX FOR RANDOM EFFECTS - EPSILONS  ***
         EPS1
 EPS1
+        1.01E-01

 ********************                              MCMC BAYESIAN ANALYSIS                            ********************
 ********************                STANDARD ERROR OF ESTIMATE (From Sample Variance)               ********************

 THETA - VECTOR OF FIXED EFFECTS PARAMETERS   *********
         TH 1      TH 2      TH 3      TH 4      TH 5
         1.55E-02  1.25E-02  2.32E-02  2.51E-02  2.69E-02

 OMEGA - COV MATRIX FOR RANDOM EFFECTS - ETAS  ********
         ETA1      ETA2      ETA3      ETA4
 ETA1
+        5.03E-03
 ETA2
+        2.89E-03  3.20E-03
 ETA3
+        0.00E+00  0.00E+00  7.59E-03
 ETA4
+        0.00E+00  0.00E+00  5.85E-03  8.94E-03

 SIGMA - COV MATRIX FOR RANDOM EFFECTS - EPSILONS  ****
         EPS1
 EPS1
+        3.42E-04

 OMEGA - CORR MATRIX FOR RANDOM EFFECTS - ETAS  *******
         ETA1      ETA2      ETA3      ETA4
 ETA1
+        1.15E-02
 ETA2
+        7.08E-02  9.48E-03
 ETA3
+        0.00E+00  0.00E+00  1.66E-02
 ETA4
+        0.00E+00  0.00E+00  9.65E-02  1.77E-02

 SIGMA - CORR MATRIX FOR RANDOM EFFECTS - EPSILONS  ***
         EPS1
 EPS1
+        1.69E-03

 ********************                              MCMC BAYESIAN ANALYSIS                            ********************
 ********************               COVARIANCE MATRIX OF ESTIMATE (From Sample Variance)             ********************

            TH 1      TH 2      TH 3      TH 4      TH 5      OM11      OM12      OM13      OM14      OM22      OM23      OM24
             OM33      OM34      OM44      SG11
 TH 1
+        2.41E-04
 TH 2
+       -5.09E-05  1.57E-04
 TH 3
+       -6.96E-06 -3.90E-06  5.36E-04
 TH 4
+       -2.06E-06  2.37E-06 -1.25E-04  6.30E-04
 TH 5
+       -2.32E-06  2.17E-06 -2.19E-06 -1.12E-06  7.23E-04
 OM11
+        1.17E-06 -9.52E-07  1.12E-06 -1.89E-06 -1.49E-06  2.53E-05
 OM12
+        1.84E-07  7.11E-07 -4.99E-08  3.06E-07  6.79E-07 -5.46E-06  8.34E-06
 OM13
+       ......... ......... ......... ......... ......... ......... ......... .........
 OM14
+       ......... ......... ......... ......... ......... ......... ......... ......... .........
 OM22
+        1.02E-06 -1.62E-06  2.30E-07  5.29E-07 -5.61E-07  1.57E-06 -3.36E-06  0.00E+00  0.00E+00  1.03E-05
 OM23
+       ......... ......... ......... ......... ......... ......... ......... ......... ......... ......... .........
 OM24
+       ......... ......... ......... ......... ......... ......... ......... ......... ......... ......... ......... .........
 OM33
+        4.64E-07  4.75E-07 -4.42E-07  8.66E-07  3.45E-06  4.84E-08 -4.30E-07  0.00E+00  0.00E+00  3.52E-07  0.00E+00  0.00E+00
          5.77E-05
 OM34
+       -3.22E-07 -6.30E-07  9.48E-07 -6.72E-06 -1.25E-08 -3.54E-07  4.99E-07  0.00E+00  0.00E+00 -6.52E-08  0.00E+00  0.00E+00
         -1.26E-05  3.42E-05
 OM44
+        5.16E-06 -3.74E-06 -3.43E-06 -2.66E-06  1.99E-06 -2.42E-07  2.49E-07  0.00E+00  0.00E+00 -1.46E-07  0.00E+00  0.00E+00
          1.29E-06 -1.26E-05  7.98E-05
 SG11
+       -5.39E-08 -1.86E-08  4.17E-08 -8.48E-08 -5.48E-08 -1.79E-08  1.28E-08  0.00E+00  0.00E+00 -2.68E-08  0.00E+00  0.00E+00
         -4.24E-08  5.74E-08 -1.85E-08  1.17E-07

 ********************                              MCMC BAYESIAN ANALYSIS                            ********************
 ********************              CORRELATION MATRIX OF ESTIMATE (From Sample Variance)             ********************

            TH 1      TH 2      TH 3      TH 4      TH 5      OM11      OM12      OM13      OM14      OM22      OM23      OM24
             OM33      OM34      OM44      SG11
 TH 1
+        1.55E-02
 TH 2
+       -2.62E-01  1.25E-02
 TH 3
+       -1.94E-02 -1.34E-02  2.32E-02
 TH 4
+       -5.28E-03  7.54E-03 -2.15E-01  2.51E-02
 TH 5
+       -5.56E-03  6.45E-03 -3.51E-03 -1.67E-03  2.69E-02
 OM11
+        1.50E-02 -1.51E-02  9.65E-03 -1.49E-02 -1.10E-02  5.03E-03
 OM12
+        4.10E-03  1.96E-02 -7.46E-04  4.22E-03  8.74E-03 -3.76E-01  2.89E-03
 OM13
+       ......... ......... ......... ......... ......... ......... ......... .........
 OM14
+       ......... ......... ......... ......... ......... ......... ......... ......... .........
 OM22
+        2.05E-02 -4.03E-02  3.10E-03  6.59E-03 -6.51E-03  9.75E-02 -3.63E-01  0.00E+00  0.00E+00  3.20E-03
 OM23
+       ......... ......... ......... ......... ......... ......... ......... ......... ......... ......... .........
 OM24
+       ......... ......... ......... ......... ......... ......... ......... ......... ......... ......... ......... .........
 OM33
+        3.93E-03  4.99E-03 -2.51E-03  4.54E-03  1.69E-02  1.27E-03 -1.96E-02  0.00E+00  0.00E+00  1.45E-02  0.00E+00  0.00E+00
          7.59E-03
 OM34
+       -3.55E-03 -8.59E-03  6.99E-03 -4.58E-02 -7.97E-05 -1.20E-02  2.95E-02  0.00E+00  0.00E+00 -3.48E-03  0.00E+00  0.00E+00
         -2.85E-01  5.85E-03
 OM44
+        3.72E-02 -3.34E-02 -1.66E-02 -1.19E-02  8.28E-03 -5.38E-03  9.66E-03  0.00E+00  0.00E+00 -5.11E-03  0.00E+00  0.00E+00
          1.89E-02 -2.41E-01  8.94E-03
 SG11
+       -1.01E-02 -4.32E-03  5.25E-03 -9.87E-03 -5.95E-03 -1.04E-02  1.30E-02  0.00E+00  0.00E+00 -2.45E-02  0.00E+00  0.00E+00
         -1.63E-02  2.87E-02 -6.03E-03  3.42E-04
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 Elapsed postprocess time in seconds:     0.29
 Elapsed finaloutput time in seconds:     0.03
 #CPUT: Total CPU Time in Seconds,      869.674
