Mon 03/11/2019
11:18 AM
;Model Desc: Population Mixture Problem in 1 Compartment model, with Volume and rate constant parameters
;            and their inter-subject variances modeled from two sub-populations
;Project Name: nm7examples
;Project ID: NO PROJECT DESCRIPTION

$PROB RUN#  pmixture.ctl
$INPUT C SET ID JID TIME CONC=DV DOSE=AMT RATE EVID MDV CMT VC1 K101 VC2 K102 SIGZ PROB
$DATA pmixture.csv IGNORE=C

$SUBROUTINES ADVAN1 TRANS1

; The mixture model uses THETA(5) as the mixture proportion parameter, defining the proportion
; of subjects in sub-population 1 (P(1), and in sub-population 2 (P(2)
$MIX
P(1)=THETA(5)
P(2)=1.0-THETA(5)
NSPOP=2

; Prior information setup for OMEGAS only

$PK
;  The MUs should always be unconditionally defined, that is, they should never be
; defined in IF?THEN blocks
; THETA(1) models the Volume of sub-population 1
MU_1=THETA(1)
; THETA(2) models the clearance of sub-population 1
MU_2=THETA(2)
; THETA(3) models the Volume of sub-population 2
MU_3=THETA(3)
; THETA(4) models the clearance of sub-population 2
MU_4=THETA(4)
VCM=DEXP(MU_1+ETA(1))
K10M=DEXP(MU_2+ETA(2))
VCF=DEXP(MU_3+ETA(3))
K10F=DEXP(MU_4+ETA(4))
Q=1
IF(MIXNUM.EQ.2) Q=0
V=Q*VCM+(1.0-Q)*VCF
K=Q*K10M+(1.0-Q)*K10F
S1=V
BESTSUB=MIXEST

$ERROR
Y = F + F*EPS(1)

; Initial THETAs
$THETA 4.3 -2.9 4.3 -0.67 (0.00001,0.5,0.99999)

;Initial OMEGA block 1, for sub-population 1
$OMEGA BLOCK(2)
 .04 ;[p]
 .01 ; [f]
.027; [p]

;Initial OMEGA block 2, for sub-population 2
$OMEGA BLOCK(2)
 .05; [p]
 .01; [f]
.06; [p]

$SIGMA
0.01 ;[p]

$EST MAXEVAL=9999 NSIG=3 SIGL=12 PRINT=1 METHOD=CONDITIONAL INTERACTION NOABORT
$COV MATRIX=R UNCONDITIONAL

$TABLE ID V K BESTSUB FIRSTONLY NOPRINT NOAPPEND FILE=pmixture_foce.par

NM-TRAN MESSAGES
 WARNINGS AND ERRORS (IF ANY) FOR PROBLEM    1
 (WARNING  2) NM-TRAN INFERS THAT THE DATA ARE POPULATION.

1NONLINEAR MIXED EFFECTS MODEL PROGRAM (NONMEM) VERSION 7.4.3
 ORIGINALLY DEVELOPED BY STUART BEAL, LEWIS SHEINER, AND ALISON BOECKMANN
 CURRENT DEVELOPERS ARE ROBERT BAUER, ICON DEVELOPMENT SOLUTIONS,
 AND ALISON BOECKMANN. IMPLEMENTATION, EFFICIENCY, AND STANDARDIZATION
 PERFORMED BY NOUS INFOSYSTEMS.
 PROBLEM NO.:         1
 RUN#  pmixture.ctl
 TOT. NO. OF OBS RECS:     2400
 TOT. NO. OF INDIVIDUALS:      300
 ONE COMPARTMENT MODEL (ADVAN1)
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 #TBLN:      1
 #METH: First Order Conditional Estimation with Interaction
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
 #TERM:
0MINIMIZATION SUCCESSFUL
 NO. OF FUNCTION EVALUATIONS USED:      294
 NO. OF SIG. DIGITS IN FINAL EST.:  3.2

 ETABAR IS THE ARITHMETIC MEAN OF THE ETA-ESTIMATES,
 AND SE IS THE ASSOCIATED STANDARD ERROR.

 SUBMODEL    1

 ETABAR:        -1.0847E-03  2.4070E-03  0.0000E+00  0.0000E+00
 SE:             1.4890E-02  1.1050E-02  0.0000E+00  0.0000E+00
 N:                     200         200           0           0

 ETASHRINKSD(%)  1.7675E+00  5.0797E+00  1.0000E+02  1.0000E+02
 ETASHRINKVR(%)  3.5037E+00  9.9015E+00  1.0000E+02  1.0000E+02
 EBVSHRINKSD(%)  1.9974E+00  5.0713E+00  1.0000E+02  1.0000E+02
 EBVSHRINKVR(%)  3.9549E+00  9.8854E+00  1.0000E+02  1.0000E+02
 EPSSHRINKSD(%)  1.1419E+01
 EPSSHRINKVR(%)  2.1535E+01


 SUBMODEL    2

 ETABAR:         0.0000E+00  0.0000E+00 -2.6046E-04  4.3527E-04
 SE:             0.0000E+00  0.0000E+00  2.1779E-02  2.4454E-02
 N:                       0           0         100         100

 ETASHRINKSD(%)  1.0000E+02  1.0000E+02  1.4286E+00  1.0000E-10
 ETASHRINKVR(%)  1.0000E+02  1.0000E+02  2.8368E+00  1.0000E-10
 EBVSHRINKSD(%)  1.0000E+02  1.0000E+02  1.9135E+00  1.0474E-01
 EBVSHRINKVR(%)  1.0000E+02  1.0000E+02  3.7904E+00  2.0936E-01
 EPSSHRINKSD(%)  1.4368E+01
 EPSSHRINKVR(%)  2.6672E+01


 TOTAL DATA POINTS NORMALLY DISTRIBUTED (N):         2400
 N*LOG(2PI) CONSTANT TO OBJECTIVE FUNCTION:    4410.90495938243
 OBJECTIVE FUNCTION VALUE WITHOUT CONSTANT:   -9961.74617897560
 OBJECTIVE FUNCTION VALUE WITH CONSTANT:      -5550.84121959317
 REPORTED OBJECTIVE FUNCTION DOES NOT CONTAIN CONSTANT

 TOTAL EFFECTIVE ETAS (NIND*NETA):                           600


 #TERE:
 Elapsed estimation  time in seconds:    27.43
 Elapsed covariance  time in seconds:    19.45
 Elapsed postprocess time in seconds:     0.32

 ********************               FIRST ORDER CONDITIONAL ESTIMATION WITH INTERACTION              ********************
 #OBJT:**************                       MINIMUM VALUE OF OBJECTIVE FUNCTION                      ********************
 #OBJV:********************************************    -9961.746       **************************************************

 ********************               FIRST ORDER CONDITIONAL ESTIMATION WITH INTERACTION              ********************
 ********************                             FINAL PARAMETER ESTIMATE                           ********************

 THETA - VECTOR OF FIXED EFFECTS PARAMETERS   *********
         TH 1      TH 2      TH 3      TH 4      TH 5
         4.24E+00 -2.30E+00  4.26E+00 -6.76E-01  6.67E-01

 OMEGA - COV MATRIX FOR RANDOM EFFECTS - ETAS  ********
         ETA1      ETA2      ETA3      ETA4
 ETA1
+        4.62E-02
 ETA2
+       -8.58E-03  2.72E-02
 ETA3
+        0.00E+00  0.00E+00  4.93E-02
 ETA4
+        0.00E+00  0.00E+00 -1.10E-02  6.00E-02

 SIGMA - COV MATRIX FOR RANDOM EFFECTS - EPSILONS  ****
         EPS1
 EPS1
+        1.02E-02

 OMEGA - CORR MATRIX FOR RANDOM EFFECTS - ETAS  *******
         ETA1      ETA2      ETA3      ETA4
 ETA1
+        2.15E-01
 ETA2
+       -2.42E-01  1.65E-01
 ETA3
+        0.00E+00  0.00E+00  2.22E-01
 ETA4
+        0.00E+00  0.00E+00 -2.03E-01  2.45E-01

 SIGMA - CORR MATRIX FOR RANDOM EFFECTS - EPSILONS  ***
         EPS1
 EPS1
+        1.01E-01

 ********************               FIRST ORDER CONDITIONAL ESTIMATION WITH INTERACTION              ********************
 ********************                            STANDARD ERROR OF ESTIMATE                          ********************

 THETA - VECTOR OF FIXED EFFECTS PARAMETERS   *********
         TH 1      TH 2      TH 3      TH 4      TH 5
         1.55E-02  1.23E-02  2.26E-02  2.45E-02  2.72E-02

 OMEGA - COV MATRIX FOR RANDOM EFFECTS - ETAS  ********
         ETA1      ETA2      ETA3      ETA4
 ETA1
+        4.81E-03
 ETA2
+        2.79E-03  3.02E-03
 ETA3
+       ......... .........  7.25E-03
 ETA4
+       ......... .........  5.67E-03  8.51E-03

 SIGMA - COV MATRIX FOR RANDOM EFFECTS - EPSILONS  ****
         EPS1
 EPS1
+        3.43E-04

 OMEGA - CORR MATRIX FOR RANDOM EFFECTS - ETAS  *******
         ETA1      ETA2      ETA3      ETA4
 ETA1
+        1.12E-02
 ETA2
+        7.13E-02  9.15E-03
 ETA3
+       ......... .........  1.63E-02
 ETA4
+       ......... .........  9.79E-02  1.74E-02

 SIGMA - CORR MATRIX FOR RANDOM EFFECTS - EPSILONS  ***
         EPS1
 EPS1
+        1.70E-03

 ********************               FIRST ORDER CONDITIONAL ESTIMATION WITH INTERACTION              ********************
 ********************                          COVARIANCE MATRIX OF ESTIMATE                         ********************

            TH 1      TH 2      TH 3      TH 4      TH 5      OM11      OM12      OM13      OM14      OM22      OM23      OM24
             OM33      OM34      OM44      SG11
 TH 1
+        2.41E-04
 TH 2
+       -5.01E-05  1.51E-04
 TH 3
+        1.10E-07  1.88E-08  5.13E-04
 TH 4
+       -1.66E-09  1.74E-08 -1.13E-04  6.01E-04
 TH 5
+       -9.36E-10  5.13E-09  2.49E-09  2.33E-08  7.41E-04
 OM11
+        3.68E-08 -1.47E-07 -1.98E-08 -1.17E-09 -2.72E-10  2.32E-05
 OM12
+       -8.02E-08  3.88E-07  1.48E-08 -1.21E-09 -4.24E-10 -4.83E-06  7.79E-06
 OM13
+       ......... ......... ......... ......... ......... ......... ......... .........
 OM14
+       ......... ......... ......... ......... ......... ......... ......... ......... .........
 OM22
+        3.23E-07 -1.28E-06 -2.78E-08  8.02E-09  2.52E-09  9.95E-07 -3.00E-06 ......... .........  9.13E-06
 OM23
+       ......... ......... ......... ......... ......... ......... ......... ......... ......... ......... .........
 OM24
+       ......... ......... ......... ......... ......... ......... ......... ......... ......... ......... ......... .........
 OM33
+       -2.24E-08 -3.10E-09  1.06E-07 -6.77E-08  4.69E-10  3.90E-09 -2.99E-09 ......... .........  5.99E-09 ......... .........
          5.26E-05
 OM34
+        4.74E-09 -1.72E-09 -1.87E-07  2.12E-07 -3.08E-09 -7.81E-10  9.56E-10 ......... ......... -2.16E-09 ......... .........
         -1.16E-05  3.21E-05
 OM44
+        3.80E-10 -1.83E-08  4.06E-07 -7.49E-07 -2.44E-08  1.46E-09  1.07E-09 ......... ......... -8.01E-09 ......... .........
          2.59E-06 -1.36E-05  7.24E-05
 SG11
+        1.15E-07  1.75E-08  1.14E-07  1.46E-09 -4.32E-12 -2.06E-08  1.57E-08 ......... ......... -2.98E-08 ......... .........
         -2.31E-08  3.97E-09 -2.88E-09  1.18E-07

 ********************               FIRST ORDER CONDITIONAL ESTIMATION WITH INTERACTION              ********************
 ********************                          CORRELATION MATRIX OF ESTIMATE                        ********************

            TH 1      TH 2      TH 3      TH 4      TH 5      OM11      OM12      OM13      OM14      OM22      OM23      OM24
             OM33      OM34      OM44      SG11
 TH 1
+        1.55E-02
 TH 2
+       -2.62E-01  1.23E-02
 TH 3
+        3.14E-04  6.74E-05  2.26E-02
 TH 4
+       -4.37E-06  5.76E-05 -2.04E-01  2.45E-02
 TH 5
+       -2.22E-06  1.53E-05  4.04E-06  3.49E-05  2.72E-02
 OM11
+        4.92E-04 -2.48E-03 -1.82E-04 -9.91E-06 -2.07E-06  4.81E-03
 OM12
+       -1.85E-03  1.13E-02  2.34E-04 -1.77E-05 -5.59E-06 -3.60E-01  2.79E-03
 OM13
+       ......... ......... ......... ......... ......... ......... ......... .........
 OM14
+       ......... ......... ......... ......... ......... ......... ......... ......... .........
 OM22
+        6.90E-03 -3.46E-02 -4.06E-04  1.08E-04  3.06E-05  6.84E-02 -3.56E-01 ......... .........  3.02E-03
 OM23
+       ......... ......... ......... ......... ......... ......... ......... ......... ......... ......... .........
 OM24
+       ......... ......... ......... ......... ......... ......... ......... ......... ......... ......... ......... .........
 OM33
+       -1.99E-04 -3.47E-05  6.46E-04 -3.81E-04  2.38E-06  1.12E-04 -1.48E-04 ......... .........  2.73E-04 ......... .........
          7.25E-03
 OM34
+        5.39E-05 -2.47E-05 -1.46E-03  1.53E-03 -1.99E-05 -2.86E-05  6.05E-05 ......... ......... -1.26E-04 ......... .........
         -2.83E-01  5.67E-03
 OM44
+        2.88E-06 -1.75E-04  2.11E-03 -3.59E-03 -1.05E-04  3.57E-05  4.50E-05 ......... ......... -3.12E-04 ......... .........
          4.19E-02 -2.83E-01  8.51E-03
 SG11
+        2.16E-02  4.15E-03  1.46E-02  1.73E-04 -4.63E-07 -1.25E-02  1.64E-02 ......... ......... -2.87E-02 ......... .........
         -9.27E-03  2.04E-03 -9.86E-04  3.43E-04
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 Elapsed finaloutput time in seconds:     0.12
 #CPUT: Total CPU Time in Seconds,       45.069
