Tue 03/12/2019
10:41 AM
$PROB Urine DAta problem (urine.ctl)

$INPUT ID TIME AMT RATE DV MDV EVID CMT UVOL

$DATA urine.dat IGNORE=@

$SUBROUTINE ADVAN1 TRANS2

$PK
MU_1=THETA(1)
MU_2=THETA(2)
MU_3=THETA(3)
CL=EXP(MU_1+ETA(1))
V=EXP(MU_2+ETA(2))
CLR=EXP(MU_3+ETA(3))
F2=CLR/CL

$ERROR
CP=A(1)/V
UVL=UVOL
IF(UVL<=0.0) UVL=1.0
CU=A(2)/UVL
IX=0
IF(CMT==1) THEN
IPRE=CP
W=IPRE+1.0E-10
Y=IPRE + W*EPS(1)
ELSE
IPRE=CU
W=IPRE+1.0E-10
Y=IPRE + W*EPS(2)
ENDIF

$THETA
2 ; [LN(CL)]
4 ; [LN(V)]
1 ; [LN(CLR)]

$OMEGA BLOCK(3) VALUES(0.1,0.001) ;[P]

$SIGMA
0.1 ;[P]
0.1 ;[P]

$EST METHOD=IMP PRINT=1 AUTO=1
$COV UNCONDITIONAL MATRIX=R PRINT=E
$TABLE ID TIME AMT RATE DV IPRE MDV EVID CMT UVOL CL V CLR NOAPPEND ONEHEADER NOPRINT FILE=urine.tab

NM-TRAN MESSAGES
 WARNINGS AND ERRORS (IF ANY) FOR PROBLEM    1
 (WARNING  2) NM-TRAN INFERS THAT THE DATA ARE POPULATION.
 (WARNING  121) INTERACTION IS IMPLIED WITH EM/BAYES ESTIMATION METHODS
 (WARNING  23) $PK DOES NOT DEFINE A SCALE PARAMETER FOR THE CENTRAL
 COMPARTMENT.  WITH THIS TRANS, IT MAY NOT BE POSSIBLE TO SEPARATELY
 OBTAIN ESTIMATES OF PARAMETERS AFFECTING CLEARANCE AND VOLUME.

1NONLINEAR MIXED EFFECTS MODEL PROGRAM (NONMEM) VERSION 7.4.3
 ORIGINALLY DEVELOPED BY STUART BEAL, LEWIS SHEINER, AND ALISON BOECKMANN
 CURRENT DEVELOPERS ARE ROBERT BAUER, ICON DEVELOPMENT SOLUTIONS,
 AND ALISON BOECKMANN. IMPLEMENTATION, EFFICIENCY, AND STANDARDIZATION
 PERFORMED BY NOUS INFOSYSTEMS.
 PROBLEM NO.:         1
 Urine DAta problem (urine.ctl)
 TOT. NO. OF OBS RECS:      800
 TOT. NO. OF INDIVIDUALS:       50
 ONE COMPARTMENT MODEL (ADVAN1)
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 #TBLN:      1
 #METH: Importance Sampling (No Prior)
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
 #TERM:
 OPTIMIZATION WAS COMPLETED

 ETABAR IS THE ARITHMETIC MEAN OF THE ETA-ESTIMATES,
 AND THE P-VALUE IS GIVEN FOR THE NULL HYPOTHESIS THAT THE TRUE MEAN IS 0.

 ETABAR:         5.1846E-04  4.9092E-04  7.8172E-04
 SE:             2.3441E-02  2.6728E-02  2.6764E-02
 N:                      50          50          50

 P VAL.:         9.8235E-01  9.8535E-01  9.7670E-01

 ETASHRINKSD(%)  1.3274E+00  1.7273E+00  5.8876E+00
 ETASHRINKVR(%)  2.6371E+00  3.4248E+00  1.1429E+01
 EBVSHRINKSD(%)  1.7162E+00  2.1535E+00  5.9706E+00
 EBVSHRINKVR(%)  3.4030E+00  4.2606E+00  1.1585E+01
 EPSSHRINKSD(%)  1.0383E+01  7.7594E+00
 EPSSHRINKVR(%)  1.9689E+01  1.4917E+01


 TOTAL DATA POINTS NORMALLY DISTRIBUTED (N):          800
 N*LOG(2PI) CONSTANT TO OBJECTIVE FUNCTION:    1470.30165312748
 OBJECTIVE FUNCTION VALUE WITHOUT CONSTANT:    54.1243773640488
 OBJECTIVE FUNCTION VALUE WITH CONSTANT:       1524.42603049153
 REPORTED OBJECTIVE FUNCTION DOES NOT CONTAIN CONSTANT

 TOTAL EFFECTIVE ETAS (NIND*NETA):                           150


 #TERE:
 Elapsed estimation  time in seconds:     4.27
 Elapsed covariance  time in seconds:     0.49

 ********************                          IMPORTANCE SAMPLING (NO PRIOR)                        ********************
 #OBJT:**************                        FINAL VALUE OF OBJECTIVE FUNCTION                       ********************
 #OBJV:********************************************       54.124       **************************************************

 ********************                          IMPORTANCE SAMPLING (NO PRIOR)                        ********************
 ********************                             FINAL PARAMETER ESTIMATE                           ********************

 THETA - VECTOR OF FIXED EFFECTS PARAMETERS   *********
         TH 1      TH 2      TH 3
         1.58E+00  3.70E+00  6.95E-01

 OMEGA - COV MATRIX FOR RANDOM EFFECTS - ETAS  ********
         ETA1      ETA2      ETA3
 ETA1
+        2.88E-02
 ETA2
+       -2.22E-03  3.77E-02
 ETA3
+        5.74E-03 -9.04E-03  4.13E-02

 SIGMA - COV MATRIX FOR RANDOM EFFECTS - EPSILONS  ****
         EPS1      EPS2
 EPS1
+        8.68E-03
 EPS2
+        0.00E+00  3.27E-02

 OMEGA - CORR MATRIX FOR RANDOM EFFECTS - ETAS  *******
         ETA1      ETA2      ETA3
 ETA1
+        1.70E-01
 ETA2
+       -6.73E-02  1.94E-01
 ETA3
+        1.67E-01 -2.29E-01  2.03E-01

 SIGMA - CORR MATRIX FOR RANDOM EFFECTS - EPSILONS  ***
         EPS1      EPS2
 EPS1
+        9.31E-02
 EPS2
+        0.00E+00  1.81E-01

 ********************                          IMPORTANCE SAMPLING (NO PRIOR)                        ********************
 ********************                          STANDARD ERROR OF ESTIMATE (R)                        ********************

 THETA - VECTOR OF FIXED EFFECTS PARAMETERS   *********
         TH 1      TH 2      TH 3
         2.44E-02  2.81E-02  3.06E-02

 OMEGA - COV MATRIX FOR RANDOM EFFECTS - ETAS  ********
         ETA1      ETA2      ETA3
 ETA1
+        5.94E-03
 ETA2
+        4.84E-03  7.84E-03
 ETA3
+        5.34E-03  6.17E-03  9.29E-03

 SIGMA - COV MATRIX FOR RANDOM EFFECTS - EPSILONS  ****
         EPS1      EPS2
 EPS1
+        6.59E-04
 EPS2
+        0.00E+00  2.80E-03

 OMEGA - CORR MATRIX FOR RANDOM EFFECTS - ETAS  *******
         ETA1      ETA2      ETA3
 ETA1
+        1.75E-02
 ETA2
+        1.46E-01  2.02E-02
 ETA3
+        1.48E-01  1.46E-01  2.29E-02

 SIGMA - CORR MATRIX FOR RANDOM EFFECTS - EPSILONS  ***
         EPS1      EPS2
 EPS1
+        3.54E-03
 EPS2
+       .........  7.74E-03

 ********************                          IMPORTANCE SAMPLING (NO PRIOR)                        ********************
 ********************                        COVARIANCE MATRIX OF ESTIMATE (R)                       ********************

            TH 1      TH 2      TH 3      OM11      OM12      OM13      OM22      OM23      OM33      SG11      SG12      SG22
 TH 1
+        5.98E-04
 TH 2
+       -1.96E-05  7.90E-04
 TH 3
+        1.32E-04 -1.67E-04  9.39E-04
 OM11
+       -1.06E-06  8.31E-07  1.55E-07  3.53E-05
 OM12
+       -1.11E-07 -2.11E-07  3.28E-07 -1.44E-06  2.34E-05
 OM13
+       -2.77E-07  4.97E-07  3.63E-07  8.05E-06 -5.31E-06  2.85E-05
 OM22
+       -3.50E-07 -1.37E-06  1.37E-06  2.84E-07 -2.19E-06  5.48E-07  6.14E-05
 OM23
+        3.53E-07  5.04E-07 -6.12E-07 -4.33E-07  5.61E-06 -2.35E-06 -1.40E-05  3.81E-05
 OM33
+        5.92E-07  4.01E-07 -3.30E-06  1.74E-06 -2.40E-06  1.25E-05  2.98E-06 -1.59E-05  8.63E-05
 SG11
+        2.93E-07  3.23E-07  2.54E-07 -6.01E-08 -5.44E-08 -4.55E-08 -4.87E-08 -3.14E-08 -6.18E-08  4.34E-07
 SG12
+       ......... ......... ......... ......... ......... ......... ......... ......... ......... ......... .........
 SG22
+        4.47E-08 -8.91E-08 -5.26E-06 -8.95E-08 -7.06E-09  3.31E-09 -3.16E-07  1.92E-07 -1.22E-06 -3.55E-08  0.00E+00  7.83E-06

 ********************                          IMPORTANCE SAMPLING (NO PRIOR)                        ********************
 ********************                        CORRELATION MATRIX OF ESTIMATE (R)                      ********************

            TH 1      TH 2      TH 3      OM11      OM12      OM13      OM22      OM23      OM33      SG11      SG12      SG22
 TH 1
+        2.44E-02
 TH 2
+       -2.85E-02  2.81E-02
 TH 3
+        1.77E-01 -1.94E-01  3.06E-02
 OM11
+       -7.33E-03  4.98E-03  8.50E-04  5.94E-03
 OM12
+       -9.36E-04 -1.55E-03  2.22E-03 -5.00E-02  4.84E-03
 OM13
+       -2.12E-03  3.32E-03  2.22E-03  2.54E-01 -2.06E-01  5.34E-03
 OM22
+       -1.83E-03 -6.20E-03  5.71E-03  6.10E-03 -5.79E-02  1.31E-02  7.84E-03
 OM23
+        2.34E-03  2.90E-03 -3.23E-03 -1.18E-02  1.88E-01 -7.12E-02 -2.90E-01  6.17E-03
 OM33
+        2.61E-03  1.54E-03 -1.16E-02  3.16E-02 -5.33E-02  2.52E-01  4.09E-02 -2.76E-01  9.29E-03
 SG11
+        1.82E-02  1.75E-02  1.26E-02 -1.53E-02 -1.71E-02 -1.29E-02 -9.43E-03 -7.73E-03 -1.01E-02  6.59E-04
 SG12
+       ......... ......... ......... ......... ......... ......... ......... ......... ......... ......... .........
 SG22
+        6.53E-04 -1.13E-03 -6.14E-02 -5.39E-03 -5.22E-04  2.22E-04 -1.44E-02  1.11E-02 -4.68E-02 -1.93E-02  0.00E+00  2.80E-03
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
 ********************                          IMPORTANCE SAMPLING (NO PRIOR)                        ********************
 ********************                    EIGENVALUES OF COR MATRIX OF ESTIMATE (R)                   ********************

             1         2         3         4         5         6         7         8         9        10        11
         5.43E-01  6.99E-01  7.43E-01  9.15E-01  9.48E-01  9.64E-01  1.01E+00  1.03E+00  1.22E+00  1.29E+00  1.64E+00
 Elapsed postprocess time in seconds:     0.04
 Elapsed finaloutput time in seconds:     0.16
 #CPUT: Total CPU Time in Seconds,        4.711
