Mon 02/22/2021
04:08 PM
$PROBLEM WARFARIN PK/PD
$INPUT ID TIME AMT RATE EVID MDV DV CMT TSTRAT TMIN TMAX

$DATA warfarin_pkpd2.csv ignore=C

$SUBROUTINES ADVAN13 TRANS1 TOL=12 ATOL=12

$MODEL NCOMPARTMENTS=3

$PK
MU_1=LOG(THETA(1))
MU_2=LOG(THETA(2))
MU_3=LOG(THETA(3))
MU_4=LOG(THETA(4))
MU_5=LOG(THETA(5))
MU_6=LOG(THETA(6))

KA=EXP(MU_1+ETA(1))
CL=EXP(MU_2+ETA(2))
V=EXP(MU_3+ETA(3))
RIN=EXP(MU_4+ETA(4))
IC50=EXP(MU_5+ETA(5))
KOUT=EXP(MU_6+ETA(6))
IMAX=1.0

S2=V
F1=1.0
A_0(3)=RIN/KOUT

$DES
DADT(1)=-KA*A(1)
DADT(2)=KA*A(1)-(CL/V)*A(2)
DADT(3)=RIN*(1.0-((IMAX*A(2)/V)/((A(2)/V)+IC50)))-KOUT*A(3)

$ERROR
IF(CMT==2) THEN
IPRED=A(2)/V
W=IPRED
Y=IPRED + W*EPS(1)
ENDIF
IF(CMT==3) THEN
IPRED=A(3)
W=1.0
Y=IPRED + W*EPS(2)
ENDIF

$THETA
1.60 ;[KA]
0.133 ;[CL]
7.95 ;[V]
5.41 ;[RIN]
1.20 ;[IC50]
0.056 ;[KOUT]

$OMEGA 0.701 0.063 0.020 0.190 0.013 0.016
$SIGMA 0.04 0.00150544

$DESIGN GROUPSIZE=26 FIMTYPE=1 VARCROSS=1 APPROX=FO
        SIGL=12 MAXEVAL=9999 PRINT=100
        DESEL=TIME DESELSTRAT=TSTRAT DESELMIN=TMIN DESELMAX=TMAX

$TABLE ID TIME CMT TSTRAT TMIN TMAX EVID MDV IPRED NOAPPEND NOPRINT FILE=warfarin_pkpd_opt2.tab

NM-TRAN MESSAGES
 WARNINGS AND ERRORS (IF ANY) FOR PROBLEM    1
 (WARNING  2) NM-TRAN INFERS THAT THE DATA ARE POPULATION.
 (WARNING  3) THERE MAY BE AN ERROR IN THE ABBREVIATED CODE. THE FOLLOWING
 ONE OR MORE RANDOM VARIABLES ARE DEFINED WITH "IF" STATEMENTS THAT DO NOT
 PROVIDE DEFINITIONS FOR BOTH THE "THEN" AND "ELSE" CASES. IF ALL
 CONDITIONS FAIL, THE VALUES OF THESE VARIABLES WILL BE ZERO.
   IPRED W Y

1NONLINEAR MIXED EFFECTS MODEL PROGRAM (NONMEM) VERSION 7.5.0
 ORIGINALLY DEVELOPED BY STUART BEAL, LEWIS SHEINER, AND ALISON BOECKMANN
 CURRENT DEVELOPERS ARE ROBERT BAUER, ICON DEVELOPMENT SOLUTIONS,
 AND ALISON BOECKMANN. IMPLEMENTATION, EFFICIENCY, AND STANDARDIZATION
 PERFORMED BY NOUS INFOSYSTEMS.
 PROBLEM NO.:         1
 WARFARIN PK/PD
 TOT. NO. OF OBS RECS:       16
 TOT. NO. OF INDIVIDUALS:        2
 GENERAL NONLINEAR KINETICS MODEL WITH STIFF/NONSTIFF EQUATIONS (LSODA, ADVAN13)
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 #TBLN:      1
 #METH: First Order: D-OPTIMALITY
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
 #TERM:
 NO. OF FUNCTION EVALUATIONS USED:     6494
0MINIMIZATION SUCCESSFUL

 ETABAR IS THE ARITHMETIC MEAN OF THE ETA-ESTIMATES,
 AND THE P-VALUE IS GIVEN FOR THE NULL HYPOTHESIS THAT THE TRUE MEAN IS 0.

 ETABAR:         0.0000E+00  0.0000E+00  0.0000E+00  0.0000E+00  0.0000E+00  0.0000E+00
 SE:             0.0000E+00  0.0000E+00  0.0000E+00  0.0000E+00  0.0000E+00  0.0000E+00
 N:                       2           2           2           2           2           2

 P VAL.:         1.0000E+00  1.0000E+00  1.0000E+00  1.0000E+00  1.0000E+00  1.0000E+00

 ETASHRINKSD(%)  1.0000E+02  1.0000E+02  1.0000E+02  1.0000E+02  1.0000E+02  1.0000E+02
 ETASHRINKVR(%)  1.0000E+02  1.0000E+02  1.0000E+02  1.0000E+02  1.0000E+02  1.0000E+02
 EBVSHRINKSD(%)  6.4485E+00  3.9442E+00  1.9245E+01  2.4957E-02  2.7544E+01  3.1492E-01
 EBVSHRINKVR(%)  1.2481E+01  7.7329E+00  3.4786E+01  4.9908E-02  4.7501E+01  6.2884E-01
 RELATIVEINF(%)  8.5806E+01  8.2183E+01  5.8246E+01  9.9930E+01  4.4282E+01  9.9116E+01
 EPSSHRINKSD(%)  5.0000E+01  5.0000E+01
 EPSSHRINKVR(%)  7.5000E+01  7.5000E+01

 #TERE:
 Elapsed opt. design time in seconds:    48.42
 Elapsed postprocess time in seconds:     0.04

 ********************                            FIRST ORDER: D-OPTIMALITY                           ********************
 #OBJT:**************                MINIMUM VALUE OF OBJECTIVE FUNCTION: D-OPTIMALITY               ********************
 #OBJV:********************************************     -117.526       **************************************************

 ********************                            FIRST ORDER: D-OPTIMALITY                           ********************
 ********************                             FINAL PARAMETER ESTIMATE                           ********************

 THETA - VECTOR OF FIXED EFFECTS PARAMETERS   *********
         TH 1      TH 2      TH 3      TH 4      TH 5      TH 6
         1.60E+00  1.33E-01  7.95E+00  5.41E+00  1.20E+00  5.60E-02

 OMEGA - COV MATRIX FOR RANDOM EFFECTS - ETAS  ********
         ETA1      ETA2      ETA3      ETA4      ETA5      ETA6
 ETA1
+        7.01E-01
 ETA2
+        0.00E+00  6.30E-02
 ETA3
+        0.00E+00  0.00E+00  2.00E-02
 ETA4
+        0.00E+00  0.00E+00  0.00E+00  1.90E-01
 ETA5
+        0.00E+00  0.00E+00  0.00E+00  0.00E+00  1.30E-02
 ETA6
+        0.00E+00  0.00E+00  0.00E+00  0.00E+00  0.00E+00  1.60E-02

 SIGMA - COV MATRIX FOR RANDOM EFFECTS - EPSILONS  ****
         EPS1      EPS2
 EPS1
+        4.00E-02
 EPS2
+        0.00E+00  1.51E-03

 OMEGA - CORR MATRIX FOR RANDOM EFFECTS - ETAS  *******
         ETA1      ETA2      ETA3      ETA4      ETA5      ETA6
 ETA1
+        8.37E-01
 ETA2
+        0.00E+00  2.51E-01
 ETA3
+        0.00E+00  0.00E+00  1.41E-01
 ETA4
+        0.00E+00  0.00E+00  0.00E+00  4.36E-01
 ETA5
+        0.00E+00  0.00E+00  0.00E+00  0.00E+00  1.14E-01
 ETA6
+        0.00E+00  0.00E+00  0.00E+00  0.00E+00  0.00E+00  1.26E-01

 SIGMA - CORR MATRIX FOR RANDOM EFFECTS - EPSILONS  ***
         EPS1      EPS2
 EPS1
+        2.00E-01
 EPS2
+        0.00E+00  3.88E-02

 ********************                            FIRST ORDER: D-OPTIMALITY                           ********************
 ********************                            STANDARD ERROR OF ESTIMATE                          ********************

 THETA - VECTOR OF FIXED EFFECTS PARAMETERS   *********
         TH 1      TH 2      TH 3      TH 4      TH 5      TH 6
         2.02E-01  5.14E-03  2.07E-01  3.27E-01  2.91E-02  9.87E-04

 OMEGA - COV MATRIX FOR RANDOM EFFECTS - ETAS  ********
         ETA1      ETA2      ETA3      ETA4      ETA5      ETA6
 ETA1
+        1.59E-01
 ETA2
+       .........  1.35E-02
 ETA3
+       ......... .........  6.09E-03
 ETA4
+       ......... ......... .........  3.73E-02
 ETA5
+       ......... ......... ......... .........  4.94E-03
 ETA6
+       ......... ......... ......... ......... .........  3.16E-03

 SIGMA - COV MATRIX FOR RANDOM EFFECTS - EPSILONS  ****
         EPS1      EPS2
 EPS1
+        5.56E-03
 EPS2
+       .........  4.18E-04

 OMEGA - CORR MATRIX FOR RANDOM EFFECTS - ETAS  *******
         ETA1      ETA2      ETA3      ETA4      ETA5      ETA6
 ETA1
+        9.50E-02
 ETA2
+       .........  2.68E-02
 ETA3
+       ......... .........  2.15E-02
 ETA4
+       ......... ......... .........  4.28E-02
 ETA5
+       ......... ......... ......... .........  2.17E-02
 ETA6
+       ......... ......... ......... ......... .........  1.25E-02

 SIGMA - CORR MATRIX FOR RANDOM EFFECTS - EPSILONS  ***
         EPS1      EPS2
 EPS1
+        1.39E-02
 EPS2
+       .........  5.38E-03
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 Elapsed finaloutput time in seconds:     0.22
 #CPUT: Total CPU Time in Seconds,       48.453
