Sat 08/07/2021
01:49 AM

$PROB RUN# Example 1 (from samp5l)
$INPUT C SET ID JID TIME  DV=CONC AMT=DOSE RATE EVID MDV CMT TSTRAT TMIN TMAX
$DATA optdesign2.csv IGNORE=C

$SUBROUTINES ADVAN3 TRANS4

$PK
; The thetas are MU modeled.
; Best that there is a linear relationship between THETAs and Mus
; The linear MU modeling of THETAS allows them to be efficiently
; Gibbs sampled.

MU_1=THETA(1)
MU_2=THETA(2)
MU_3=THETA(3)
MU_4=THETA(4)
CL=DEXP(MU_1+ETA(1))
V1=DEXP(MU_2+ETA(2))
Q=DEXP(MU_3+ETA(3))
V2=DEXP(MU_4+ETA(4))
S1=V1

$ERROR
IPRED=F
Y = F + F*EPS(1)+EPS(2)

; Initial values of THETA
$THETA
 1.68338E+00  1.58812E+00  8.12710E-01  2.37436E+00

;INITIAL values of OMEGA
;$OMEGA BLOCK(4) VALUES(0.0225,0.001)
$OMEGA (0.0225 UNINT)X4

;Initial value of SIGMA
$SIGMA
( 0.0225)
( 0.0001 UNINT)

$DESIGN NELDER FIMDIAG=1 OFVTYPE=6 APPROX=FO GROUPSIZE=100
           DESEL=TIME DESELSTRAT=TSTRAT DESELMIN=TMIN DESELMAX=TMAX
           MAXEVAL=9999 NOHABORT PRINT=20 SIGL=10 POSTHOC VARCROSS=1
$TABLE ID TSTRAT TIME EVID MDV DV IPRED NOPRINT NOAPPEND FILE=optdesign2.tab

NM-TRAN MESSAGES
 WARNINGS AND ERRORS (IF ANY) FOR PROBLEM    1
 (WARNING  2) NM-TRAN INFERS THAT THE DATA ARE POPULATION.

1NONLINEAR MIXED EFFECTS MODEL PROGRAM (NONMEM) VERSION 7.5.0
 ORIGINALLY DEVELOPED BY STUART BEAL, LEWIS SHEINER, AND ALISON BOECKMANN
 CURRENT DEVELOPERS ARE ROBERT BAUER, ICON DEVELOPMENT SOLUTIONS,
 AND ALISON BOECKMANN. IMPLEMENTATION, EFFICIENCY, AND STANDARDIZATION
 PERFORMED BY NOUS INFOSYSTEMS.
 PROBLEM NO.:         1
 RUN# Example 1 (from samp5l)
 TOT. NO. OF OBS RECS:        5
 TOT. NO. OF INDIVIDUALS:        1
 TWO COMPARTMENT MODEL (ADVAN3)
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 #TBLN:      1
 #METH: First Order: DS-OPTIMALITY
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
 #TERM:
 NO. OF FUNCTION EVALUATIONS USED:      211
0MINIMIZATION SUCCESSFUL

 ETABAR IS THE ARITHMETIC MEAN OF THE ETA-ESTIMATES,
 AND THE P-VALUE IS GIVEN FOR THE NULL HYPOTHESIS THAT THE TRUE MEAN IS 0.

 ETABAR:         0.0000E+00  0.0000E+00  0.0000E+00  0.0000E+00
 SE:             0.0000E+00  0.0000E+00  0.0000E+00  0.0000E+00
 N:                       1           1           1           1

 P VAL.:         1.0000E+00  1.0000E+00  1.0000E+00  1.0000E+00

 ETASHRINKSD(%)  1.0000E+02  1.0000E+02  1.0000E+02  1.0000E+02
 ETASHRINKVR(%)  1.0000E+02  1.0000E+02  1.0000E+02  1.0000E+02
 EBVSHRINKSD(%)  9.3956E+00  2.4123E+01  3.5285E+01  4.1963E+01
 EBVSHRINKVR(%)  1.7908E+01  4.2426E+01  5.8120E+01  6.6318E+01
 RELATIVEINF(%)  7.7604E+01  5.0513E+01  3.2306E+01  2.7001E+01
 EPSSHRINKSD(%)  5.5279E+01  5.5279E+01
 EPSSHRINKVR(%)  8.0000E+01  8.0000E+01


 #TERE:
 Elapsed opt. design time in seconds:     0.11
 Elapsed postprocess time in seconds:     0.00

 ********************                            FIRST ORDER: DS-OPTIMALITY                          ********************
 #OBJT:**************                MINIMUM VALUE OF OBJECTIVE FUNCTION: DS-OPTIMALITY              ********************
 #OBJV:********************************************      -42.182       **************************************************

 ********************                            FIRST ORDER: DS-OPTIMALITY                          ********************
 ********************                             FINAL PARAMETER ESTIMATE                           ********************

 THETA - VECTOR OF FIXED EFFECTS PARAMETERS   *********
         TH 1      TH 2      TH 3      TH 4
         1.68E+00  1.59E+00  8.13E-01  2.37E+00

 OMEGA - COV MATRIX FOR RANDOM EFFECTS - ETAS  ********
         ETA1      ETA2      ETA3      ETA4
 ETA1
+        2.25E-02
 ETA2
+        0.00E+00  2.25E-02
 ETA3
+        0.00E+00  0.00E+00  2.25E-02
 ETA4
+        0.00E+00  0.00E+00  0.00E+00  2.25E-02

 SIGMA - COV MATRIX FOR RANDOM EFFECTS - EPSILONS  ****
         EPS1      EPS2
 EPS1
+        2.25E-02
 EPS2
+        0.00E+00  1.00E-04

 OMEGA - CORR MATRIX FOR RANDOM EFFECTS - ETAS  *******
         ETA1      ETA2      ETA3      ETA4
 ETA1
+        1.50E-01
 ETA2
+        0.00E+00  1.50E-01
 ETA3
+        0.00E+00  0.00E+00  1.50E-01
 ETA4
+        0.00E+00  0.00E+00  0.00E+00  1.50E-01

 SIGMA - CORR MATRIX FOR RANDOM EFFECTS - EPSILONS  ***
         EPS1      EPS2
 EPS1
+        1.50E-01
 EPS2
+        0.00E+00  1.00E-02

 ********************                            FIRST ORDER: DS-OPTIMALITY                          ********************
 ********************                            STANDARD ERROR OF ESTIMATE                          ********************

 THETA - VECTOR OF FIXED EFFECTS PARAMETERS   *********
         TH 1      TH 2      TH 3      TH 4
         1.71E-02  2.13E-02  2.68E-02  2.93E-02

 OMEGA - COV MATRIX FOR RANDOM EFFECTS - ETAS  ********
         ETA1      ETA2      ETA3      ETA4
 ETA1
+        3.95E-03
 ETA2
+       .........  5.90E-03
 ETA3
+       ......... .........  8.46E-03
 ETA4
+       ......... ......... .........  2.12E-02

 SIGMA - COV MATRIX FOR RANDOM EFFECTS - EPSILONS  ****
         EPS1      EPS2
 EPS1
+        2.90E-03
 EPS2
+       .........  7.29E-05

 OMEGA - CORR MATRIX FOR RANDOM EFFECTS - ETAS  *******
         ETA1      ETA2      ETA3      ETA4
 ETA1
+        1.32E-02
 ETA2
+       .........  1.97E-02
 ETA3
+       ......... .........  2.82E-02
 ETA4
+       ......... ......... .........  7.07E-02

 SIGMA - CORR MATRIX FOR RANDOM EFFECTS - EPSILONS  ***
         EPS1      EPS2
 EPS1
+        9.66E-03
 EPS2
+       .........  3.65E-03

 ********************                            FIRST ORDER: DS-OPTIMALITY                          ********************
 ********************                          COVARIANCE MATRIX OF ESTIMATE                         ********************

     TH 1 | TH 1      TH 2 | TH 1      TH 2 | TH 2      TH 3 | TH 1      TH 3 | TH 2      TH 3 | TH 3      TH 4 | TH 1
     2.93E-04         8.40E-05         4.55E-04         5.56E-05         1.60E-04         7.18E-04         2.06E-05
     TH 4 | TH 2      TH 4 | TH 3      TH 4 | TH 4    OM11 | TH 1      OM11 | TH 2      OM11 | TH 3      OM11 | TH 4
     1.32E-04         3.46E-04         8.61E-04         0.00E+00         0.00E+00         0.00E+00         0.00E+00
   OM11 | OM11      OM22 | TH 1      OM22 | TH 2      OM22 | TH 3      OM22 | TH 4      OM22 | OM11      OM22 | OM22
     1.56E-05         0.00E+00         0.00E+00         0.00E+00         0.00E+00        -4.58E-07         3.48E-05
   OM33 | TH 1      OM33 | TH 2      OM33 | TH 3      OM33 | TH 4      OM33 | OM11      OM33 | OM22      OM33 | OM33
     0.00E+00         0.00E+00         0.00E+00         0.00E+00         4.92E-07         3.76E-06         7.16E-05
   OM44 | TH 1      OM44 | TH 2      OM44 | TH 3      OM44 | TH 4      OM44 | OM11      OM44 | OM22      OM44 | OM33
     0.00E+00         0.00E+00         0.00E+00         0.00E+00         8.84E-06        -5.33E-06        -3.08E-05
   OM44 | OM44      SG11 | TH 1      SG11 | TH 2      SG11 | TH 3      SG11 | TH 4      SG11 | OM11      SG11 | OM22
     4.50E-04         0.00E+00         0.00E+00         0.00E+00         0.00E+00        -7.36E-07        -5.11E-06
   SG11 | OM33      SG11 | OM44      SG11 | SG11      SG22 | TH 1      SG22 | TH 2      SG22 | TH 3      SG22 | TH 4
    -8.86E-06         1.09E-05         8.40E-06         0.00E+00         0.00E+00         0.00E+00         0.00E+00
   SG22 | OM11      SG22 | OM22      SG22 | OM33      SG22 | OM44      SG22 | SG11      SG22 | SG22
    -3.26E-08         2.78E-08         8.32E-08        -1.37E-06        -5.56E-08         5.32E-09

 ********************                            FIRST ORDER: DS-OPTIMALITY                          ********************
 ********************                          CORRELATION MATRIX OF ESTIMATE                        ********************

     TH 1 | TH 1      TH 2 | TH 1      TH 2 | TH 2      TH 3 | TH 1      TH 3 | TH 2      TH 3 | TH 3      TH 4 | TH 1
     1.71E-02         2.30E-01         2.13E-02         1.21E-01         2.80E-01         2.68E-02         4.10E-02
     TH 4 | TH 2      TH 4 | TH 3      TH 4 | TH 4    OM11 | TH 1      OM11 | TH 2      OM11 | TH 3      OM11 | TH 4
     2.11E-01         4.41E-01         2.93E-02         0.00E+00         0.00E+00         0.00E+00         0.00E+00
   OM11 | OM11      OM22 | TH 1      OM22 | TH 2      OM22 | TH 3      OM22 | TH 4      OM22 | OM11      OM22 | OM22
     3.95E-03         0.00E+00         0.00E+00         0.00E+00         0.00E+00        -1.97E-02         5.90E-03
   OM33 | TH 1      OM33 | TH 2      OM33 | TH 3      OM33 | TH 4      OM33 | OM11      OM33 | OM22      OM33 | OM33
     0.00E+00         0.00E+00         0.00E+00         0.00E+00         1.47E-02         7.54E-02         8.46E-03
   OM44 | TH 1      OM44 | TH 2      OM44 | TH 3      OM44 | TH 4      OM44 | OM11      OM44 | OM22      OM44 | OM33
     0.00E+00         0.00E+00         0.00E+00         0.00E+00         1.06E-01        -4.26E-02        -1.72E-01
   OM44 | OM44      SG11 | TH 1      SG11 | TH 2      SG11 | TH 3      SG11 | TH 4      SG11 | OM11      SG11 | OM22
     2.12E-02         0.00E+00         0.00E+00         0.00E+00         0.00E+00        -6.43E-02        -2.99E-01
   SG11 | OM33      SG11 | OM44      SG11 | SG11      SG22 | TH 1      SG22 | TH 2      SG22 | TH 3      SG22 | TH 4
    -3.61E-01         1.77E-01         2.90E-03         0.00E+00         0.00E+00         0.00E+00         0.00E+00
   SG22 | OM11      SG22 | OM22      SG22 | OM33      SG22 | OM44      SG22 | SG11      SG22 | SG22
    -1.13E-01         6.45E-02         1.35E-01        -8.84E-01        -2.63E-01         7.29E-05
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 Elapsed finaloutput time in seconds:     0.04
 #CPUT: Total CPU Time in Seconds,        0.203
