Sun 12/27/2020
05:32 PM
;Model Desc: Receptor Mediated Clearance model with Dynamic Change
;            in Receptors
;Project Name: nm7examples
;Project ID: NO PROJECT DESCRIPTION

$PROB RUN# example6 (from r2compl)
$INPUT C SET ID JID TIME DV=CONC DOSE=AMT RATE EVID MDV CMT TSTRAT TMIN TMAX DSTRAT DMIN DMAX STRAT STRATF
$DATA tmdd2.csv IGNORE=C

; The new numerical integration solver is used, although ADVAN=9
; is also efficient for this problem.

$SUBROUTINES ADVAN13 TRANS1 TOL=12 ATOL=12
$MODEL NCOMPARTMENTS=3

$PK
MU_1=THETA(1)
MU_2=THETA(2)
MU_3=THETA(3)
MU_4=THETA(4)
MU_5=THETA(5)
MU_6=THETA(6)
MU_7=THETA(7)
MU_8=THETA(8)
VC=EXP(MU_1+ETA(1))
K10=EXP(MU_2+ETA(2))
K12=EXP(MU_3+ETA(3))
K21=EXP(MU_4+ETA(4))
VM=EXP(MU_5+ETA(5))
KMC=EXP(MU_6+ETA(6))
K03=EXP(MU_7+ETA(7))
K30=EXP(MU_8+ETA(8))
S3=VC
S1=VC
KM=KMC*S1
F3=K03/K30

$DES
DADT(1) = -(K10+K12)*A(1) + K21*A(2) - VM*A(1)*A(3)/(A(1)+KM)
DADT(2) = K12*A(1) - K21*A(2)
DADT(3) =  -(VM-K30)*A(1)*A(3)/(A(1)+KM) - K30*A(3) + K03

$ERROR
ETYPE=1
IF(CMT.NE.1) ETYPE=0
IPRED=F
Y = F + ETYPE*( F*EPS(1)+EPS(2) ) + (1.0-ETYPE)*(F*EPS(3)+EPS(4))

$THETA
3.90834E+00
-2.18787E+00
5.57985E-01
-1.86377E-01
2.26146E+00
2.10476E-01
3.70795E+00
-7.08909E-01

$OMEGA (0.0625)X8
$SIGMA  (9.27944E-03) (0.001 FIXED) (2.24692E-02) (0.001 FIXED)

$DESIGN FIMDIAG=1 GROUPSIZE=50 NELDER DESEL=TIME DESELSTRAT=TSTRAT DESELMIN=TMIN DESELMAX=TMAX VARCROSS=1
        STRAT=STRAT STRATF=STRATF
        MAXEVAL=1000 SIGL=10 nohabort PRINT=100

$DESIGN FIMDIAG=1 GROUPSIZE=50 NELDER DESEL=TIME DESELSTRAT=TSTRAT DESELMIN=TMIN DESELMAX=TMAX VARCROSS=1
        STRAT=STRAT STRATF=STRATF

$DESIGN FIMDIAG=1 GROUPSIZE=50 NELDER DESEL=TIME DESELSTRAT=TSTRAT DESELMIN=TMIN DESELMAX=TMAX VARCROSS=1
        STRAT=STRAT STRATF=STRATF

$DESIGN FIMDIAG=1 GROUPSIZE=50 NELDER DESEL=TIME DESELSTRAT=TSTRAT DESELMIN=TMIN DESELMAX=TMAX VARCROSS=1
        STRAT=STRAT STRATF=STRATF

$COV PRINT=E
$TABLE ID DOSE CMT TIME EVID MDV DV TSTRAT STRAT STRATF NOPRINT NOAPPEND FILE=tmdd2.tab

NM-TRAN MESSAGES
 WARNINGS AND ERRORS (IF ANY) FOR PROBLEM    1
 (WARNING  2) NM-TRAN INFERS THAT THE DATA ARE POPULATION.

1NONLINEAR MIXED EFFECTS MODEL PROGRAM (NONMEM) VERSION 7.5.0
 ORIGINALLY DEVELOPED BY STUART BEAL, LEWIS SHEINER, AND ALISON BOECKMANN
 CURRENT DEVELOPERS ARE ROBERT BAUER, ICON DEVELOPMENT SOLUTIONS,
 AND ALISON BOECKMANN. IMPLEMENTATION, EFFICIENCY, AND STANDARDIZATION
 PERFORMED BY NOUS INFOSYSTEMS.
 PROBLEM NO.:         1
 RUN# example6 (from r2compl)
 TOT. NO. OF OBS RECS:       22
 TOT. NO. OF INDIVIDUALS:        2
 GENERAL NONLINEAR KINETICS MODEL WITH STIFF/NONSTIFF EQUATIONS (LSODA, ADVAN13)
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 #TBLN:      1
 #METH: First Order: D-OPTIMALITY
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
 #TERM:
 NO. OF FUNCTION EVALUATIONS USED:     3827
0MINIMIZATION TERMINATED
  DUE TO MAXIMUM NUMBER OF ITERATIONS EXCEEDED

 ETABAR IS THE ARITHMETIC MEAN OF THE ETA-ESTIMATES,
 AND THE P-VALUE IS GIVEN FOR THE NULL HYPOTHESIS THAT THE TRUE MEAN IS 0.

 ETABAR:         0.0000E+00  0.0000E+00  0.0000E+00  0.0000E+00  0.0000E+00  0.0000E+00  0.0000E+00  0.0000E+00
 SE:             0.0000E+00  0.0000E+00  0.0000E+00  0.0000E+00  0.0000E+00  0.0000E+00  0.0000E+00  0.0000E+00
 N:                       2           2           2           2           2           2           2           2

 P VAL.:         1.0000E+00  1.0000E+00  1.0000E+00  1.0000E+00  1.0000E+00  1.0000E+00  1.0000E+00  1.0000E+00

 ETASHRINKSD(%)  1.0000E+02  1.0000E+02  1.0000E+02  1.0000E+02  1.0000E+02  1.0000E+02  1.0000E+02  1.0000E+02
 ETASHRINKVR(%)  1.0000E+02  1.0000E+02  1.0000E+02  1.0000E+02  1.0000E+02  1.0000E+02  1.0000E+02  1.0000E+02
 EBVSHRINKSD(%)  5.6789E+00  3.6941E+01  3.3391E+01  2.7692E+01  1.5939E+01  6.5634E+01  1.3743E+01  2.2113E+01
 EBVSHRINKVR(%)  1.1035E+01  6.0236E+01  5.5633E+01  4.7715E+01  2.9338E+01  8.8189E+01  2.5598E+01  3.9337E+01
 RELATIVEINF(%)  7.6235E+01  3.2312E+01  2.4169E+01  3.5775E+01  5.7912E+01  9.1354E+00  6.3042E+01  4.9024E+01
 EPSSHRINKSD(%)  4.7777E+01  4.7777E+01  4.7777E+01  4.7777E+01
 EPSSHRINKVR(%)  7.2727E+01  7.2727E+01  7.2727E+01  7.2727E+01

 #TERE:
 Elapsed opt. design time in seconds:    41.16
 #TBLN:      2
 #METH: First Order: D-OPTIMALITY
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
 #TERM:
 NO. OF FUNCTION EVALUATIONS USED:     3640
0MINIMIZATION SUCCESSFUL

 ETABAR IS THE ARITHMETIC MEAN OF THE ETA-ESTIMATES,
 AND THE P-VALUE IS GIVEN FOR THE NULL HYPOTHESIS THAT THE TRUE MEAN IS 0.

 ETABAR:         0.0000E+00  0.0000E+00  0.0000E+00  0.0000E+00  0.0000E+00  0.0000E+00  0.0000E+00  0.0000E+00
 SE:             0.0000E+00  0.0000E+00  0.0000E+00  0.0000E+00  0.0000E+00  0.0000E+00  0.0000E+00  0.0000E+00
 N:                       2           2           2           2           2           2           2           2

 P VAL.:         1.0000E+00  1.0000E+00  1.0000E+00  1.0000E+00  1.0000E+00  1.0000E+00  1.0000E+00  1.0000E+00

 ETASHRINKSD(%)  1.0000E+02  1.0000E+02  1.0000E+02  1.0000E+02  1.0000E+02  1.0000E+02  1.0000E+02  1.0000E+02
 ETASHRINKVR(%)  1.0000E+02  1.0000E+02  1.0000E+02  1.0000E+02  1.0000E+02  1.0000E+02  1.0000E+02  1.0000E+02
 EBVSHRINKSD(%)  4.0694E+00  3.5005E+01  2.7852E+01  2.6586E+01  1.5945E+01  6.5489E+01  1.3833E+01  2.1727E+01
 EBVSHRINKVR(%)  7.9732E+00  5.7757E+01  4.7946E+01  4.6104E+01  2.9347E+01  8.8090E+01  2.5752E+01  3.8733E+01
 RELATIVEINF(%)  8.7430E+01  3.7765E+01  3.8434E+01  4.4296E+01  5.7869E+01  9.4574E+00  6.0032E+01  4.8894E+01
 EPSSHRINKSD(%)  4.7777E+01  4.7777E+01  4.7777E+01  4.7777E+01
 EPSSHRINKVR(%)  7.2727E+01  7.2727E+01  7.2727E+01  7.2727E+01

 #TERE:
 Elapsed opt. design time in seconds:    42.18
 #TBLN:      3
 #METH: First Order: D-OPTIMALITY
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
 #TERM:
 NO. OF FUNCTION EVALUATIONS USED:      247
0MINIMIZATION SUCCESSFUL

 ETABAR IS THE ARITHMETIC MEAN OF THE ETA-ESTIMATES,
 AND THE P-VALUE IS GIVEN FOR THE NULL HYPOTHESIS THAT THE TRUE MEAN IS 0.

 ETABAR:         0.0000E+00  0.0000E+00  0.0000E+00  0.0000E+00  0.0000E+00  0.0000E+00  0.0000E+00  0.0000E+00
 SE:             0.0000E+00  0.0000E+00  0.0000E+00  0.0000E+00  0.0000E+00  0.0000E+00  0.0000E+00  0.0000E+00
 N:                       2           2           2           2           2           2           2           2

 P VAL.:         1.0000E+00  1.0000E+00  1.0000E+00  1.0000E+00  1.0000E+00  1.0000E+00  1.0000E+00  1.0000E+00

 ETASHRINKSD(%)  1.0000E+02  1.0000E+02  1.0000E+02  1.0000E+02  1.0000E+02  1.0000E+02  1.0000E+02  1.0000E+02
 ETASHRINKVR(%)  1.0000E+02  1.0000E+02  1.0000E+02  1.0000E+02  1.0000E+02  1.0000E+02  1.0000E+02  1.0000E+02
 EBVSHRINKSD(%)  4.0687E+00  3.5000E+01  2.7855E+01  2.6608E+01  1.5946E+01  6.5484E+01  1.3822E+01  2.1719E+01
 EBVSHRINKVR(%)  7.9719E+00  5.7750E+01  4.7951E+01  4.6136E+01  2.9348E+01  8.8086E+01  2.5734E+01  3.8722E+01
 RELATIVEINF(%)  8.7434E+01  3.7784E+01  3.8435E+01  4.4276E+01  5.7871E+01  9.4600E+00  6.0079E+01  4.8923E+01
 EPSSHRINKSD(%)  4.7777E+01  4.7777E+01  4.7777E+01  4.7777E+01
 EPSSHRINKVR(%)  7.2727E+01  7.2727E+01  7.2727E+01  7.2727E+01

 #TERE:
 Elapsed opt. design time in seconds:     3.67
 #TBLN:      4
 #METH: First Order: D-OPTIMALITY
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
 #TERM:
 NO. OF FUNCTION EVALUATIONS USED:      272
0MINIMIZATION SUCCESSFUL

 ETABAR IS THE ARITHMETIC MEAN OF THE ETA-ESTIMATES,
 AND THE P-VALUE IS GIVEN FOR THE NULL HYPOTHESIS THAT THE TRUE MEAN IS 0.

 ETABAR:         0.0000E+00  0.0000E+00  0.0000E+00  0.0000E+00  0.0000E+00  0.0000E+00  0.0000E+00  0.0000E+00
 SE:             0.0000E+00  0.0000E+00  0.0000E+00  0.0000E+00  0.0000E+00  0.0000E+00  0.0000E+00  0.0000E+00
 N:                       2           2           2           2           2           2           2           2

 P VAL.:         1.0000E+00  1.0000E+00  1.0000E+00  1.0000E+00  1.0000E+00  1.0000E+00  1.0000E+00  1.0000E+00

 ETASHRINKSD(%)  1.0000E+02  1.0000E+02  1.0000E+02  1.0000E+02  1.0000E+02  1.0000E+02  1.0000E+02  1.0000E+02
 ETASHRINKVR(%)  1.0000E+02  1.0000E+02  1.0000E+02  1.0000E+02  1.0000E+02  1.0000E+02  1.0000E+02  1.0000E+02
 EBVSHRINKSD(%)  4.0694E+00  3.5000E+01  2.7838E+01  2.6607E+01  1.5956E+01  6.5487E+01  1.3817E+01  2.1717E+01
 EBVSHRINKVR(%)  7.9733E+00  5.7749E+01  4.7927E+01  4.6134E+01  2.9366E+01  8.8089E+01  2.5725E+01  3.8718E+01
 RELATIVEINF(%)  8.7436E+01  3.7789E+01  3.8461E+01  4.4280E+01  5.7845E+01  9.4572E+00  6.0098E+01  4.8937E+01
 EPSSHRINKSD(%)  4.7777E+01  4.7777E+01  4.7777E+01  4.7777E+01
 EPSSHRINKVR(%)  7.2727E+01  7.2727E+01  7.2727E+01  7.2727E+01

 #TERE:
 Elapsed opt. design time in seconds:     3.83
 Elapsed postprocess time in seconds:     0.02

 ********************                            FIRST ORDER: D-OPTIMALITY                           ********************
 #OBJT:**************                MINIMUM VALUE OF OBJECTIVE FUNCTION: D-OPTIMALITY               ********************
 #OBJV:********************************************     -143.928       **************************************************

 ********************                            FIRST ORDER: D-OPTIMALITY                           ********************
 ********************                             FINAL PARAMETER ESTIMATE                           ********************

 THETA - VECTOR OF FIXED EFFECTS PARAMETERS   *********
         TH 1      TH 2      TH 3      TH 4      TH 5      TH 6      TH 7      TH 8
         3.91E+00 -2.19E+00  5.58E-01 -1.86E-01  2.26E+00  2.10E-01  3.71E+00 -7.09E-01

 OMEGA - COV MATRIX FOR RANDOM EFFECTS - ETAS  ********
         ETA1      ETA2      ETA3      ETA4      ETA5      ETA6      ETA7      ETA8
 ETA1
+        6.25E-02
 ETA2
+        0.00E+00  6.25E-02
 ETA3
+        0.00E+00  0.00E+00  6.25E-02
 ETA4
+        0.00E+00  0.00E+00  0.00E+00  6.25E-02
 ETA5
+        0.00E+00  0.00E+00  0.00E+00  0.00E+00  6.25E-02
 ETA6
+        0.00E+00  0.00E+00  0.00E+00  0.00E+00  0.00E+00  6.25E-02
 ETA7
+        0.00E+00  0.00E+00  0.00E+00  0.00E+00  0.00E+00  0.00E+00  6.25E-02
 ETA8
+        0.00E+00  0.00E+00  0.00E+00  0.00E+00  0.00E+00  0.00E+00  0.00E+00  6.25E-02

 SIGMA - COV MATRIX FOR RANDOM EFFECTS - EPSILONS  ****
         EPS1      EPS2      EPS3      EPS4
 EPS1
+        9.28E-03
 EPS2
+        0.00E+00  1.00E-03
 EPS3
+        0.00E+00  0.00E+00  2.25E-02
 EPS4
+        0.00E+00  0.00E+00  0.00E+00  1.00E-03

 OMEGA - CORR MATRIX FOR RANDOM EFFECTS - ETAS  *******
         ETA1      ETA2      ETA3      ETA4      ETA5      ETA6      ETA7      ETA8
 ETA1
+        2.50E-01
 ETA2
+        0.00E+00  2.50E-01
 ETA3
+        0.00E+00  0.00E+00  2.50E-01
 ETA4
+        0.00E+00  0.00E+00  0.00E+00  2.50E-01
 ETA5
+        0.00E+00  0.00E+00  0.00E+00  0.00E+00  2.50E-01
 ETA6
+        0.00E+00  0.00E+00  0.00E+00  0.00E+00  0.00E+00  2.50E-01
 ETA7
+        0.00E+00  0.00E+00  0.00E+00  0.00E+00  0.00E+00  0.00E+00  2.50E-01
 ETA8
+        0.00E+00  0.00E+00  0.00E+00  0.00E+00  0.00E+00  0.00E+00  0.00E+00  2.50E-01

 SIGMA - CORR MATRIX FOR RANDOM EFFECTS - EPSILONS  ***
         EPS1      EPS2      EPS3      EPS4
 EPS1
+        9.63E-02
 EPS2
+        0.00E+00  3.16E-02
 EPS3
+        0.00E+00  0.00E+00  1.50E-01
 EPS4
+        0.00E+00  0.00E+00  0.00E+00  3.16E-02

 ********************                            FIRST ORDER: D-OPTIMALITY                           ********************
 ********************                            STANDARD ERROR OF ESTIMATE                          ********************

 THETA - VECTOR OF FIXED EFFECTS PARAMETERS   *********
         TH 1      TH 2      TH 3      TH 4      TH 5      TH 6      TH 7      TH 8
         2.67E-02  4.47E-02  4.02E-02  3.79E-02  3.35E-02  7.75E-02  3.14E-02  3.54E-02

 OMEGA - COV MATRIX FOR RANDOM EFFECTS - ETAS  ********
         ETA1      ETA2      ETA3      ETA4      ETA5      ETA6      ETA7      ETA8
 ETA1
+        9.62E-03
 ETA2
+       .........  1.68E-02
 ETA3
+       ......... .........  1.77E-02
 ETA4
+       ......... ......... .........  1.73E-02
 ETA5
+       ......... ......... ......... .........  1.30E-02
 ETA6
+       ......... ......... ......... ......... .........  5.28E-02
 ETA7
+       ......... ......... ......... ......... ......... .........  1.14E-02
 ETA8
+       ......... ......... ......... ......... ......... ......... .........  1.44E-02

 SIGMA - COV MATRIX FOR RANDOM EFFECTS - EPSILONS  ****
         EPS1      EPS2      EPS3      EPS4
 EPS1
+        1.18E-03
 EPS2
+       ......... .........
 EPS3
+       ......... .........  2.71E-03
 EPS4
+       ......... ......... ......... .........

 OMEGA - CORR MATRIX FOR RANDOM EFFECTS - ETAS  *******
         ETA1      ETA2      ETA3      ETA4      ETA5      ETA6      ETA7      ETA8
 ETA1
+        1.92E-02
 ETA2
+       .........  3.36E-02
 ETA3
+       ......... .........  3.53E-02
 ETA4
+       ......... ......... .........  3.46E-02
 ETA5
+       ......... ......... ......... .........  2.60E-02
 ETA6
+       ......... ......... ......... ......... .........  1.06E-01
 ETA7
+       ......... ......... ......... ......... ......... .........  2.27E-02
 ETA8
+       ......... ......... ......... ......... ......... ......... .........  2.89E-02

 SIGMA - CORR MATRIX FOR RANDOM EFFECTS - EPSILONS  ***
         EPS1      EPS2      EPS3      EPS4
 EPS1
+        6.14E-03
 EPS2
+       ......... .........
 EPS3
+       ......... .........  9.05E-03
 EPS4
+       ......... ......... ......... .........
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
 ********************                            FIRST ORDER: D-OPTIMALITY                           ********************
 ********************                      EIGENVALUES OF COR MATRIX OF ESTIMATE                     ********************

             1         2         3         4         5         6         7         8         9        10        11        12
             13        14        15        16        17        18
         5.00E-01  5.56E-01  6.29E-01  6.39E-01  7.20E-01  7.52E-01  8.55E-01  9.43E-01  9.81E-01  9.97E-01  1.04E+00  1.10E+00
          1.18E+00  1.21E+00  1.28E+00  1.33E+00  1.46E+00  1.82E+00
 Elapsed finaloutput time in seconds:     0.42
 #CPUT: Total CPU Time in Seconds,       91.141
