Sat 08/07/2021
12:10 AM
$PROB RUN# example6 (from r2compl)
$INPUT C SET ID JID TIME DV=CONC DOSE=AMT RATE EVID MDV CMT TSTRAT TMIN TMAX DSTRAT DMIN DMAX
$DATA optex6d17.csv IGNORE=C

$SUBROUTINES ADVAN13 TRANS1 TOL=10 ATOL=10
$MODEL NCOMPARTMENTS=3

$PK
MU_1=THETA(1)
MU_2=THETA(2)
MU_3=THETA(3)
MU_4=THETA(4)
MU_5=THETA(5)
MU_6=THETA(6)
MU_7=THETA(7)
MU_8=THETA(8)
VC=EXP(MU_1+ETA(1))
K10=EXP(MU_2+ETA(2))
K12=EXP(MU_3+ETA(3))
K21=EXP(MU_4+ETA(4))
VM=EXP(MU_5+ETA(5))
KMC=EXP(MU_6+ETA(6))
K03=EXP(MU_7+ETA(7))
K30=EXP(MU_8+ETA(8))
S3=VC
S1=VC
KM=KMC*S1
F3=K03/K30

$DES
DADT(1) = -(K10+K12)*A(1) + K21*A(2) - VM*A(1)*A(3)/(A(1)+KM)
DADT(2) = K12*A(1) - K21*A(2)
DADT(3) =  -(VM-K30)*A(1)*A(3)/(A(1)+KM) - K30*A(3) + K03

$ERROR
ETYPE=1
IF(CMT.NE.1) ETYPE=0
IPRED=F
Y = F + ETYPE*( F*EPS(1)+EPS(2) ) + (1.0-ETYPE)*(F*EPS(3)+EPS(4))

$THETA
3.90834E+00
-2.18787E+00
5.57985E-01
-1.86377E-01
2.26146E+00
2.10476E-01
3.70795E+00
-7.08909E-01

$OMEGA (0.0625 FIXED)X8
$SIGMA  (9.27944E-03 FIXED) (0.0001 FIXED) (2.24692E-02 FIXED) (0.0001 FIXED)

; Repeat $DESIGN optimization times, to assure Nelder has reached Minimum
$DESIGN    OFVTYPE=8
;  design element TIME is sought to be otpimized
           DESEL=TIME DESELSTRAT=TSTRAT DESELMIN=TMIN DESELMAX=TMAX
;  design element DOSE (AMT) is also sought to be otpimized
           DESEL=DOSE DESELSTRAT=DSTRAT DESELMIN=DMIN DESELMAX=DMAX
           MAXEVAL=1000 SIGL=12 nohabort PRINT=100 FIMDIAG=1

$DESIGN    OFVTYPE=8 DESEL=TIME
           DESELSTRAT=TSTRAT DESELMIN=TMIN DESELMAX=TMAX
           DESEL=DOSE DESELSTRAT=DSTRAT DESELMIN=DMIN DESELMAX=DMAX
           MAXEVAL=1000 SIGL=12 nohabort PRINT=100

$DESIGN    OFVTYPE=8 DESEL=TIME
           DESELSTRAT=TSTRAT DESELMIN=TMIN DESELMAX=TMAX
           DESEL=DOSE DESELSTRAT=DSTRAT DESELMIN=DMIN DESELMAX=DMAX
           MAXEVAL=1000 SIGL=12 nohabort PRINT=100

$DESIGN    OFVTYPE=8 DESEL=TIME
           DESELSTRAT=TSTRAT DESELMIN=TMIN DESELMAX=TMAX
           DESEL=DOSE DESELSTRAT=DSTRAT DESELMIN=DMIN DESELMAX=DMAX
           MAXEVAL=1000 SIGL=12 nohabort PRINT=100

$DESIGN    OFVTYPE=8 DESEL=TIME
           DESELSTRAT=TSTRAT DESELMIN=TMIN DESELMAX=TMAX
           DESEL=DOSE DESELSTRAT=DSTRAT DESELMIN=DMIN DESELMAX=DMAX
           MAXEVAL=1000 SIGL=12 nohabort PRINT=100

$DESIGN    OFVTYPE=8 DESEL=TIME
           DESELSTRAT=TSTRAT DESELMIN=TMIN DESELMAX=TMAX
           DESEL=DOSE DESELSTRAT=DSTRAT DESELMIN=DMIN DESELMAX=DMAX
           MAXEVAL=1000 SIGL=12 nohabort PRINT=100

; Report the final times and dose in the user defined table:
$TABLE ID DOSE CMT TIME EVID MDV DV TSTRAT NOPRINT NOAPPEND FILE=optex6d17_8.tab

NM-TRAN MESSAGES
 WARNINGS AND ERRORS (IF ANY) FOR PROBLEM    1
 (WARNING  2) NM-TRAN INFERS THAT THE DATA ARE POPULATION.

1NONLINEAR MIXED EFFECTS MODEL PROGRAM (NONMEM) VERSION 7.5.0
 ORIGINALLY DEVELOPED BY STUART BEAL, LEWIS SHEINER, AND ALISON BOECKMANN
 CURRENT DEVELOPERS ARE ROBERT BAUER, ICON DEVELOPMENT SOLUTIONS,
 AND ALISON BOECKMANN. IMPLEMENTATION, EFFICIENCY, AND STANDARDIZATION
 PERFORMED BY NOUS INFOSYSTEMS.
 PROBLEM NO.:         1
 RUN# example6 (from r2compl)
 TOT. NO. OF OBS RECS:       11
 TOT. NO. OF INDIVIDUALS:        1
 GENERAL NONLINEAR KINETICS MODEL WITH STIFF/NONSTIFF EQUATIONS (LSODA, ADVAN13)
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 #TBLN:      1
 #METH: First Order: BAYESIAN-OPTIMALITY
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
 #TERM:
 NO. OF FUNCTION EVALUATIONS USED:     3320
0MINIMIZATION TERMINATED
  DUE TO MAXIMUM NUMBER OF ITERATIONS EXCEEDED

 ETABAR IS THE ARITHMETIC MEAN OF THE ETA-ESTIMATES,
 AND THE P-VALUE IS GIVEN FOR THE NULL HYPOTHESIS THAT THE TRUE MEAN IS 0.

 ETABAR:         0.0000E+00  0.0000E+00  0.0000E+00  0.0000E+00  0.0000E+00  0.0000E+00  0.0000E+00  0.0000E+00
 SE:             0.0000E+00  0.0000E+00  0.0000E+00  0.0000E+00  0.0000E+00  0.0000E+00  0.0000E+00  0.0000E+00
 N:                       1           1           1           1           1           1           1           1

 P VAL.:         1.0000E+00  1.0000E+00  1.0000E+00  1.0000E+00  1.0000E+00  1.0000E+00  1.0000E+00  1.0000E+00

 ETASHRINKSD(%)  1.0000E+02  1.0000E+02  1.0000E+02  1.0000E+02  1.0000E+02  1.0000E+02  1.0000E+02  1.0000E+02
 ETASHRINKVR(%)  1.0000E+02  1.0000E+02  1.0000E+02  1.0000E+02  1.0000E+02  1.0000E+02  1.0000E+02  1.0000E+02
 EBVSHRINKSD(%)  4.4490E+00  1.3186E+01  2.0589E+01  2.2745E+01  4.6413E+00  6.0810E+01  1.0920E+01  1.6503E+01
 EBVSHRINKVR(%)  8.7000E+00  2.4632E+01  3.6940E+01  4.0317E+01  9.0672E+00  8.4642E+01  2.0648E+01  3.0282E+01
 RELATIVEINF(%)  8.6719E+01  5.7097E+01  4.9718E+01  4.5055E+01  8.6171E+01  1.0993E+01  6.2801E+01  6.6079E+01
 EPSSHRINKSD(%)  4.7777E+01  4.7777E+01  4.7777E+01  4.7777E+01
 EPSSHRINKVR(%)  7.2727E+01  7.2727E+01  7.2727E+01  7.2727E+01


 #TERE:
 Elapsed opt. design time in seconds:     7.85
 #TBLN:      2
 #METH: First Order: BAYESIAN-OPTIMALITY
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
 #TERM:
 NO. OF FUNCTION EVALUATIONS USED:     3793
0MINIMIZATION TERMINATED
  DUE TO MAXIMUM NUMBER OF ITERATIONS EXCEEDED

 ETABAR IS THE ARITHMETIC MEAN OF THE ETA-ESTIMATES,
 AND THE P-VALUE IS GIVEN FOR THE NULL HYPOTHESIS THAT THE TRUE MEAN IS 0.

 ETABAR:         0.0000E+00  0.0000E+00  0.0000E+00  0.0000E+00  0.0000E+00  0.0000E+00  0.0000E+00  0.0000E+00
 SE:             0.0000E+00  0.0000E+00  0.0000E+00  0.0000E+00  0.0000E+00  0.0000E+00  0.0000E+00  0.0000E+00
 N:                       1           1           1           1           1           1           1           1

 P VAL.:         1.0000E+00  1.0000E+00  1.0000E+00  1.0000E+00  1.0000E+00  1.0000E+00  1.0000E+00  1.0000E+00

 ETASHRINKSD(%)  1.0000E+02  1.0000E+02  1.0000E+02  1.0000E+02  1.0000E+02  1.0000E+02  1.0000E+02  1.0000E+02
 ETASHRINKVR(%)  1.0000E+02  1.0000E+02  1.0000E+02  1.0000E+02  1.0000E+02  1.0000E+02  1.0000E+02  1.0000E+02
 EBVSHRINKSD(%)  4.4281E+00  1.1072E+01  2.0694E+01  2.2416E+01  4.1226E+00  2.9865E+01  9.5169E+00  1.5590E+01
 EBVSHRINKVR(%)  8.6600E+00  2.0917E+01  3.7106E+01  3.9808E+01  8.0752E+00  5.0811E+01  1.8128E+01  2.8750E+01
 RELATIVEINF(%)  8.7466E+01  7.2642E+01  5.0055E+01  4.7034E+01  9.1093E+01  4.5856E+01  7.4013E+01  6.5953E+01
 EPSSHRINKSD(%)  4.7777E+01  4.7777E+01  4.7777E+01  4.7777E+01
 EPSSHRINKVR(%)  7.2727E+01  7.2727E+01  7.2727E+01  7.2727E+01


 #TERE:
 Elapsed opt. design time in seconds:    10.48
 #TBLN:      3
 #METH: First Order: BAYESIAN-OPTIMALITY
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
 #TERM:
 NO. OF FUNCTION EVALUATIONS USED:      647
0MINIMIZATION SUCCESSFUL

 ETABAR IS THE ARITHMETIC MEAN OF THE ETA-ESTIMATES,
 AND THE P-VALUE IS GIVEN FOR THE NULL HYPOTHESIS THAT THE TRUE MEAN IS 0.

 ETABAR:         0.0000E+00  0.0000E+00  0.0000E+00  0.0000E+00  0.0000E+00  0.0000E+00  0.0000E+00  0.0000E+00
 SE:             0.0000E+00  0.0000E+00  0.0000E+00  0.0000E+00  0.0000E+00  0.0000E+00  0.0000E+00  0.0000E+00
 N:                       1           1           1           1           1           1           1           1

 P VAL.:         1.0000E+00  1.0000E+00  1.0000E+00  1.0000E+00  1.0000E+00  1.0000E+00  1.0000E+00  1.0000E+00

 ETASHRINKSD(%)  1.0000E+02  1.0000E+02  1.0000E+02  1.0000E+02  1.0000E+02  1.0000E+02  1.0000E+02  1.0000E+02
 ETASHRINKVR(%)  1.0000E+02  1.0000E+02  1.0000E+02  1.0000E+02  1.0000E+02  1.0000E+02  1.0000E+02  1.0000E+02
 EBVSHRINKSD(%)  4.4290E+00  1.1073E+01  2.0692E+01  2.2428E+01  4.1233E+00  2.9854E+01  9.5172E+00  1.5589E+01
 EBVSHRINKVR(%)  8.6619E+00  2.0919E+01  3.7103E+01  3.9825E+01  8.0766E+00  5.0795E+01  1.8129E+01  2.8748E+01
 RELATIVEINF(%)  8.7466E+01  7.2639E+01  5.0046E+01  4.7001E+01  9.1092E+01  4.5863E+01  7.4011E+01  6.5956E+01
 EPSSHRINKSD(%)  4.7777E+01  4.7777E+01  4.7777E+01  4.7777E+01
 EPSSHRINKVR(%)  7.2727E+01  7.2727E+01  7.2727E+01  7.2727E+01


 #TERE:
 Elapsed opt. design time in seconds:     2.67
 #TBLN:      4
 #METH: First Order: BAYESIAN-OPTIMALITY
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
 #TERM:
 NO. OF FUNCTION EVALUATIONS USED:      684
0MINIMIZATION SUCCESSFUL

 ETABAR IS THE ARITHMETIC MEAN OF THE ETA-ESTIMATES,
 AND THE P-VALUE IS GIVEN FOR THE NULL HYPOTHESIS THAT THE TRUE MEAN IS 0.

 ETABAR:         0.0000E+00  0.0000E+00  0.0000E+00  0.0000E+00  0.0000E+00  0.0000E+00  0.0000E+00  0.0000E+00
 SE:             0.0000E+00  0.0000E+00  0.0000E+00  0.0000E+00  0.0000E+00  0.0000E+00  0.0000E+00  0.0000E+00
 N:                       1           1           1           1           1           1           1           1

 P VAL.:         1.0000E+00  1.0000E+00  1.0000E+00  1.0000E+00  1.0000E+00  1.0000E+00  1.0000E+00  1.0000E+00

 ETASHRINKSD(%)  1.0000E+02  1.0000E+02  1.0000E+02  1.0000E+02  1.0000E+02  1.0000E+02  1.0000E+02  1.0000E+02
 ETASHRINKVR(%)  1.0000E+02  1.0000E+02  1.0000E+02  1.0000E+02  1.0000E+02  1.0000E+02  1.0000E+02  1.0000E+02
 EBVSHRINKSD(%)  4.4290E+00  1.1072E+01  2.0691E+01  2.2426E+01  4.1241E+00  2.9851E+01  9.5176E+00  1.5586E+01
 EBVSHRINKVR(%)  8.6619E+00  2.0918E+01  3.7101E+01  3.9822E+01  8.0781E+00  5.0792E+01  1.8129E+01  2.8742E+01
 RELATIVEINF(%)  8.7466E+01  7.2641E+01  5.0050E+01  4.7006E+01  9.1091E+01  4.5865E+01  7.4012E+01  6.5962E+01
 EPSSHRINKSD(%)  4.7777E+01  4.7777E+01  4.7777E+01  4.7777E+01
 EPSSHRINKVR(%)  7.2727E+01  7.2727E+01  7.2727E+01  7.2727E+01


 #TERE:
 Elapsed opt. design time in seconds:     2.37
 #TBLN:      5
 #METH: First Order: BAYESIAN-OPTIMALITY
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
 #TERM:
 NO. OF FUNCTION EVALUATIONS USED:      693
0MINIMIZATION SUCCESSFUL

 ETABAR IS THE ARITHMETIC MEAN OF THE ETA-ESTIMATES,
 AND THE P-VALUE IS GIVEN FOR THE NULL HYPOTHESIS THAT THE TRUE MEAN IS 0.

 ETABAR:         0.0000E+00  0.0000E+00  0.0000E+00  0.0000E+00  0.0000E+00  0.0000E+00  0.0000E+00  0.0000E+00
 SE:             0.0000E+00  0.0000E+00  0.0000E+00  0.0000E+00  0.0000E+00  0.0000E+00  0.0000E+00  0.0000E+00
 N:                       1           1           1           1           1           1           1           1

 P VAL.:         1.0000E+00  1.0000E+00  1.0000E+00  1.0000E+00  1.0000E+00  1.0000E+00  1.0000E+00  1.0000E+00

 ETASHRINKSD(%)  1.0000E+02  1.0000E+02  1.0000E+02  1.0000E+02  1.0000E+02  1.0000E+02  1.0000E+02  1.0000E+02
 ETASHRINKVR(%)  1.0000E+02  1.0000E+02  1.0000E+02  1.0000E+02  1.0000E+02  1.0000E+02  1.0000E+02  1.0000E+02
 EBVSHRINKSD(%)  4.4288E+00  1.1072E+01  2.0693E+01  2.2423E+01  4.1237E+00  2.9855E+01  9.5178E+00  1.5587E+01
 EBVSHRINKVR(%)  8.6614E+00  2.0918E+01  3.7105E+01  3.9818E+01  8.0773E+00  5.0797E+01  1.8130E+01  2.8745E+01
 RELATIVEINF(%)  8.7465E+01  7.2640E+01  5.0049E+01  4.7015E+01  9.1091E+01  4.5863E+01  7.4013E+01  6.5959E+01
 EPSSHRINKSD(%)  4.7777E+01  4.7777E+01  4.7777E+01  4.7777E+01
 EPSSHRINKVR(%)  7.2727E+01  7.2727E+01  7.2727E+01  7.2727E+01


 #TERE:
 Elapsed opt. design time in seconds:     2.33
 #TBLN:      6
 #METH: First Order: BAYESIAN-OPTIMALITY
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
 #TERM:
 NO. OF FUNCTION EVALUATIONS USED:      732
0MINIMIZATION SUCCESSFUL

 ETABAR IS THE ARITHMETIC MEAN OF THE ETA-ESTIMATES,
 AND THE P-VALUE IS GIVEN FOR THE NULL HYPOTHESIS THAT THE TRUE MEAN IS 0.

 ETABAR:         0.0000E+00  0.0000E+00  0.0000E+00  0.0000E+00  0.0000E+00  0.0000E+00  0.0000E+00  0.0000E+00
 SE:             0.0000E+00  0.0000E+00  0.0000E+00  0.0000E+00  0.0000E+00  0.0000E+00  0.0000E+00  0.0000E+00
 N:                       1           1           1           1           1           1           1           1

 P VAL.:         1.0000E+00  1.0000E+00  1.0000E+00  1.0000E+00  1.0000E+00  1.0000E+00  1.0000E+00  1.0000E+00

 ETASHRINKSD(%)  1.0000E+02  1.0000E+02  1.0000E+02  1.0000E+02  1.0000E+02  1.0000E+02  1.0000E+02  1.0000E+02
 ETASHRINKVR(%)  1.0000E+02  1.0000E+02  1.0000E+02  1.0000E+02  1.0000E+02  1.0000E+02  1.0000E+02  1.0000E+02
 EBVSHRINKSD(%)  4.4289E+00  1.1073E+01  2.0692E+01  2.2428E+01  4.1235E+00  2.9852E+01  9.5169E+00  1.5588E+01
 EBVSHRINKVR(%)  8.6617E+00  2.0919E+01  3.7103E+01  3.9825E+01  8.0770E+00  5.0793E+01  1.8128E+01  2.8745E+01
 RELATIVEINF(%)  8.7466E+01  7.2639E+01  5.0045E+01  4.7000E+01  9.1092E+01  4.5864E+01  7.4012E+01  6.5959E+01
 EPSSHRINKSD(%)  4.7777E+01  4.7777E+01  4.7777E+01  4.7777E+01
 EPSSHRINKVR(%)  7.2727E+01  7.2727E+01  7.2727E+01  7.2727E+01


 #TERE:
 Elapsed opt. design time in seconds:     2.47
 Elapsed postprocess time in seconds:     0.02

 ********************                         FIRST ORDER: BAYESIAN-OPTIMALITY                       ********************
 #OBJT:**************             MINIMUM VALUE OF OBJECTIVE FUNCTION: BAYESIAN-OPTIMALITY           ********************
 #OBJV:********************************************      -43.335       **************************************************

 ********************                         FIRST ORDER: BAYESIAN-OPTIMALITY                       ********************
 ********************                             FINAL PARAMETER ESTIMATE                           ********************

 THETA - VECTOR OF FIXED EFFECTS PARAMETERS   *********
         TH 1      TH 2      TH 3      TH 4      TH 5      TH 6      TH 7      TH 8
         3.91E+00 -2.19E+00  5.58E-01 -1.86E-01  2.26E+00  2.10E-01  3.71E+00 -7.09E-01

 OMEGA - COV MATRIX FOR RANDOM EFFECTS - ETAS  ********
         ETA1      ETA2      ETA3      ETA4      ETA5      ETA6      ETA7      ETA8
 ETA1
+        6.25E-02
 ETA2
+        0.00E+00  6.25E-02
 ETA3
+        0.00E+00  0.00E+00  6.25E-02
 ETA4
+        0.00E+00  0.00E+00  0.00E+00  6.25E-02
 ETA5
+        0.00E+00  0.00E+00  0.00E+00  0.00E+00  6.25E-02
 ETA6
+        0.00E+00  0.00E+00  0.00E+00  0.00E+00  0.00E+00  6.25E-02
 ETA7
+        0.00E+00  0.00E+00  0.00E+00  0.00E+00  0.00E+00  0.00E+00  6.25E-02
 ETA8
+        0.00E+00  0.00E+00  0.00E+00  0.00E+00  0.00E+00  0.00E+00  0.00E+00  6.25E-02

 SIGMA - COV MATRIX FOR RANDOM EFFECTS - EPSILONS  ****
         EPS1      EPS2      EPS3      EPS4
 EPS1
+        9.28E-03
 EPS2
+        0.00E+00  1.00E-04
 EPS3
+        0.00E+00  0.00E+00  2.25E-02
 EPS4
+        0.00E+00  0.00E+00  0.00E+00  1.00E-04

 OMEGA - CORR MATRIX FOR RANDOM EFFECTS - ETAS  *******
         ETA1      ETA2      ETA3      ETA4      ETA5      ETA6      ETA7      ETA8
 ETA1
+        2.50E-01
 ETA2
+        0.00E+00  2.50E-01
 ETA3
+        0.00E+00  0.00E+00  2.50E-01
 ETA4
+        0.00E+00  0.00E+00  0.00E+00  2.50E-01
 ETA5
+        0.00E+00  0.00E+00  0.00E+00  0.00E+00  2.50E-01
 ETA6
+        0.00E+00  0.00E+00  0.00E+00  0.00E+00  0.00E+00  2.50E-01
 ETA7
+        0.00E+00  0.00E+00  0.00E+00  0.00E+00  0.00E+00  0.00E+00  2.50E-01
 ETA8
+        0.00E+00  0.00E+00  0.00E+00  0.00E+00  0.00E+00  0.00E+00  0.00E+00  2.50E-01

 SIGMA - CORR MATRIX FOR RANDOM EFFECTS - EPSILONS  ***
         EPS1      EPS2      EPS3      EPS4
 EPS1
+        9.63E-02
 EPS2
+        0.00E+00  1.00E-02
 EPS3
+        0.00E+00  0.00E+00  1.50E-01
 EPS4
+        0.00E+00  0.00E+00  0.00E+00  1.00E-02

 ********************                         FIRST ORDER: BAYESIAN-OPTIMALITY                       ********************
 ********************                            STANDARD ERROR OF ESTIMATE                          ********************

 THETA - VECTOR OF FIXED EFFECTS PARAMETERS   *********
         TH 1      TH 2      TH 3      TH 4      TH 5      TH 6      TH 7      TH 8
         2.68E-01  2.94E-01  3.55E-01  3.67E-01  2.62E-01  3.72E-01  2.91E-01  3.09E-01

 OMEGA - COV MATRIX FOR RANDOM EFFECTS - ETAS  ********
         ETA1      ETA2      ETA3      ETA4      ETA5      ETA6      ETA7      ETA8
 ETA1
+       .........
 ETA2
+       ......... .........
 ETA3
+       ......... ......... .........
 ETA4
+       ......... ......... ......... .........
 ETA5
+       ......... ......... ......... ......... .........
 ETA6
+       ......... ......... ......... ......... ......... .........
 ETA7
+       ......... ......... ......... ......... ......... ......... .........
 ETA8
+       ......... ......... ......... ......... ......... ......... ......... .........

 SIGMA - COV MATRIX FOR RANDOM EFFECTS - EPSILONS  ****
         EPS1      EPS2      EPS3      EPS4
 EPS1
+       .........
 EPS2
+       ......... .........
 EPS3
+       ......... ......... .........
 EPS4
+       ......... ......... ......... .........

 OMEGA - CORR MATRIX FOR RANDOM EFFECTS - ETAS  *******
         ETA1      ETA2      ETA3      ETA4      ETA5      ETA6      ETA7      ETA8
 ETA1
+       .........
 ETA2
+       ......... .........
 ETA3
+       ......... ......... .........
 ETA4
+       ......... ......... ......... .........
 ETA5
+       ......... ......... ......... ......... .........
 ETA6
+       ......... ......... ......... ......... ......... .........
 ETA7
+       ......... ......... ......... ......... ......... ......... .........
 ETA8
+       ......... ......... ......... ......... ......... ......... ......... .........

 SIGMA - CORR MATRIX FOR RANDOM EFFECTS - EPSILONS  ***
         EPS1      EPS2      EPS3      EPS4
 EPS1
+       .........
 EPS2
+       ......... .........
 EPS3
+       ......... ......... .........
 EPS4
+       ......... ......... ......... .........

 ********************                         FIRST ORDER: BAYESIAN-OPTIMALITY                       ********************
 ********************                          COVARIANCE MATRIX OF ESTIMATE                         ********************

     TH 1 | TH 1      TH 2 | TH 1      TH 2 | TH 2      TH 3 | TH 1      TH 3 | TH 2      TH 3 | TH 3      TH 4 | TH 1
     7.16E-02        -1.13E-02         8.65E-02        -1.35E-02         1.88E-02         1.26E-01        -2.13E-03
     TH 4 | TH 2      TH 4 | TH 3      TH 4 | TH 4      TH 5 | TH 1      TH 5 | TH 2      TH 5 | TH 3      TH 5 | TH 4
     4.91E-03         5.23E-02         1.34E-01        -1.38E-03        -1.60E-03         3.89E-04        -4.62E-03
     TH 5 | TH 5      TH 6 | TH 1      TH 6 | TH 2      TH 6 | TH 3      TH 6 | TH 4      TH 6 | TH 5      TH 6 | TH 6
     6.88E-02         7.60E-03        -8.82E-03         7.14E-04         2.59E-02         2.48E-03         1.39E-01
     TH 7 | TH 1      TH 7 | TH 2      TH 7 | TH 3      TH 7 | TH 4      TH 7 | TH 5      TH 7 | TH 6      TH 7 | TH 7
     3.99E-03        -1.61E-02        -1.21E-02        -1.90E-02         5.30E-03        -6.50E-03         8.49E-02
     TH 8 | TH 1      TH 8 | TH 2      TH 8 | TH 3      TH 8 | TH 4      TH 8 | TH 5      TH 8 | TH 6      TH 8 | TH 7
    -4.57E-03        -5.15E-03         1.58E-03        -1.51E-02         2.90E-03        -1.74E-02         1.82E-02
     TH 8 | TH 8
     9.57E-02

 ********************                         FIRST ORDER: BAYESIAN-OPTIMALITY                       ********************
 ********************                          CORRELATION MATRIX OF ESTIMATE                        ********************

     TH 1 | TH 1      TH 2 | TH 1      TH 2 | TH 2      TH 3 | TH 1      TH 3 | TH 2      TH 3 | TH 3      TH 4 | TH 1
     2.68E-01        -1.44E-01         2.94E-01        -1.42E-01         1.80E-01         3.55E-01        -2.17E-02
     TH 4 | TH 2      TH 4 | TH 3      TH 4 | TH 4      TH 5 | TH 1      TH 5 | TH 2      TH 5 | TH 3      TH 5 | TH 4
     4.56E-02         4.02E-01         3.67E-01        -1.96E-02        -2.07E-02         4.18E-03        -4.81E-02
     TH 5 | TH 5      TH 6 | TH 1      TH 6 | TH 2      TH 6 | TH 3      TH 6 | TH 4      TH 6 | TH 5      TH 6 | TH 6
     2.62E-01         7.63E-02        -8.05E-02         5.40E-03         1.90E-01         2.54E-02         3.72E-01
     TH 7 | TH 1      TH 7 | TH 2      TH 7 | TH 3      TH 7 | TH 4      TH 7 | TH 5      TH 7 | TH 6      TH 7 | TH 7
     5.11E-02        -1.87E-01        -1.17E-01        -1.78E-01         6.93E-02        -5.99E-02         2.91E-01
     TH 8 | TH 1      TH 8 | TH 2      TH 8 | TH 3      TH 8 | TH 4      TH 8 | TH 5      TH 8 | TH 6      TH 8 | TH 7
    -5.52E-02        -5.65E-02         1.44E-02        -1.33E-01         3.57E-02        -1.51E-01         2.02E-01
     TH 8 | TH 8
     3.09E-01
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 Elapsed finaloutput time in seconds:     0.13
 #CPUT: Total CPU Time in Seconds,       28.125
