Sat 08/07/2021
01:29 AM
;Model Desc: Receptor Mediated Clearance model with Dynamic Change
;            in Receptors
;Project Name: nm7examples
;Project ID: NO PROJECT DESCRIPTION

$PROB RUN# example6 (from r2compl)
$INPUT C SET ID JID TIME DV AMT RATE EVID MDV CMT TSTRAT TMIN TMAX DSTRAT DMIN DMAX
$DATA optex6d17.csv IGNORE=C

; The new numerical integration solver is used, although ADVAN=9
; is also efficient for this problem.

$SUBROUTINES ADVAN13 TRANS1 TOL=10 ATOL=10
$MODEL NCOMPARTMENTS=3

$PK
MU_1=THETA(1)
MU_2=THETA(2)
MU_3=THETA(3)
MU_4=THETA(4)
MU_5=THETA(5)
MU_6=THETA(6)
MU_7=THETA(7)
MU_8=THETA(8)
VC=EXP(MU_1+ETA(1))
K10=EXP(MU_2+ETA(2))
K12=EXP(MU_3+ETA(3))
K21=EXP(MU_4+ETA(4))
VM=EXP(MU_5+ETA(5))
KMC=EXP(MU_6+ETA(6))
K03=EXP(MU_7+ETA(7))
K30=EXP(MU_8+ETA(8))
S3=VC
S1=VC
KM=KMC*S1
F3=K03/K30

$DES
DADT(1) = -(K10+K12)*A(1) + K21*A(2) - VM*A(1)*A(3)/(A(1)+KM)
DADT(2) = K12*A(1) - K21*A(2)
DADT(3) =  -(VM-K30)*A(1)*A(3)/(A(1)+KM) - K30*A(3) + K03

$ERROR
ETYPE=1
IF(CMT.NE.1) ETYPE=0
IPRED=F
Y = F + ETYPE*( F*EPS(1)+EPS(2) ) + (1.0-ETYPE)*(F*EPS(3)+EPS(4))

$THETA
3.90834E+00
-2.18787E+00
5.57985E-01
-1.86377E-01
2.26146E+00
2.10476E-01
3.70795E+00
-7.08909E-01

$OMEGA (0.0625 FIXED)X8
$SIGMA  (9.27944E-03 FIXED) (0.0001 FIXED) (2.24692E-02 FIXED) (0.0001 FIXED)

$DESIGN MODE=0 FIMDIAG=1 OFVTYPE=1 NELDER DESEL=TIME DESELSTRAT=TSTRAT DESELMIN=TMIN DESELMAX=TMAX
           DESEL=AMT DESELSTRAT=DSTRAT DESELMIN=DMIN DESELMAX=DMAX
           MAXEVAL=50000 sigl=12 nohabort PRINT=100

$TABLE C SET ID JID TIME DV AMT RATE EVID MDV CMT TSTRAT TMIN TMAX DSTRAT DMIN DMAX
       NOPRINT NOAPPEND FILE=tmdd2b.dat FORMAT=sE23.16 NOHEADER

$PROB RUN# 2
$INPUT C SET ID JID TIME DV AMT RATE EVID MDV CMT TSTRAT TMIN TMAX DSTRAT DMIN DMAX
$DATA tmdd2b.dat NOOPEN
(17(E24.16))

$THETA
3.90834E+00
-2.18787E+00
5.57985E-01
-1.86377E-01
2.26146E+00
2.10476E-01
3.70795E+00
-7.08909E-01

$OMEGA (0.0625 FIXED)X8
$SIGMA  (9.27944E-03 FIXED) (0.0001 FIXED) (2.24692E-02 FIXED) (0.0001 FIXED)

$DESIGN MODE=0 FIMDIAG=1 OFVTYPE=8 NELDER DESEL=TIME DESELSTRAT=TSTRAT DESELMIN=TMIN DESELMAX=TMAX
           DESEL=AMT DESELSTRAT=DSTRAT DESELMIN=DMIN DESELMAX=DMAX
           MAXEVAL=0 sigl=12 nohabort PRINT=100

$TABLE ID AMT CMT TIME EVID MDV DV TSTRAT NOPRINT NOAPPEND FILE=tmdd2b.tab

NM-TRAN MESSAGES
 WARNINGS AND ERRORS (IF ANY) FOR PROBLEM    1
 (WARNING  2) NM-TRAN INFERS THAT THE DATA ARE POPULATION.
 WARNINGS AND ERRORS (IF ANY) FOR PROBLEM    2
 (WARNING  2) NM-TRAN INFERS THAT THE DATA ARE POPULATION.

1NONLINEAR MIXED EFFECTS MODEL PROGRAM (NONMEM) VERSION 7.5.0
 ORIGINALLY DEVELOPED BY STUART BEAL, LEWIS SHEINER, AND ALISON BOECKMANN
 CURRENT DEVELOPERS ARE ROBERT BAUER, ICON DEVELOPMENT SOLUTIONS,
 AND ALISON BOECKMANN. IMPLEMENTATION, EFFICIENCY, AND STANDARDIZATION
 PERFORMED BY NOUS INFOSYSTEMS.
 PROBLEM NO.:         1
 RUN# example6 (from r2compl)
 TOT. NO. OF OBS RECS:       11
 TOT. NO. OF INDIVIDUALS:        1
 GENERAL NONLINEAR KINETICS MODEL WITH STIFF/NONSTIFF EQUATIONS (LSODA, ADVAN13)
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 #TBLN:      1
 #METH: First Order: D-OPTIMALITY
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
 #TERM:
 NO. OF FUNCTION EVALUATIONS USED:    56303
0MINIMIZATION SUCCESSFUL

 ETABAR IS THE ARITHMETIC MEAN OF THE ETA-ESTIMATES,
 AND THE P-VALUE IS GIVEN FOR THE NULL HYPOTHESIS THAT THE TRUE MEAN IS 0.

 ETABAR:         0.0000E+00  0.0000E+00  0.0000E+00  0.0000E+00  0.0000E+00  0.0000E+00  0.0000E+00  0.0000E+00
 SE:             0.0000E+00  0.0000E+00  0.0000E+00  0.0000E+00  0.0000E+00  0.0000E+00  0.0000E+00  0.0000E+00
 N:                       1           1           1           1           1           1           1           1

 P VAL.:         1.0000E+00  1.0000E+00  1.0000E+00  1.0000E+00  1.0000E+00  1.0000E+00  1.0000E+00  1.0000E+00

 ETASHRINKSD(%)  1.0000E+02  1.0000E+02  1.0000E+02  1.0000E+02  1.0000E+02  1.0000E+02  1.0000E+02  1.0000E+02
 ETASHRINKVR(%)  1.0000E+02  1.0000E+02  1.0000E+02  1.0000E+02  1.0000E+02  1.0000E+02  1.0000E+02  1.0000E+02
 EBVSHRINKSD(%)  4.3466E+00  1.0462E+01  2.0985E+01  2.1357E+01  6.8373E+00  2.3000E+01  8.5233E+00  1.6716E+01
 EBVSHRINKVR(%)  8.5042E+00  1.9830E+01  3.7567E+01  3.8153E+01  1.3207E+01  4.0710E+01  1.6320E+01  3.0638E+01
 RELATIVEINF(%)  8.7736E+01  7.4085E+01  4.9930E+01  4.9386E+01  8.5340E+01  5.5838E+01  7.7378E+01  6.6257E+01
 EPSSHRINKSD(%)  4.7777E+01  4.7777E+01  4.7777E+01  4.7777E+01
 EPSSHRINKVR(%)  7.2727E+01  7.2727E+01  7.2727E+01  7.2727E+01


 #TERE:
 Elapsed opt. design time in seconds:   323.33
 Elapsed postprocess time in seconds:     0.04

 ********************                            FIRST ORDER: D-OPTIMALITY                           ********************
 #OBJT:**************                MINIMUM VALUE OF OBJECTIVE FUNCTION: D-OPTIMALITY               ********************
 #OBJV:********************************************      -19.287       **************************************************

 ********************                            FIRST ORDER: D-OPTIMALITY                           ********************
 ********************                             FINAL PARAMETER ESTIMATE                           ********************

 THETA - VECTOR OF FIXED EFFECTS PARAMETERS   *********
         TH 1      TH 2      TH 3      TH 4      TH 5      TH 6      TH 7      TH 8
         3.91E+00 -2.19E+00  5.58E-01 -1.86E-01  2.26E+00  2.10E-01  3.71E+00 -7.09E-01

 OMEGA - COV MATRIX FOR RANDOM EFFECTS - ETAS  ********
         ETA1      ETA2      ETA3      ETA4      ETA5      ETA6      ETA7      ETA8
 ETA1
+        6.25E-02
 ETA2
+        0.00E+00  6.25E-02
 ETA3
+        0.00E+00  0.00E+00  6.25E-02
 ETA4
+        0.00E+00  0.00E+00  0.00E+00  6.25E-02
 ETA5
+        0.00E+00  0.00E+00  0.00E+00  0.00E+00  6.25E-02
 ETA6
+        0.00E+00  0.00E+00  0.00E+00  0.00E+00  0.00E+00  6.25E-02
 ETA7
+        0.00E+00  0.00E+00  0.00E+00  0.00E+00  0.00E+00  0.00E+00  6.25E-02
 ETA8
+        0.00E+00  0.00E+00  0.00E+00  0.00E+00  0.00E+00  0.00E+00  0.00E+00  6.25E-02

 SIGMA - COV MATRIX FOR RANDOM EFFECTS - EPSILONS  ****
         EPS1      EPS2      EPS3      EPS4
 EPS1
+        9.28E-03
 EPS2
+        0.00E+00  1.00E-04
 EPS3
+        0.00E+00  0.00E+00  2.25E-02
 EPS4
+        0.00E+00  0.00E+00  0.00E+00  1.00E-04

 OMEGA - CORR MATRIX FOR RANDOM EFFECTS - ETAS  *******
         ETA1      ETA2      ETA3      ETA4      ETA5      ETA6      ETA7      ETA8
 ETA1
+        2.50E-01
 ETA2
+        0.00E+00  2.50E-01
 ETA3
+        0.00E+00  0.00E+00  2.50E-01
 ETA4
+        0.00E+00  0.00E+00  0.00E+00  2.50E-01
 ETA5
+        0.00E+00  0.00E+00  0.00E+00  0.00E+00  2.50E-01
 ETA6
+        0.00E+00  0.00E+00  0.00E+00  0.00E+00  0.00E+00  2.50E-01
 ETA7
+        0.00E+00  0.00E+00  0.00E+00  0.00E+00  0.00E+00  0.00E+00  2.50E-01
 ETA8
+        0.00E+00  0.00E+00  0.00E+00  0.00E+00  0.00E+00  0.00E+00  0.00E+00  2.50E-01

 SIGMA - CORR MATRIX FOR RANDOM EFFECTS - EPSILONS  ***
         EPS1      EPS2      EPS3      EPS4
 EPS1
+        9.63E-02
 EPS2
+        0.00E+00  1.00E-02
 EPS3
+        0.00E+00  0.00E+00  1.50E-01
 EPS4
+        0.00E+00  0.00E+00  0.00E+00  1.00E-02

 ********************                            FIRST ORDER: D-OPTIMALITY                           ********************
 ********************                            STANDARD ERROR OF ESTIMATE                          ********************

 THETA - VECTOR OF FIXED EFFECTS PARAMETERS   *********
         TH 1      TH 2      TH 3      TH 4      TH 5      TH 6      TH 7      TH 8
         2.67E-01  2.91E-01  3.55E-01  3.58E-01  2.71E-01  3.37E-01  2.85E-01  3.09E-01

 OMEGA - COV MATRIX FOR RANDOM EFFECTS - ETAS  ********
         ETA1      ETA2      ETA3      ETA4      ETA5      ETA6      ETA7      ETA8
 ETA1
+       .........
 ETA2
+       ......... .........
 ETA3
+       ......... ......... .........
 ETA4
+       ......... ......... ......... .........
 ETA5
+       ......... ......... ......... ......... .........
 ETA6
+       ......... ......... ......... ......... ......... .........
 ETA7
+       ......... ......... ......... ......... ......... ......... .........
 ETA8
+       ......... ......... ......... ......... ......... ......... ......... .........

 SIGMA - COV MATRIX FOR RANDOM EFFECTS - EPSILONS  ****
         EPS1      EPS2      EPS3      EPS4
 EPS1
+       .........
 EPS2
+       ......... .........
 EPS3
+       ......... ......... .........
 EPS4
+       ......... ......... ......... .........

 OMEGA - CORR MATRIX FOR RANDOM EFFECTS - ETAS  *******
         ETA1      ETA2      ETA3      ETA4      ETA5      ETA6      ETA7      ETA8
 ETA1
+       .........
 ETA2
+       ......... .........
 ETA3
+       ......... ......... .........
 ETA4
+       ......... ......... ......... .........
 ETA5
+       ......... ......... ......... ......... .........
 ETA6
+       ......... ......... ......... ......... ......... .........
 ETA7
+       ......... ......... ......... ......... ......... ......... .........
 ETA8
+       ......... ......... ......... ......... ......... ......... ......... .........

 SIGMA - CORR MATRIX FOR RANDOM EFFECTS - EPSILONS  ***
         EPS1      EPS2      EPS3      EPS4
 EPS1
+       .........
 EPS2
+       ......... .........
 EPS3
+       ......... ......... .........
 EPS4
+       ......... ......... ......... .........

 ********************                            FIRST ORDER: D-OPTIMALITY                           ********************
 ********************                          COVARIANCE MATRIX OF ESTIMATE                         ********************

     TH 1 | TH 1      TH 2 | TH 1      TH 2 | TH 2      TH 3 | TH 1      TH 3 | TH 2      TH 3 | TH 3      TH 4 | TH 1
     7.14E-02        -1.12E-02         8.48E-02        -1.42E-02         1.99E-02         1.26E-01        -3.50E-03
     TH 4 | TH 2      TH 4 | TH 3      TH 4 | TH 4      TH 5 | TH 1      TH 5 | TH 2      TH 5 | TH 3      TH 5 | TH 4
     6.46E-03         5.04E-02         1.28E-01        -2.06E-03        -1.52E-03         1.17E-03        -6.27E-03
     TH 5 | TH 5      TH 6 | TH 1      TH 6 | TH 2      TH 6 | TH 3      TH 6 | TH 4      TH 6 | TH 5      TH 6 | TH 6
     7.36E-02         5.28E-03        -6.56E-03         1.60E-03         2.03E-02         4.62E-03         1.13E-01
     TH 7 | TH 1      TH 7 | TH 2      TH 7 | TH 3      TH 7 | TH 4      TH 7 | TH 5      TH 7 | TH 6      TH 7 | TH 7
     4.36E-03        -1.41E-02        -1.15E-02        -1.71E-02         6.63E-03        -5.30E-03         8.12E-02
     TH 8 | TH 1      TH 8 | TH 2      TH 8 | TH 3      TH 8 | TH 4      TH 8 | TH 5      TH 8 | TH 6      TH 8 | TH 7
    -3.13E-03        -3.22E-03         2.34E-03        -9.52E-03         1.69E-03        -1.47E-02         1.26E-02
     TH 8 | TH 8
     9.55E-02

 ********************                            FIRST ORDER: D-OPTIMALITY                           ********************
 ********************                          CORRELATION MATRIX OF ESTIMATE                        ********************

     TH 1 | TH 1      TH 2 | TH 1      TH 2 | TH 2      TH 3 | TH 1      TH 3 | TH 2      TH 3 | TH 3      TH 4 | TH 1
     2.67E-01        -1.44E-01         2.91E-01        -1.49E-01         1.92E-01         3.55E-01        -3.66E-02
     TH 4 | TH 2      TH 4 | TH 3      TH 4 | TH 4      TH 5 | TH 1      TH 5 | TH 2      TH 5 | TH 3      TH 5 | TH 4
     6.20E-02         3.96E-01         3.58E-01        -2.84E-02        -1.93E-02         1.22E-02        -6.46E-02
     TH 5 | TH 5      TH 6 | TH 1      TH 6 | TH 2      TH 6 | TH 3      TH 6 | TH 4      TH 6 | TH 5      TH 6 | TH 6
     2.71E-01         5.86E-02        -6.69E-02         1.34E-02         1.69E-01         5.06E-02         3.37E-01
     TH 7 | TH 1      TH 7 | TH 2      TH 7 | TH 3      TH 7 | TH 4      TH 7 | TH 5      TH 7 | TH 6      TH 7 | TH 7
     5.72E-02        -1.70E-01        -1.14E-01        -1.68E-01         8.58E-02        -5.52E-02         2.85E-01
     TH 8 | TH 1      TH 8 | TH 2      TH 8 | TH 3      TH 8 | TH 4      TH 8 | TH 5      TH 8 | TH 6      TH 8 | TH 7
    -3.79E-02        -3.58E-02         2.13E-02        -8.62E-02         2.02E-02        -1.41E-01         1.44E-01
     TH 8 | TH 8
     3.09E-01
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 Elapsed finaloutput time in seconds:     0.15

 PROBLEM NO.:         2
 RUN# 2
 TOT. NO. OF DATA RECS:        13
 TOT. NO. OF OBS RECS:       11
 TOT. NO. OF INDIVIDUALS:        1
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 #TBLN:      2
 #METH: First Order (Evaluation): BAYESIAN-OPTIMALITY
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
 #TERM:

 ETABAR IS THE ARITHMETIC MEAN OF THE ETA-ESTIMATES,
 AND THE P-VALUE IS GIVEN FOR THE NULL HYPOTHESIS THAT THE TRUE MEAN IS 0.

 ETABAR:         0.0000E+00  0.0000E+00  0.0000E+00  0.0000E+00  0.0000E+00  0.0000E+00  0.0000E+00  0.0000E+00
 SE:             0.0000E+00  0.0000E+00  0.0000E+00  0.0000E+00  0.0000E+00  0.0000E+00  0.0000E+00  0.0000E+00
 N:                       1           1           1           1           1           1           1           1

 P VAL.:         1.0000E+00  1.0000E+00  1.0000E+00  1.0000E+00  1.0000E+00  1.0000E+00  1.0000E+00  1.0000E+00

 ETASHRINKSD(%)  1.0000E+02  1.0000E+02  1.0000E+02  1.0000E+02  1.0000E+02  1.0000E+02  1.0000E+02  1.0000E+02
 ETASHRINKVR(%)  1.0000E+02  1.0000E+02  1.0000E+02  1.0000E+02  1.0000E+02  1.0000E+02  1.0000E+02  1.0000E+02
 EBVSHRINKSD(%)  4.3460E+00  1.0601E+01  2.0962E+01  2.1603E+01  6.8622E+00  2.3328E+01  8.5674E+00  1.6720E+01
 EBVSHRINKVR(%)  8.5031E+00  2.0079E+01  3.7529E+01  3.8539E+01  1.3254E+01  4.1214E+01  1.6401E+01  3.0644E+01
 RELATIVEINF(%)  8.7740E+01  7.3954E+01  4.9936E+01  4.9309E+01  8.5320E+01  5.5695E+01  7.7340E+01  6.6298E+01
 EPSSHRINKSD(%)  4.7777E+01  4.7777E+01  4.7777E+01  4.7777E+01
 EPSSHRINKVR(%)  7.2727E+01  7.2727E+01  7.2727E+01  7.2727E+01


 #TERE:
 Elapsed opt. design time in seconds:     0.04
 Elapsed postprocess time in seconds:     0.03

 ********************                  FIRST ORDER (EVALUATION): BAYESIAN-OPTIMALITY                 ********************
 #OBJT:**************             MINIMUM VALUE OF OBJECTIVE FUNCTION: BAYESIAN-OPTIMALITY           ********************
 #OBJV:********************************************      -42.893       **************************************************

 ********************                  FIRST ORDER (EVALUATION): BAYESIAN-OPTIMALITY                 ********************
 ********************                             FINAL PARAMETER ESTIMATE                           ********************

 THETA - VECTOR OF FIXED EFFECTS PARAMETERS   *********
         TH 1      TH 2      TH 3      TH 4      TH 5      TH 6      TH 7      TH 8
         3.91E+00 -2.19E+00  5.58E-01 -1.86E-01  2.26E+00  2.10E-01  3.71E+00 -7.09E-01

 OMEGA - COV MATRIX FOR RANDOM EFFECTS - ETAS  ********
         ETA1      ETA2      ETA3      ETA4      ETA5      ETA6      ETA7      ETA8
 ETA1
+        6.25E-02
 ETA2
+        0.00E+00  6.25E-02
 ETA3
+        0.00E+00  0.00E+00  6.25E-02
 ETA4
+        0.00E+00  0.00E+00  0.00E+00  6.25E-02
 ETA5
+        0.00E+00  0.00E+00  0.00E+00  0.00E+00  6.25E-02
 ETA6
+        0.00E+00  0.00E+00  0.00E+00  0.00E+00  0.00E+00  6.25E-02
 ETA7
+        0.00E+00  0.00E+00  0.00E+00  0.00E+00  0.00E+00  0.00E+00  6.25E-02
 ETA8
+        0.00E+00  0.00E+00  0.00E+00  0.00E+00  0.00E+00  0.00E+00  0.00E+00  6.25E-02

 SIGMA - COV MATRIX FOR RANDOM EFFECTS - EPSILONS  ****
         EPS1      EPS2      EPS3      EPS4
 EPS1
+        9.28E-03
 EPS2
+        0.00E+00  1.00E-04
 EPS3
+        0.00E+00  0.00E+00  2.25E-02
 EPS4
+        0.00E+00  0.00E+00  0.00E+00  1.00E-04

 OMEGA - CORR MATRIX FOR RANDOM EFFECTS - ETAS  *******
         ETA1      ETA2      ETA3      ETA4      ETA5      ETA6      ETA7      ETA8
 ETA1
+        2.50E-01
 ETA2
+        0.00E+00  2.50E-01
 ETA3
+        0.00E+00  0.00E+00  2.50E-01
 ETA4
+        0.00E+00  0.00E+00  0.00E+00  2.50E-01
 ETA5
+        0.00E+00  0.00E+00  0.00E+00  0.00E+00  2.50E-01
 ETA6
+        0.00E+00  0.00E+00  0.00E+00  0.00E+00  0.00E+00  2.50E-01
 ETA7
+        0.00E+00  0.00E+00  0.00E+00  0.00E+00  0.00E+00  0.00E+00  2.50E-01
 ETA8
+        0.00E+00  0.00E+00  0.00E+00  0.00E+00  0.00E+00  0.00E+00  0.00E+00  2.50E-01

 SIGMA - CORR MATRIX FOR RANDOM EFFECTS - EPSILONS  ***
         EPS1      EPS2      EPS3      EPS4
 EPS1
+        9.63E-02
 EPS2
+        0.00E+00  1.00E-02
 EPS3
+        0.00E+00  0.00E+00  1.50E-01
 EPS4
+        0.00E+00  0.00E+00  0.00E+00  1.00E-02

 ********************                  FIRST ORDER (EVALUATION): BAYESIAN-OPTIMALITY                 ********************
 ********************                            STANDARD ERROR OF ESTIMATE                          ********************

 THETA - VECTOR OF FIXED EFFECTS PARAMETERS   *********
         TH 1      TH 2      TH 3      TH 4      TH 5      TH 6      TH 7      TH 8
         2.67E-01  2.91E-01  3.55E-01  3.58E-01  2.71E-01  3.37E-01  2.85E-01  3.09E-01

 OMEGA - COV MATRIX FOR RANDOM EFFECTS - ETAS  ********
         ETA1      ETA2      ETA3      ETA4      ETA5      ETA6      ETA7      ETA8
 ETA1
+       .........
 ETA2
+       ......... .........
 ETA3
+       ......... ......... .........
 ETA4
+       ......... ......... ......... .........
 ETA5
+       ......... ......... ......... ......... .........
 ETA6
+       ......... ......... ......... ......... ......... .........
 ETA7
+       ......... ......... ......... ......... ......... ......... .........
 ETA8
+       ......... ......... ......... ......... ......... ......... ......... .........

 SIGMA - COV MATRIX FOR RANDOM EFFECTS - EPSILONS  ****
         EPS1      EPS2      EPS3      EPS4
 EPS1
+       .........
 EPS2
+       ......... .........
 EPS3
+       ......... ......... .........
 EPS4
+       ......... ......... ......... .........

 OMEGA - CORR MATRIX FOR RANDOM EFFECTS - ETAS  *******
         ETA1      ETA2      ETA3      ETA4      ETA5      ETA6      ETA7      ETA8
 ETA1
+       .........
 ETA2
+       ......... .........
 ETA3
+       ......... ......... .........
 ETA4
+       ......... ......... ......... .........
 ETA5
+       ......... ......... ......... ......... .........
 ETA6
+       ......... ......... ......... ......... ......... .........
 ETA7
+       ......... ......... ......... ......... ......... ......... .........
 ETA8
+       ......... ......... ......... ......... ......... ......... ......... .........

 SIGMA - CORR MATRIX FOR RANDOM EFFECTS - EPSILONS  ***
         EPS1      EPS2      EPS3      EPS4
 EPS1
+       .........
 EPS2
+       ......... .........
 EPS3
+       ......... ......... .........
 EPS4
+       ......... ......... ......... .........

 ********************                  FIRST ORDER (EVALUATION): BAYESIAN-OPTIMALITY                 ********************
 ********************                          COVARIANCE MATRIX OF ESTIMATE                         ********************

     TH 1 | TH 1      TH 2 | TH 1      TH 2 | TH 2      TH 3 | TH 1      TH 3 | TH 2      TH 3 | TH 3      TH 4 | TH 1
     7.14E-02        -1.12E-02         8.49E-02        -1.41E-02         1.96E-02         1.26E-01        -3.46E-03
     TH 4 | TH 2      TH 4 | TH 3      TH 4 | TH 4      TH 5 | TH 1      TH 5 | TH 2      TH 5 | TH 3      TH 5 | TH 4
     6.07E-03         5.04E-02         1.28E-01        -2.06E-03        -1.57E-03         1.27E-03        -6.14E-03
     TH 5 | TH 5      TH 6 | TH 1      TH 6 | TH 2      TH 6 | TH 3      TH 6 | TH 4      TH 6 | TH 5      TH 6 | TH 6
     7.37E-02         5.40E-03        -6.14E-03        -1.20E-04         1.83E-02         4.46E-03         1.14E-01
     TH 7 | TH 1      TH 7 | TH 2      TH 7 | TH 3      TH 7 | TH 4      TH 7 | TH 5      TH 7 | TH 6      TH 7 | TH 7
     4.34E-03        -1.42E-02        -1.12E-02        -1.67E-02         6.67E-03        -5.43E-03         8.12E-02
     TH 8 | TH 1      TH 8 | TH 2      TH 8 | TH 3      TH 8 | TH 4      TH 8 | TH 5      TH 8 | TH 6      TH 8 | TH 7
    -3.15E-03        -3.22E-03         2.56E-03        -9.28E-03         1.70E-03        -1.44E-02         1.26E-02
     TH 8 | TH 8
     9.54E-02

 ********************                  FIRST ORDER (EVALUATION): BAYESIAN-OPTIMALITY                 ********************
 ********************                          CORRELATION MATRIX OF ESTIMATE                        ********************

     TH 1 | TH 1      TH 2 | TH 1      TH 2 | TH 2      TH 3 | TH 1      TH 3 | TH 2      TH 3 | TH 3      TH 4 | TH 1
     2.67E-01        -1.44E-01         2.91E-01        -1.49E-01         1.89E-01         3.55E-01        -3.62E-02
     TH 4 | TH 2      TH 4 | TH 3      TH 4 | TH 4      TH 5 | TH 1      TH 5 | TH 2      TH 5 | TH 3      TH 5 | TH 4
     5.82E-02         3.97E-01         3.58E-01        -2.84E-02        -1.99E-02         1.32E-02        -6.32E-02
     TH 5 | TH 5      TH 6 | TH 1      TH 6 | TH 2      TH 6 | TH 3      TH 6 | TH 4      TH 6 | TH 5      TH 6 | TH 6
     2.71E-01         5.99E-02        -6.24E-02        -1.00E-03         1.51E-01         4.87E-02         3.37E-01
     TH 7 | TH 1      TH 7 | TH 2      TH 7 | TH 3      TH 7 | TH 4      TH 7 | TH 5      TH 7 | TH 6      TH 7 | TH 7
     5.70E-02        -1.71E-01        -1.11E-01        -1.64E-01         8.62E-02        -5.65E-02         2.85E-01
     TH 8 | TH 1      TH 8 | TH 2      TH 8 | TH 3      TH 8 | TH 4      TH 8 | TH 5      TH 8 | TH 6      TH 8 | TH 7
    -3.82E-02        -3.58E-02         2.33E-02        -8.40E-02         2.02E-02        -1.39E-01         1.43E-01
     TH 8 | TH 8
     3.09E-01
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 Elapsed finaloutput time in seconds:     0.15
 #CPUT: Total CPU Time in Seconds,      322.656
