Mon Feb 20 18:35:58 UTC 2023
$PROB  THEOPHYLLINE   POPULATION DATA
$INPUT      ID DOSE=AMT TIME CP=DV WT
$DATA       THEOPP

$SUBROUTINES  ADVAN2

$THETA KA=(.1,3,5) (.008,.08,.5) (.004,.04,.9)
$OMEGA BLOCK(3)  KA=6 .005 UNNECESSARILYLONGK=.0002 .3 .006 UNNECESSARILYLONGCL=4

$PK
;THETA(1)=MEAN ABSORPTION RATE CONSTANT (1/HR)
;THETA(2)=MEAN ELIMINATION RATE CONSTANT (1/HR)
;THETA(3)=SLOPE OF CLEARANCE VS WEIGHT RELATIONSHIP (LITERS/HR/KG)
;SCALING PARAMETER=VOLUME/WT SINCE DOSE IS WEIGHT-ADJUSTED
   CALLFL=1
   KA=THETA(KA)+ETA(KA)
   K=THETA(2)+ETA(UNNECESSARILYLONGK)
   CL=THETA(3)*WT+ETA(UNNECESSARILYLONGCL)
   SC=CL/K/WT

$ERROR
   Y=F+EPS(1)

$SIGMA  .4

$EST     MAXEVAL=450  PRINT=5
$COV
$TABLE          ID DOSE WT TIME ETAS(1:LAST) FILE=CONTROL5_implicitabbr.tab
$SCAT           (RES WRES) VS TIME BY ID

NM-TRAN MESSAGES
 WARNINGS AND ERRORS (IF ANY) FOR PROBLEM    1
 (WARNING  2) NM-TRAN INFERS THAT THE DATA ARE POPULATION.
 (WARNING  43) THE $PK BLOCK REQUESTS "CALL ONCE PER INDIVIDUAL RECORD", BUT
 DATA ITEMS ARE USED IN THE $PK BLOCK. VALUES OF THESE DATA ITEMS
 SUBSEQUENT TO THOSE FROM THE FIRST EVENT RECORD WILL BE IGNORED.  IF THIS
 IS NOT APPROPRIATE, THE CALL DATA ITEM CAN BE USED TO OBTAIN ADDITIONAL
 CALLS, OR $PK'S CALLING PROTOCOL SHOULD BE CHANGED.
Note: Analytical 2nd Derivatives are constructed in FSUBS but are never used.
      You may insert $ABBR DERIV2=NO after the first $PROB to save FSUBS construction and compilation time

1NONLINEAR MIXED EFFECTS MODEL PROGRAM (NONMEM) VERSION 7.5.1
 ORIGINALLY DEVELOPED BY STUART BEAL, LEWIS SHEINER, AND ALISON BOECKMANN
 CURRENT DEVELOPERS ARE ROBERT BAUER, ICON DEVELOPMENT SOLUTIONS,
 AND ALISON BOECKMANN. IMPLEMENTATION, EFFICIENCY, AND STANDARDIZATION
 PERFORMED BY NOUS INFOSYSTEMS.
 PROBLEM NO.:         1
 THEOPHYLLINE   POPULATION DATA
 TOT. NO. OF OBS RECS:      132
 TOT. NO. OF INDIVIDUALS:       12
 ONE COMPARTMENT MODEL WITH FIRST-ORDER ABSORPTION (ADVAN2)
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 #TBLN:      1
 #METH: First Order
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
 #TERM:
0MINIMIZATION SUCCESSFUL
 NO. OF FUNCTION EVALUATIONS USED:      152
 NO. OF SIG. DIGITS IN FINAL EST.:  3.0

 TOTAL DATA POINTS NORMALLY DISTRIBUTED (N):          132
 N*LOG(2PI) CONSTANT TO OBJECTIVE FUNCTION:    242.59977276603360
 OBJECTIVE FUNCTION VALUE WITHOUT CONSTANT:    104.56106771844091
 OBJECTIVE FUNCTION VALUE WITH CONSTANT:       347.16084048447453
 REPORTED OBJECTIVE FUNCTION DOES NOT CONTAIN CONSTANT

 TOTAL EFFECTIVE ETAS (NIND*NETA):                            36


 #TERE:
 Elapsed estimation  time in seconds:     0.02
 Elapsed covariance  time in seconds:     0.01
 Elapsed postprocess time in seconds:     0.02

 ********************                                   FIRST ORDER                                  ********************
 #OBJT:**************                       MINIMUM VALUE OF OBJECTIVE FUNCTION                      ********************
 #OBJV:********************************************      104.561       **************************************************

 ********************                                   FIRST ORDER                                  ********************
 ********************                             FINAL PARAMETER ESTIMATE                           ********************

 THETA - VECTOR OF FIXED EFFECTS PARAMETERS   *********
            THETA(KA) TH 2      TH 3
            2.77E+00  7.81E-02  3.63E-02

 OMEGA - COV MATRIX FOR RANDOM EFFECTS - ETAS  ********
            ETA(KA)   ET_UNNECE ET_UNNECE
 ETA(KA)
+           5.55E+00
 ET_UNNECE
+           5.24E-03  2.40E-04
 ET_UNNECE
+          -1.28E-01  9.11E-03  5.15E-01

 SIGMA - COV MATRIX FOR RANDOM EFFECTS - EPSILONS  ****
            EPS1
 EPS1
+           3.88E-01

 OMEGA - CORR MATRIX FOR RANDOM EFFECTS - ETAS  *******
            ETA(KA)   ET_UNNECE ET_UNNECE
 ETA(KA)
+           2.36E+00
 ET_UNNECE
+           1.44E-01  1.55E-02
 ET_UNNECE
+          -7.55E-02  8.19E-01  7.18E-01

 SIGMA - CORR MATRIX FOR RANDOM EFFECTS - EPSILONS  ***
            EPS1
 EPS1
+           6.23E-01

 ********************                                   FIRST ORDER                                  ********************
 ********************                            STANDARD ERROR OF ESTIMATE                          ********************

 THETA - VECTOR OF FIXED EFFECTS PARAMETERS   *********
            THETA(KA) TH 2      TH 3
            7.08E-01  7.26E-03  4.53E-03

 OMEGA - COV MATRIX FOR RANDOM EFFECTS - ETAS  ********
            ETA(KA)   ET_UNNECE ET_UNNECE
 ETA(KA)
+           4.83E+00
 ET_UNNECE
+           1.40E-02  1.22E-04
 ET_UNNECE
+           4.75E-01  3.73E-03  2.12E-01

 SIGMA - COV MATRIX FOR RANDOM EFFECTS - EPSILONS  ****
            EPS1
 EPS1
+           1.05E-01

 OMEGA - CORR MATRIX FOR RANDOM EFFECTS - ETAS  *******
            ETA(KA)   ET_UNNECE ET_UNNECE
 ETA(KA)
+           1.03E+00
 ET_UNNECE
+           3.38E-01  3.95E-03
 ET_UNNECE
+           2.86E-01  1.01E-01  1.47E-01

 SIGMA - CORR MATRIX FOR RANDOM EFFECTS - EPSILONS  ***
            EPS1
 EPS1
+           8.45E-02

 ********************                                   FIRST ORDER                                  ********************
 ********************                          COVARIANCE MATRIX OF ESTIMATE                         ********************

            TH 1      TH 2      TH 3      OM11      OM12      OM13      OM22      OM23      OM33      SG11
 TH 1
+        5.01E-01
 TH 2
+        1.17E-03  5.28E-05
 TH 3
+        4.54E-05  3.12E-05  2.05E-05
 OM11
+        3.31E+00  6.25E-03 -3.83E-04  2.33E+01
 OM12
+        4.33E-03  7.25E-05  3.78E-05  2.16E-02  1.97E-04
 OM13
+        2.97E-03  1.59E-03  1.03E-03 -3.17E-01  5.04E-03  2.25E-01
 OM22
+        7.34E-06  4.19E-07  2.14E-07 -7.26E-06  1.41E-06  4.10E-05  1.50E-08
 OM23
+        1.95E-05 -1.54E-06 -8.36E-07 -2.34E-03  2.29E-05  1.18E-03  3.14E-07  1.39E-05
 OM33
+        6.13E-03 -3.72E-04 -1.65E-04 -8.62E-02  5.79E-04  5.13E-02  8.52E-06  7.05E-04  4.48E-02
 SG11
+       -1.27E-02  2.00E-04  6.06E-05 -1.36E-01  6.70E-04  1.76E-02  7.53E-06  9.47E-05 -1.52E-03  1.11E-02

 ********************                                   FIRST ORDER                                  ********************
 ********************                          CORRELATION MATRIX OF ESTIMATE                        ********************

            TH 1      TH 2      TH 3      OM11      OM12      OM13      OM22      OM23      OM33      SG11
 TH 1
+        7.08E-01
 TH 2
+        2.27E-01  7.26E-03
 TH 3
+        1.42E-02  9.47E-01  4.53E-03
 OM11
+        9.69E-01  1.78E-01 -1.75E-02  4.83E+00
 OM12
+        4.36E-01  7.12E-01  5.95E-01  3.19E-01  1.40E-02
 OM13
+        8.84E-03  4.60E-01  4.78E-01 -1.38E-01  7.57E-01  4.75E-01
 OM22
+        8.47E-02  4.72E-01  3.86E-01 -1.23E-02  8.22E-01  7.05E-01  1.22E-04
 OM23
+        7.38E-03 -5.68E-02 -4.95E-02 -1.30E-01  4.39E-01  6.65E-01  6.88E-01  3.73E-03
 OM33
+        4.09E-02 -2.42E-01 -1.72E-01 -8.44E-02  1.95E-01  5.10E-01  3.29E-01  8.95E-01  2.12E-01
 SG11
+       -1.71E-01  2.61E-01  1.27E-01 -2.68E-01  4.54E-01  3.51E-01  5.85E-01  2.42E-01 -6.81E-02  1.05E-01
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 Elapsed finaloutput time in seconds:     0.02
 #CPUT: Total CPU Time in Seconds,        0.059
