Wed May 17 16:48:44 CEST 2023
$PROB Warfarin PKPD; run000

;O'Reilly RA, Aggeler PM. Studies on coumarin anticoagulant drugs
;Initiation of warfarin therapy without a loading dose.
;Circulation 1968;38:169-177
;
;O'Reilly RA, Aggeler PM, Leong LS. Studies of the coumarin anticoagulant
;drugs: The pharmacodynamics of warfarin in man.
;Journal of Clinical Investigation 1963;42(10):1542-1551

$INPUT ID TIME AMT DV EVID WT AGE SEX SPARSE
$DATA warfarin_PKS.csv IGNORE=@

$SUBR ADVAN2
$PK
	POP_ka  = THETA(1)
	POP_cl  = THETA(2)
	POP_v   = THETA(3)

    KA = exp(POP_ka+ETA(1))
    CL = exp(POP_cl+ETA(2))
    VC = exp(POP_v+ETA(3))

    S2 = VC
    K  = CL/VC

$ERROR
	IPRED  = F
    RESCV  = THETA(4)
	RESADD = THETA(5)
    W      = SQRT(IPRED*IPRED*RESCV*RESCV+RESADD*RESADD)
    IRES   = DV-IPRED
    IWRES  = IRES/W
    Y      = IPRED + W*EPS(1)

$THETA 0.15 ; log ka
$THETA  -2  ; log cl
$THETA   2  ; log v
$THETA 0.2  ; EPS_prop
$THETA 0.5  ; EPS_pkadd

$OMEGA
1   ; ETA_ka
1   ; ETA_cl
1   ; ETA_v

$SIGMA   1 FIX

$EST METHOD=1 INTERACTION MAXEVAL=9999 SIGL=5 PRINT=10 NOHABORT
$COV UNCONDITIONAL
$TABLE ID TIME AMT DV EVID WT AGE SEX SPARSE Y KA CL VC IRES IWRES IPRED
ONEHEADER NOPRINT FILE=run000.csv

NM-TRAN MESSAGES
 WARNINGS AND ERRORS (IF ANY) FOR PROBLEM    1
 (WARNING  2) NM-TRAN INFERS THAT THE DATA ARE POPULATION.

1NONLINEAR MIXED EFFECTS MODEL PROGRAM (NONMEM) VERSION 7.4.3
 ORIGINALLY DEVELOPED BY STUART BEAL, LEWIS SHEINER, AND ALISON BOECKMANN
 CURRENT DEVELOPERS ARE ROBERT BAUER, ICON DEVELOPMENT SOLUTIONS,
 AND ALISON BOECKMANN. IMPLEMENTATION, EFFICIENCY, AND STANDARDIZATION
 PERFORMED BY NOUS INFOSYSTEMS.
 PROBLEM NO.:         1
 Warfarin PKPD; run000
 TOT. NO. OF OBS RECS:      251
 TOT. NO. OF INDIVIDUALS:       32
 ONE COMPARTMENT MODEL WITH FIRST-ORDER ABSORPTION (ADVAN2)
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 #TBLN:      1
 #METH: First Order Conditional Estimation with Interaction
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
 #TERM:
0MINIMIZATION SUCCESSFUL
 NO. OF FUNCTION EVALUATIONS USED:      201
 NO. OF SIG. DIGITS IN FINAL EST.:  3.4

 ETABAR IS THE ARITHMETIC MEAN OF THE ETA-ESTIMATES,
 AND THE P-VALUE IS GIVEN FOR THE NULL HYPOTHESIS THAT THE TRUE MEAN IS 0.

 ETABAR:        -3.1915E-02 -1.2653E-05 -1.0306E-02
 SE:             6.4946E-02  4.7081E-02  3.3118E-02
 N:                      32          32          32

 P VAL.:         6.2314E-01  9.9979E-01  7.5565E-01

 ETASHRINKSD(%)  4.5839E+01  3.7455E+00  1.3373E+01
 ETASHRINKVR(%)  7.0666E+01  7.3508E+00  2.4958E+01
 EBVSHRINKSD(%)  4.4417E+01  5.0673E+00  1.3986E+01
 EBVSHRINKVR(%)  6.9105E+01  9.8778E+00  2.6016E+01
 EPSSHRINKSD(%)  1.3029E+01
 EPSSHRINKVR(%)  2.4361E+01


 TOTAL DATA POINTS NORMALLY DISTRIBUTED (N):          251
 N*LOG(2PI) CONSTANT TO OBJECTIVE FUNCTION:    461.307143668746
 OBJECTIVE FUNCTION VALUE WITHOUT CONSTANT:    423.327289421798
 OBJECTIVE FUNCTION VALUE WITH CONSTANT:       884.634433090543
 REPORTED OBJECTIVE FUNCTION DOES NOT CONTAIN CONSTANT

 TOTAL EFFECTIVE ETAS (NIND*NETA):                            96


 #TERE:
 Elapsed estimation  time in seconds:     1.30
 Elapsed covariance  time in seconds:     0.70
 Elapsed postprocess time in seconds:     0.02

 ********************               FIRST ORDER CONDITIONAL ESTIMATION WITH INTERACTION              ********************
 #OBJT:**************                       MINIMUM VALUE OF OBJECTIVE FUNCTION                      ********************
 #OBJV:********************************************      423.327       **************************************************

 ********************               FIRST ORDER CONDITIONAL ESTIMATION WITH INTERACTION              ********************
 ********************                             FINAL PARAMETER ESTIMATE                           ********************

 THETA - VECTOR OF FIXED EFFECTS PARAMETERS   *********
         TH 1      TH 2      TH 3      TH 4      TH 5
        -5.69E-01 -2.01E+00  2.06E+00  1.17E-01  7.22E-01

 OMEGA - COV MATRIX FOR RANDOM EFFECTS - ETAS  ********
         ETA1      ETA2      ETA3
 ETA1
+        4.75E-01
 ETA2
+        0.00E+00  7.90E-02
 ETA3
+        0.00E+00  0.00E+00  4.83E-02

 SIGMA - COV MATRIX FOR RANDOM EFFECTS - EPSILONS  ****
         EPS1
 EPS1
+        1.00E+00

 OMEGA - CORR MATRIX FOR RANDOM EFFECTS - ETAS  *******
         ETA1      ETA2      ETA3
 ETA1
+        6.89E-01
 ETA2
+        0.00E+00  2.81E-01
 ETA3
+        0.00E+00  0.00E+00  2.20E-01

 SIGMA - CORR MATRIX FOR RANDOM EFFECTS - EPSILONS  ***
         EPS1
 EPS1
+        1.00E+00

 ********************               FIRST ORDER CONDITIONAL ESTIMATION WITH INTERACTION              ********************
 ********************                            STANDARD ERROR OF ESTIMATE                          ********************

 THETA - VECTOR OF FIXED EFFECTS PARAMETERS   *********
         TH 1      TH 2      TH 3      TH 4      TH 5
         2.46E-01  5.38E-02  4.60E-02  2.65E-02  1.54E-01

 OMEGA - COV MATRIX FOR RANDOM EFFECTS - ETAS  ********
         ETA1      ETA2      ETA3
 ETA1
+        2.24E-01
 ETA2
+       .........  2.40E-02
 ETA3
+       ......... .........  1.44E-02

 SIGMA - COV MATRIX FOR RANDOM EFFECTS - EPSILONS  ****
         EPS1
 EPS1
+       .........

 OMEGA - CORR MATRIX FOR RANDOM EFFECTS - ETAS  *******
         ETA1      ETA2      ETA3
 ETA1
+        1.63E-01
 ETA2
+       .........  4.26E-02
 ETA3
+       ......... .........  3.29E-02

 SIGMA - CORR MATRIX FOR RANDOM EFFECTS - EPSILONS  ***
         EPS1
 EPS1
+       .........

 ********************               FIRST ORDER CONDITIONAL ESTIMATION WITH INTERACTION              ********************
 ********************                          COVARIANCE MATRIX OF ESTIMATE                         ********************

            TH 1      TH 2      TH 3      TH 4      TH 5      OM11      OM12      OM13      OM22      OM23      OM33      SG11
 TH 1
+        6.06E-02
 TH 2
+       -2.94E-03  2.90E-03
 TH 3
+        2.71E-04  7.83E-04  2.12E-03
 TH 4
+       -2.33E-03  4.56E-04  1.85E-04  7.04E-04
 TH 5
+       -1.57E-02  1.71E-04 -3.88E-03 -6.24E-04  2.37E-02
 OM11
+        2.40E-02  1.20E-03  5.14E-04  9.63E-04 -1.07E-02  5.03E-02
 OM12
+       ......... ......... ......... ......... ......... ......... .........
 OM13
+       ......... ......... ......... ......... ......... ......... ......... .........
 OM22
+        2.58E-04  3.74E-04 -2.32E-04 -1.36E-04 -4.62E-04  9.92E-04 ......... .........  5.74E-04
 OM23
+       ......... ......... ......... ......... ......... ......... ......... ......... ......... .........
 OM33
+        2.25E-05 -4.24E-05  9.67E-05 -6.27E-05  2.19E-04 -3.15E-04 ......... .........  8.99E-05 .........  2.08E-04
 SG11
+       ......... ......... ......... ......... ......... ......... ......... ......... ......... ......... ......... .........

 ********************               FIRST ORDER CONDITIONAL ESTIMATION WITH INTERACTION              ********************
 ********************                          CORRELATION MATRIX OF ESTIMATE                        ********************

            TH 1      TH 2      TH 3      TH 4      TH 5      OM11      OM12      OM13      OM22      OM23      OM33      SG11
 TH 1
+        2.46E-01
 TH 2
+       -2.22E-01  5.38E-02
 TH 3
+        2.39E-02  3.16E-01  4.60E-02
 TH 4
+       -3.57E-01  3.19E-01  1.51E-01  2.65E-02
 TH 5
+       -4.15E-01  2.06E-02 -5.47E-01 -1.53E-01  1.54E-01
 OM11
+        4.36E-01  9.90E-02  4.98E-02  1.62E-01 -3.10E-01  2.24E-01
 OM12
+       ......... ......... ......... ......... ......... ......... .........
 OM13
+       ......... ......... ......... ......... ......... ......... ......... .........
 OM22
+        4.38E-02  2.90E-01 -2.11E-01 -2.14E-01 -1.25E-01  1.85E-01 ......... .........  2.40E-02
 OM23
+       ......... ......... ......... ......... ......... ......... ......... ......... ......... .........
 OM33
+        6.34E-03 -5.46E-02  1.46E-01 -1.64E-01  9.85E-02 -9.74E-02 ......... .........  2.60E-01 .........  1.44E-02
 SG11
+       ......... ......... ......... ......... ......... ......... ......... ......... ......... ......... ......... .........
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 Elapsed finaloutput time in seconds:     0.08
 #CPUT: Total CPU Time in Seconds,        1.287
