Run Start Date:  18/04/2022
Run Start Time: 20:29:28.86
Run Stop Date:   18/04/2022
Run Stop Time:  20:29:49.50

********************                            CONTROL STREAM                                      ********************

$PROB Warfarin PKPD; run001

;O'Reilly RA, Aggeler PM. Studies on coumarin anticoagulant drugs
;Initiation of warfarin therapy without a loading dose.
;Circulation 1968;38:169-177
;
;O'Reilly RA, Aggeler PM, Leong LS. Studies of the coumarin anticoagulant
;drugs: The pharmacodynamics of warfarin in man.
;Journal of Clinical Investigation 1963;42(10):1542-1551

$INPUT id time amt dv evid wt age sex sparse
$DATA warfarin_PKS.csv IGNORE=@

$SUBR ADVAN13 TOL=9
$MODEL
   COMP=GUT
   COMP=CENTRAL
$PK
	POP_ka  = THETA(1)
	POP_cl  = THETA(2)
	POP_v   = THETA(3)

    ka = exp(POP_ka+ETA(1))
    cl = exp(POP_cl+ETA(2))
    v = exp(POP_v+ETA(3))

$DES
    gut   = A(1)
    center= A(2)

    DADT(1) = -ka * gut
    DADT(2) =  ka * gut - cl / v * center

$ERROR
    conc=A(2)/v
	IPRED = conc
    RESCV = THETA(4)
	RESADD = THETA(5)
    IRES   = DV-IPRED
    IWRES  = (DV-IPRED)/(IPRED*RESCV+RESADD)
    Y      = IPRED + RESCV*IPRED*EPS(1) + RESADD*EPS(2)

$THETA 0.15 ; log ka
$THETA  -2  ; log cl
$THETA   2  ; log v
$THETA 0.2  ; EPS_prop
$THETA 0.5  ; EPS_pkadd

$OMEGA
1   ; ETA_ka
1   ; ETA_cl
1   ; ETA_v

$SIGMA   1 FIX 1 FIX

$EST METHOD=1 INTERACTION MAXEVAL=9999 SIGL=5 PRINT=10 NOHABORT
$COV UNCONDITIONAL
$TABLE id time conc sparse Y ka cl v IRES IWRES IPRED
ONEHEADER NOPRINT FILE=run001.csv


********************                            SYSTEM INFORMATION                                  ********************

Operating system:

Microsoft Windows [Version 10.0.22000.613]

Compiler: Intel(R) Parallel Studio XE 2015 Update 3 Composer Edition (package 208)

Compiler settings: /Gs /nologo /nbs /w /fp:strict

********************                            NMTRAN MESSAGES                                     ********************

 WARNINGS AND ERRORS (IF ANY) FOR PROBLEM    1
 (WARNING  2) NM-TRAN INFERS THAT THE DATA ARE POPULATION.
********************                            NONMEM EXECUTION                                    ********************

1NONLINEAR MIXED EFFECTS MODEL PROGRAM (NONMEM) VERSION 7.5.0
 ORIGINALLY DEVELOPED BY STUART BEAL, LEWIS SHEINER, AND ALISON BOECKMANN
 CURRENT DEVELOPERS ARE ROBERT BAUER, ICON DEVELOPMENT SOLUTIONS,
 AND ALISON BOECKMANN. IMPLEMENTATION, EFFICIENCY, AND STANDARDIZATION
 PERFORMED BY NOUS INFOSYSTEMS.
 PROBLEM NO.:         1
 Warfarin PKPD; run001
 TOT. NO. OF OBS RECS:      251
 TOT. NO. OF INDIVIDUALS:       32
 GENERAL NONLINEAR KINETICS MODEL WITH STIFF/NONSTIFF EQUATIONS (LSODA, ADVAN13)
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 #TBLN:      1
 #METH: First Order Conditional Estimation with Interaction
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
 #TERM:
0MINIMIZATION SUCCESSFUL
 NO. OF FUNCTION EVALUATIONS USED:      200
 NO. OF SIG. DIGITS IN FINAL EST.:  3.2

 ETABAR IS THE ARITHMETIC MEAN OF THE ETA-ESTIMATES,
 AND THE P-VALUE IS GIVEN FOR THE NULL HYPOTHESIS THAT THE TRUE MEAN IS 0.

 ETABAR:        -3.1858E-02 -2.2752E-05 -1.0313E-02
 SE:             6.4940E-02  4.7080E-02  3.3120E-02
 N:                      32          32          32

 P VAL.:         6.2373E-01  9.9961E-01  7.5551E-01

 ETASHRINKSD(%)  4.5838E+01  3.7419E+00  1.3384E+01
 ETASHRINKVR(%)  7.0664E+01  7.3438E+00  2.4976E+01
 EBVSHRINKSD(%)  4.4417E+01  5.0682E+00  1.3983E+01
 EBVSHRINKVR(%)  6.9106E+01  9.8796E+00  2.6010E+01
 RELATIVEINF(%)  3.0661E+01  8.9415E+01  7.3970E+01
 EPSSHRINKSD(%)  1.3033E+01  1.3033E+01
 EPSSHRINKVR(%)  2.4368E+01  2.4368E+01


 TOTAL DATA POINTS NORMALLY DISTRIBUTED (N):          251
 N*LOG(2PI) CONSTANT TO OBJECTIVE FUNCTION:    461.307143668746
 OBJECTIVE FUNCTION VALUE WITHOUT CONSTANT:    423.327287970079
 OBJECTIVE FUNCTION VALUE WITH CONSTANT:       884.634431638825
 REPORTED OBJECTIVE FUNCTION DOES NOT CONTAIN CONSTANT

 TOTAL EFFECTIVE ETAS (NIND*NETA):                            96


 #TERE:
 Elapsed estimation  time in seconds:     7.70
 Elapsed covariance  time in seconds:     5.29
 Elapsed postprocess time in seconds:     0.10

 ********************               FIRST ORDER CONDITIONAL ESTIMATION WITH INTERACTION              ********************
 #OBJT:**************                       MINIMUM VALUE OF OBJECTIVE FUNCTION                      ********************
 #OBJV:********************************************      423.327       **************************************************

 ********************               FIRST ORDER CONDITIONAL ESTIMATION WITH INTERACTION              ********************
 ********************                             FINAL PARAMETER ESTIMATE                           ********************

 THETA - VECTOR OF FIXED EFFECTS PARAMETERS   *********
         TH 1      TH 2      TH 3      TH 4      TH 5
        -5.70E-01 -2.01E+00  2.06E+00  1.17E-01  7.22E-01

 OMEGA - COV MATRIX FOR RANDOM EFFECTS - ETAS  ********
         ETA1      ETA2      ETA3
 ETA1
+        4.75E-01
 ETA2
+        0.00E+00  7.90E-02
 ETA3
+        0.00E+00  0.00E+00  4.83E-02

 SIGMA - COV MATRIX FOR RANDOM EFFECTS - EPSILONS  ****
         EPS1      EPS2
 EPS1
+        1.00E+00
 EPS2
+        0.00E+00  1.00E+00

 OMEGA - CORR MATRIX FOR RANDOM EFFECTS - ETAS  *******
         ETA1      ETA2      ETA3
 ETA1
+        6.89E-01
 ETA2
+        0.00E+00  2.81E-01
 ETA3
+        0.00E+00  0.00E+00  2.20E-01

 SIGMA - CORR MATRIX FOR RANDOM EFFECTS - EPSILONS  ***
         EPS1      EPS2
 EPS1
+        1.00E+00
 EPS2
+        0.00E+00  1.00E+00

 ********************               FIRST ORDER CONDITIONAL ESTIMATION WITH INTERACTION              ********************
 ********************                            STANDARD ERROR OF ESTIMATE                          ********************

 THETA - VECTOR OF FIXED EFFECTS PARAMETERS   *********
         TH 1      TH 2      TH 3      TH 4      TH 5
         2.46E-01  5.39E-02  4.60E-02  2.65E-02  1.54E-01

 OMEGA - COV MATRIX FOR RANDOM EFFECTS - ETAS  ********
         ETA1      ETA2      ETA3
 ETA1
+        2.24E-01
 ETA2
+       .........  2.40E-02
 ETA3
+       ......... .........  1.44E-02

 SIGMA - COV MATRIX FOR RANDOM EFFECTS - EPSILONS  ****
         EPS1      EPS2
 EPS1
+       .........
 EPS2
+       ......... .........

 OMEGA - CORR MATRIX FOR RANDOM EFFECTS - ETAS  *******
         ETA1      ETA2      ETA3
 ETA1
+        1.63E-01
 ETA2
+       .........  4.26E-02
 ETA3
+       ......... .........  3.29E-02

 SIGMA - CORR MATRIX FOR RANDOM EFFECTS - EPSILONS  ***
         EPS1      EPS2
 EPS1
+       .........
 EPS2
+       ......... .........

 ********************               FIRST ORDER CONDITIONAL ESTIMATION WITH INTERACTION              ********************
 ********************                          COVARIANCE MATRIX OF ESTIMATE                         ********************

            TH 1      TH 2      TH 3      TH 4      TH 5      OM11      OM12      OM13      OM22      OM23      OM33      SG11
             SG12      SG22
 TH 1
+        6.06E-02
 TH 2
+       -2.94E-03  2.90E-03
 TH 3
+        2.70E-04  7.83E-04  2.12E-03
 TH 4
+       -2.33E-03  4.56E-04  1.84E-04  7.04E-04
 TH 5
+       -1.57E-02  1.71E-04 -3.87E-03 -6.22E-04  2.37E-02
 OM11
+        2.40E-02  1.20E-03  5.13E-04  9.61E-04 -1.07E-02  5.02E-02
 OM12
+       ......... ......... ......... ......... ......... ......... .........
 OM13
+       ......... ......... ......... ......... ......... ......... ......... .........
 OM22
+        2.58E-04  3.74E-04 -2.32E-04 -1.36E-04 -4.62E-04  9.91E-04 ......... .........  5.74E-04
 OM23
+       ......... ......... ......... ......... ......... ......... ......... ......... ......... .........
 OM33
+        2.20E-05 -4.24E-05  9.68E-05 -6.27E-05  2.19E-04 -3.15E-04 ......... .........  8.99E-05 .........  2.09E-04
 SG11
+       ......... ......... ......... ......... ......... ......... ......... ......... ......... ......... ......... .........
 SG12
+       ......... ......... ......... ......... ......... ......... ......... ......... ......... ......... ......... .........
         .........
 SG22
+       ......... ......... ......... ......... ......... ......... ......... ......... ......... ......... ......... .........
         ......... .........

 ********************               FIRST ORDER CONDITIONAL ESTIMATION WITH INTERACTION              ********************
 ********************                          CORRELATION MATRIX OF ESTIMATE                        ********************

            TH 1      TH 2      TH 3      TH 4      TH 5      OM11      OM12      OM13      OM22      OM23      OM33      SG11
             SG12      SG22
 TH 1
+        2.46E-01
 TH 2
+       -2.22E-01  5.39E-02
 TH 3
+        2.38E-02  3.16E-01  4.60E-02
 TH 4
+       -3.57E-01  3.19E-01  1.51E-01  2.65E-02
 TH 5
+       -4.15E-01  2.06E-02 -5.47E-01 -1.52E-01  1.54E-01
 OM11
+        4.36E-01  9.90E-02  4.97E-02  1.62E-01 -3.10E-01  2.24E-01
 OM12
+       ......... ......... ......... ......... ......... ......... .........
 OM13
+       ......... ......... ......... ......... ......... ......... ......... .........
 OM22
+        4.38E-02  2.90E-01 -2.11E-01 -2.14E-01 -1.25E-01  1.85E-01 ......... .........  2.40E-02
 OM23
+       ......... ......... ......... ......... ......... ......... ......... ......... ......... .........
 OM33
+        6.19E-03 -5.45E-02  1.46E-01 -1.64E-01  9.86E-02 -9.75E-02 ......... .........  2.60E-01 .........  1.44E-02
 SG11
+       ......... ......... ......... ......... ......... ......... ......... ......... ......... ......... ......... .........
 SG12
+       ......... ......... ......... ......... ......... ......... ......... ......... ......... ......... ......... .........
         .........
 SG22
+       ......... ......... ......... ......... ......... ......... ......... ......... ......... ......... ......... .........
         ......... .........
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 Elapsed finaloutput time in seconds:     0.07
 #CPUT: Total CPU Time in Seconds,       13.609
