Run Start Date:  16/05/2023
Run Start Time: 15:09:00.71
Run Stop Date:   16/05/2023
Run Stop Time:  15:09:28.66

********************                            CONTROL STREAM                                      ********************

$PROB Warfarin PKPD; run002

;O'Reilly RA, Aggeler PM. Studies on coumarin anticoagulant drugs
;Initiation of warfarin therapy without a loading dose.
;Circulation 1968;38:169-177
;
;O'Reilly RA, Aggeler PM, Leong LS. Studies of the coumarin anticoagulant
;drugs: The pharmacodynamics of warfarin in man.
;Journal of Clinical Investigation 1963;42(10):1542-1551

$INPUT id time amt dv evid wt age sex sparse
$DATA warfarin_PKS.csv IGNORE=@

$SUBR ADVAN13 TOL=9
$MODEL
   COMP=GUT
   COMP=CENTRAL
$PK
	POP_ka  = THETA(1)
	POP_cl  = THETA(2)
	POP_v   = THETA(3)
	POP_TLAG= THETA(4)

    ka = exp(POP_ka+ETA(1))
    cl = exp(POP_cl+ETA(2))
    v = exp(POP_v+ETA(3))
	ALAG1=exp(POP_TLAG+ETA(4))

$DES
    gut   = A(1)
    center= A(2)

    DADT(1) = -ka * gut
    DADT(2) =  ka * gut - cl / v * center

$ERROR
    conc=A(2)/v
	IPRED = conc
    RESCV = THETA(5)
	RESADD = THETA(6)
    IRES   = DV-IPRED
    IWRES  = (DV-IPRED)/(IPRED*RESCV+RESADD)
    Y      = IPRED + RESCV*IPRED*EPS(1) + RESADD*EPS(2)

$THETA 0.2  ; log ka
$THETA  -2  ; log cl
$THETA   2  ; log v
$THETA -0.2 ; log Tlag
$THETA (0.001,0.2)  ; EPS_prop
$THETA (0.001,0.5)  ; EPS_pkadd

$OMEGA
0.7  ; ETA_ka
0.2  ; ETA_cl
0.2  ; ETA_v
0.6  ; ETA_Tlag

$SIGMA   1 FIX 1 FIX

$EST METHOD=1 INTERACTION MAXEVAL=9999 SIGL=5 PRINT=10 NOHABORT
$COV UNCONDITIONAL
$TABLE id time conc sparse Y ka cl v ALAG1 IRES IWRES IPRED ETAS(1:LAST)
ONEHEADER NOPRINT FILE=run002.csv


********************                            SYSTEM INFORMATION                                  ********************

Operating system:

Microsoft Windows [Version 10.0.22621.1702]

Compiler: Intel(R) Parallel Studio XE 2015 Update 3 Composer Edition (package 208)

Compiler settings: /Gs /nologo /nbs /w /fp:strict

********************                            NMTRAN MESSAGES                                     ********************

 WARNINGS AND ERRORS (IF ANY) FOR PROBLEM    1
 (WARNING  2) NM-TRAN INFERS THAT THE DATA ARE POPULATION.
********************                            NONMEM EXECUTION                                    ********************

1NONLINEAR MIXED EFFECTS MODEL PROGRAM (NONMEM) VERSION 7.5.0
 ORIGINALLY DEVELOPED BY STUART BEAL, LEWIS SHEINER, AND ALISON BOECKMANN
 CURRENT DEVELOPERS ARE ROBERT BAUER, ICON DEVELOPMENT SOLUTIONS,
 AND ALISON BOECKMANN. IMPLEMENTATION, EFFICIENCY, AND STANDARDIZATION
 PERFORMED BY NOUS INFOSYSTEMS.
 PROBLEM NO.:         1
 Warfarin PKPD; run002
 TOT. NO. OF OBS RECS:      251
 TOT. NO. OF INDIVIDUALS:       32
 GENERAL NONLINEAR KINETICS MODEL WITH STIFF/NONSTIFF EQUATIONS (LSODA, ADVAN13)
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 #TBLN:      1
 #METH: First Order Conditional Estimation with Interaction
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
 #TERM:
0MINIMIZATION SUCCESSFUL
 HOWEVER, PROBLEMS OCCURRED WITH THE MINIMIZATION.
 REGARD THE RESULTS OF THE ESTIMATION STEP CAREFULLY, AND ACCEPT THEM ONLY
 AFTER CHECKING THAT THE COVARIANCE STEP PRODUCES REASONABLE OUTPUT.
 NO. OF FUNCTION EVALUATIONS USED:      394
 NO. OF SIG. DIGITS IN FINAL EST.:  3.3

 ETABAR IS THE ARITHMETIC MEAN OF THE ETA-ESTIMATES,
 AND THE P-VALUE IS GIVEN FOR THE NULL HYPOTHESIS THAT THE TRUE MEAN IS 0.

 ETABAR:        -1.5832E-02  5.6481E-04 -4.7105E-03  2.3729E-02
 SE:             6.8979E-02  5.0426E-02  3.6759E-02  4.6526E-02
 N:                      32          32          32          32

 P VAL.:         8.1847E-01  9.9106E-01  8.9804E-01  6.1003E-01

 ETASHRINKSD(%)  5.0581E+01  1.0000E-10  4.0645E+00  5.7120E+01
 ETASHRINKVR(%)  7.5578E+01  1.0000E-10  7.9638E+00  8.1613E+01
 EBVSHRINKSD(%)  5.0189E+01  1.3826E+00  5.4733E+00  5.5771E+01
 EBVSHRINKVR(%)  7.5189E+01  2.7461E+00  1.0647E+01  8.0438E+01
 RELATIVEINF(%)  2.2728E+01  9.6960E+01  8.9052E+01  1.7867E+01
 EPSSHRINKSD(%)  1.5925E+01  1.5685E+01
 EPSSHRINKVR(%)  2.9314E+01  2.8910E+01


 TOTAL DATA POINTS NORMALLY DISTRIBUTED (N):          251
 N*LOG(2PI) CONSTANT TO OBJECTIVE FUNCTION:    461.307143668746
 OBJECTIVE FUNCTION VALUE WITHOUT CONSTANT:    225.932863900636
 OBJECTIVE FUNCTION VALUE WITH CONSTANT:       687.240007569381
 REPORTED OBJECTIVE FUNCTION DOES NOT CONTAIN CONSTANT

 TOTAL EFFECTIVE ETAS (NIND*NETA):                           128


 #TERE:
 Elapsed estimation  time in seconds:    13.26
0R MATRIX ALGORITHMICALLY NON-POSITIVE-SEMIDEFINITE
 BUT NONSINGULAR
0R MATRIX IS OUTPUT
0COVARIANCE STEP ABORTED
 Elapsed covariance  time in seconds:     5.58
 Elapsed postprocess time in seconds:     0.06

 ********************               FIRST ORDER CONDITIONAL ESTIMATION WITH INTERACTION              ********************
 #OBJT:**************                       MINIMUM VALUE OF OBJECTIVE FUNCTION                      ********************
 #OBJV:********************************************      225.933       **************************************************

 ********************               FIRST ORDER CONDITIONAL ESTIMATION WITH INTERACTION              ********************
 ********************                             FINAL PARAMETER ESTIMATE                           ********************

 THETA - VECTOR OF FIXED EFFECTS PARAMETERS   *********
         TH 1      TH 2      TH 3      TH 4      TH 5      TH 6
         2.29E-01 -2.02E+00  2.08E+00 -2.31E-01  8.43E-02  2.81E-01

 OMEGA - COV MATRIX FOR RANDOM EFFECTS - ETAS  ********
         ETA1      ETA2      ETA3      ETA4
 ETA1
+        6.44E-01
 ETA2
+        0.00E+00  8.39E-02
 ETA3
+        0.00E+00  0.00E+00  4.85E-02
 ETA4
+        0.00E+00  0.00E+00  0.00E+00  3.89E-01

 SIGMA - COV MATRIX FOR RANDOM EFFECTS - EPSILONS  ****
         EPS1      EPS2
 EPS1
+        1.00E+00
 EPS2
+        0.00E+00  1.00E+00

 OMEGA - CORR MATRIX FOR RANDOM EFFECTS - ETAS  *******
         ETA1      ETA2      ETA3      ETA4
 ETA1
+        8.02E-01
 ETA2
+        0.00E+00  2.90E-01
 ETA3
+        0.00E+00  0.00E+00  2.20E-01
 ETA4
+        0.00E+00  0.00E+00  0.00E+00  6.24E-01

 SIGMA - CORR MATRIX FOR RANDOM EFFECTS - EPSILONS  ***
         EPS1      EPS2
 EPS1
+        1.00E+00
 EPS2
+        0.00E+00  1.00E+00
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 Elapsed finaloutput time in seconds:     0.04
 #CPUT: Total CPU Time in Seconds,       14.172
