Mon Oct  5 09:16:13 PM CEST 2026
$PROBLEM est-fo-posthoc - First-order (METHOD=0) estimation with POSTHOC etas
$INPUT ID TIME AMT RATE EVID CMT SS II ADDL DV MDV ROWID
$DATA data.csv IGNORE=@
$SUBROUTINES ADVAN2 TRANS2
$PK
  CL = THETA(1)*EXP(ETA(1))
  V  = THETA(2)*EXP(ETA(2))
  KA = THETA(3)
  S2 = V
$ERROR
  IPRED = F
  W = THETA(4)*IPRED
  IF (W .EQ. 0) W = 1
  IWRES = (DV - IPRED)/W
  Y = IPRED + W*EPS(1)
$THETA (0, 3) (0, 30) (0, 1.2) (0, 0.1)
$OMEGA 0.09 0.04
$SIGMA 1 FIX
$EST METHOD=0 MAXEVAL=9999 POSTHOC PRINT=5 NOABORT
$COV UNCONDITIONAL
$TABLE ID TIME EVID ROWID IPRED IWRES ONEHEADER NOPRINT FILE=run.tab
$TABLE ID ETAS(1:LAST) FIRSTONLY ONEHEADER NOPRINT NOAPPEND FILE=run.eta

NM-TRAN MESSAGES
 WARNINGS AND ERRORS (IF ANY) FOR PROBLEM    1
 (WARNING  2) NM-TRAN INFERS THAT THE DATA ARE POPULATION.

1NONLINEAR MIXED EFFECTS MODEL PROGRAM (NONMEM) VERSION 7.4.3
 ORIGINALLY DEVELOPED BY STUART BEAL, LEWIS SHEINER, AND ALISON BOECKMANN
 CURRENT DEVELOPERS ARE ROBERT BAUER, ICON DEVELOPMENT SOLUTIONS,
 AND ALISON BOECKMANN. IMPLEMENTATION, EFFICIENCY, AND STANDARDIZATION
 PERFORMED BY NOUS INFOSYSTEMS.
 PROBLEM NO.:         1
 est-fo-posthoc - First-order (METHOD=0) estimation with POSTHOC etas
 TOT. NO. OF OBS RECS:      220
 TOT. NO. OF INDIVIDUALS:       20
 ONE COMPARTMENT MODEL WITH FIRST-ORDER ABSORPTION (ADVAN2)
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 #TBLN:      1
 #METH: First Order
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
 #TERM:
0MINIMIZATION SUCCESSFUL
 NO. OF FUNCTION EVALUATIONS USED:      117
 NO. OF SIG. DIGITS IN FINAL EST.:  3.7

 TOTAL DATA POINTS NORMALLY DISTRIBUTED (N):          220
 N*LOG(2PI) CONSTANT TO OBJECTIVE FUNCTION:    404.332954610056
 OBJECTIVE FUNCTION VALUE WITHOUT CONSTANT:   -568.786696739111
 OBJECTIVE FUNCTION VALUE WITH CONSTANT:      -164.453742129055
 REPORTED OBJECTIVE FUNCTION DOES NOT CONTAIN CONSTANT

 TOTAL EFFECTIVE ETAS (NIND*NETA):                            40


 #TERE:
 Elapsed estimation  time in seconds:     0.08
 Elapsed covariance  time in seconds:     0.04
 Elapsed postprocess time in seconds:     0.00

 ********************                                   FIRST ORDER                                  ********************
 #OBJT:**************                       MINIMUM VALUE OF OBJECTIVE FUNCTION                      ********************
 #OBJV:********************************************     -568.787       **************************************************

 ********************                                   FIRST ORDER                                  ********************
 ********************                             FINAL PARAMETER ESTIMATE                           ********************

 THETA - VECTOR OF FIXED EFFECTS PARAMETERS   *********
         TH 1      TH 2      TH 3      TH 4
         3.70E+00  3.26E+01  1.39E+00  1.03E-01

 OMEGA - COV MATRIX FOR RANDOM EFFECTS - ETAS  ********
         ETA1      ETA2
 ETA1
+        4.93E-02
 ETA2
+        0.00E+00  4.03E-02

 SIGMA - COV MATRIX FOR RANDOM EFFECTS - EPSILONS  ****
         EPS1
 EPS1
+        1.00E+00

 OMEGA - CORR MATRIX FOR RANDOM EFFECTS - ETAS  *******
         ETA1      ETA2
 ETA1
+        2.22E-01
 ETA2
+        0.00E+00  2.01E-01

 SIGMA - CORR MATRIX FOR RANDOM EFFECTS - EPSILONS  ***
         EPS1
 EPS1
+        1.00E+00

 ********************                                   FIRST ORDER                                  ********************
 ********************                            STANDARD ERROR OF ESTIMATE                          ********************

 THETA - VECTOR OF FIXED EFFECTS PARAMETERS   *********
         TH 1      TH 2      TH 3      TH 4
         1.67E-01  1.50E+00  5.87E-02  6.84E-03

 OMEGA - COV MATRIX FOR RANDOM EFFECTS - ETAS  ********
         ETA1      ETA2
 ETA1
+        1.28E-02
 ETA2
+       .........  1.11E-02

 SIGMA - COV MATRIX FOR RANDOM EFFECTS - EPSILONS  ****
         EPS1
 EPS1
+       .........

 OMEGA - CORR MATRIX FOR RANDOM EFFECTS - ETAS  *******
         ETA1      ETA2
 ETA1
+        2.87E-02
 ETA2
+       .........  2.76E-02

 SIGMA - CORR MATRIX FOR RANDOM EFFECTS - EPSILONS  ***
         EPS1
 EPS1
+       .........

 ********************                                   FIRST ORDER                                  ********************
 ********************                          COVARIANCE MATRIX OF ESTIMATE                         ********************

            TH 1      TH 2      TH 3      TH 4      OM11      OM12      OM22      SG11
 TH 1
+        2.79E-02
 TH 2
+        5.34E-02  2.26E+00
 TH 3
+       -2.26E-03 -1.36E-02  3.45E-03
 TH 4
+        3.73E-04  1.96E-03  2.45E-05  4.68E-05
 OM11
+        1.04E-03  5.49E-03 -9.33E-05  1.94E-05  1.63E-04
 OM12
+       ......... ......... ......... ......... ......... .........
 OM22
+        6.43E-04  9.17E-03  1.55E-04  2.07E-05  1.24E-05 .........  1.22E-04
 SG11
+       ......... ......... ......... ......... ......... ......... ......... .........

 ********************                                   FIRST ORDER                                  ********************
 ********************                          CORRELATION MATRIX OF ESTIMATE                        ********************

            TH 1      TH 2      TH 3      TH 4      OM11      OM12      OM22      SG11
 TH 1
+        1.67E-01
 TH 2
+        2.13E-01  1.50E+00
 TH 3
+       -2.31E-01 -1.54E-01  5.87E-02
 TH 4
+        3.27E-01  1.91E-01  6.09E-02  6.84E-03
 OM11
+        4.89E-01  2.86E-01 -1.25E-01  2.22E-01  1.28E-02
 OM12
+       ......... ......... ......... ......... ......... .........
 OM22
+        3.48E-01  5.52E-01  2.39E-01  2.73E-01  8.82E-02 .........  1.11E-02
 SG11
+       ......... ......... ......... ......... ......... ......... ......... .........
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 Elapsed finaloutput time in seconds:     0.02
 #CPUT: Total CPU Time in Seconds,        0.130
