Mon Oct  5 09:15:48 PM CEST 2026
$PROBLEM est-its-foce - ITS followed by FOCE-I (METHOD=COND INTER) with MATRIX=R covariance
$INPUT ID TIME AMT RATE EVID CMT SS II ADDL DV MDV ROWID
$DATA data.csv IGNORE=@
$SUBROUTINES ADVAN2 TRANS2
$PK
  CL = THETA(1)*EXP(ETA(1))
  V  = THETA(2)*EXP(ETA(2))
  KA = THETA(3)
  S2 = V
$ERROR
  IPRED = F
  W = THETA(4)*IPRED
  IF (W .EQ. 0) W = 1
  IWRES = (DV - IPRED)/W
  Y = IPRED + W*EPS(1)
$THETA (0, 3) (0, 30) (0, 1.2) (0, 0.1)
$OMEGA 0.09 0.04
$SIGMA 1 FIX
$EST METHOD=ITS INTER NITER=50 PRINT=10 NOABORT
$EST METHOD=COND INTER MAXEVAL=9999 PRINT=5 NOABORT
$COV MATRIX=R UNCONDITIONAL
$TABLE ID TIME EVID ROWID IPRED IWRES ONEHEADER NOPRINT FILE=run.tab
$TABLE ID ETAS(1:LAST) FIRSTONLY ONEHEADER NOPRINT NOAPPEND FILE=run.eta

NM-TRAN MESSAGES
 WARNINGS AND ERRORS (IF ANY) FOR PROBLEM    1
 (WARNING  2) NM-TRAN INFERS THAT THE DATA ARE POPULATION.

1NONLINEAR MIXED EFFECTS MODEL PROGRAM (NONMEM) VERSION 7.4.3
 ORIGINALLY DEVELOPED BY STUART BEAL, LEWIS SHEINER, AND ALISON BOECKMANN
 CURRENT DEVELOPERS ARE ROBERT BAUER, ICON DEVELOPMENT SOLUTIONS,
 AND ALISON BOECKMANN. IMPLEMENTATION, EFFICIENCY, AND STANDARDIZATION
 PERFORMED BY NOUS INFOSYSTEMS.
 PROBLEM NO.:         1
 est-its-foce - ITS followed by FOCE-I (METHOD=COND INTER) with MATRIX=R
 TOT. NO. OF OBS RECS:      220
 TOT. NO. OF INDIVIDUALS:       20
 ONE COMPARTMENT MODEL WITH FIRST-ORDER ABSORPTION (ADVAN2)
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 #TBLN:      1
 #METH: Iterative Two Stage
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
 #TERM:
 OPTIMIZATION WAS NOT TESTED FOR CONVERGENCE

 ETABAR IS THE ARITHMETIC MEAN OF THE ETA-ESTIMATES,
 AND THE P-VALUE IS GIVEN FOR THE NULL HYPOTHESIS THAT THE TRUE MEAN IS 0.

 ETABAR:         8.7419E-02  4.4514E-02
 SE:             6.7045E-02  4.6631E-02
 N:                      20          20

 P VAL.:         1.9228E-01  3.3978E-01

 ETASHRINKSD(%)  2.4100E+00  3.2128E+00
 ETASHRINKVR(%)  4.7619E+00  6.3225E+00
 EBVSHRINKSD(%)  5.4096E-01  1.8089E+00
 EBVSHRINKVR(%)  1.0790E+00  3.5850E+00
 EPSSHRINKSD(%)  5.3193E+00
 EPSSHRINKVR(%)  1.0356E+01


 TOTAL DATA POINTS NORMALLY DISTRIBUTED (N):          220
 N*LOG(2PI) CONSTANT TO OBJECTIVE FUNCTION:    404.332954610056
 OBJECTIVE FUNCTION VALUE WITHOUT CONSTANT:   -522.660841824003
 OBJECTIVE FUNCTION VALUE WITH CONSTANT:      -118.327887213947
 REPORTED OBJECTIVE FUNCTION DOES NOT CONTAIN CONSTANT

 TOTAL EFFECTIVE ETAS (NIND*NETA):                            40


 #TERE:
 Elapsed estimation  time in seconds:     0.59
 Elapsed covariance  time in seconds:     0.01

 ********************                               ITERATIVE TWO STAGE                              ********************
 #OBJT:**************                        FINAL VALUE OF OBJECTIVE FUNCTION                       ********************
 #OBJV:********************************************     -522.661       **************************************************

 ********************                               ITERATIVE TWO STAGE                              ********************
 ********************                             FINAL PARAMETER ESTIMATE                           ********************

 THETA - VECTOR OF FIXED EFFECTS PARAMETERS   *********
         TH 1      TH 2      TH 3      TH 4
         2.93E+00  2.81E+01  1.24E+00  9.88E-02

 OMEGA - COV MATRIX FOR RANDOM EFFECTS - ETAS  ********
         ETA1      ETA2
 ETA1
+        9.94E-02
 ETA2
+        0.00E+00  4.89E-02

 SIGMA - COV MATRIX FOR RANDOM EFFECTS - EPSILONS  ****
         EPS1
 EPS1
+        1.00E+00

 OMEGA - CORR MATRIX FOR RANDOM EFFECTS - ETAS  *******
         ETA1      ETA2
 ETA1
+        3.15E-01
 ETA2
+        0.00E+00  2.21E-01

 SIGMA - CORR MATRIX FOR RANDOM EFFECTS - EPSILONS  ***
         EPS1
 EPS1
+        1.00E+00

 ********************                               ITERATIVE TWO STAGE                              ********************
 ********************                          STANDARD ERROR OF ESTIMATE (S)                        ********************

 THETA - VECTOR OF FIXED EFFECTS PARAMETERS   *********
         TH 1      TH 2      TH 3      TH 4
         3.84E-01  2.07E+00  4.41E-02  7.10E-03

 OMEGA - COV MATRIX FOR RANDOM EFFECTS - ETAS  ********
         ETA1      ETA2
 ETA1
+        3.79E-02
 ETA2
+        0.00E+00  1.81E-02

 SIGMA - COV MATRIX FOR RANDOM EFFECTS - EPSILONS  ****
         EPS1
 EPS1
+        0.00E+00

 OMEGA - CORR MATRIX FOR RANDOM EFFECTS - ETAS  *******
         ETA1      ETA2
 ETA1
+        6.01E-02
 ETA2
+       .........  4.10E-02

 SIGMA - CORR MATRIX FOR RANDOM EFFECTS - EPSILONS  ***
         EPS1
 EPS1
+       .........

 ********************                               ITERATIVE TWO STAGE                              ********************
 ********************                        COVARIANCE MATRIX OF ESTIMATE (S)                       ********************

            TH 1      TH 2      TH 3      TH 4      OM11      OM12      OM22      SG11
 TH 1
+        1.47E-01
 TH 2
+        2.87E-01  4.27E+00
 TH 3
+        2.65E-03  9.44E-03  1.95E-03
 TH 4
+        1.44E-03  3.44E-03  2.95E-05  5.04E-05
 OM11
+       -8.15E-03 -2.26E-02 -2.24E-04 -1.02E-04  1.44E-03
 OM12
+       ......... ......... ......... ......... ......... .........
 OM22
+        2.44E-03 -1.18E-02  2.08E-04  3.23E-05 -1.02E-04  0.00E+00  3.29E-04
 SG11
+       ......... ......... ......... ......... ......... ......... ......... .........

 ********************                               ITERATIVE TWO STAGE                              ********************
 ********************                        CORRELATION MATRIX OF ESTIMATE (S)                      ********************

            TH 1      TH 2      TH 3      TH 4      OM11      OM12      OM22      SG11
 TH 1
+        3.84E-01
 TH 2
+        3.61E-01  2.07E+00
 TH 3
+        1.56E-01  1.04E-01  4.41E-02
 TH 4
+        5.30E-01  2.35E-01  9.43E-02  7.10E-03
 OM11
+       -5.60E-01 -2.89E-01 -1.34E-01 -3.80E-01  3.79E-02
 OM12
+       ......... ......... ......... ......... ......... .........
 OM22
+        3.51E-01 -3.14E-01  2.60E-01  2.51E-01 -1.48E-01  0.00E+00  1.81E-02
 SG11
+       ......... ......... ......... ......... ......... ......... ......... .........
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 #TBLN:      2
 #METH: First Order Conditional Estimation with Interaction
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
 #TERM:
0MINIMIZATION SUCCESSFUL
 NO. OF FUNCTION EVALUATIONS USED:      129
 NO. OF SIG. DIGITS IN FINAL EST.:  3.6

 ETABAR IS THE ARITHMETIC MEAN OF THE ETA-ESTIMATES,
 AND THE P-VALUE IS GIVEN FOR THE NULL HYPOTHESIS THAT THE TRUE MEAN IS 0.

 ETABAR:         3.9103E-04 -1.0586E-03
 SE:             6.6919E-02  4.6259E-02
 N:                      20          20

 P VAL.:         9.9534E-01  9.8174E-01

 ETASHRINKSD(%)  1.0000E-10  1.0000E-10
 ETASHRINKVR(%)  1.0000E-10  1.0000E-10
 EBVSHRINKSD(%)  6.3849E-01  2.1345E+00
 EBVSHRINKVR(%)  1.2729E+00  4.2235E+00
 EPSSHRINKSD(%)  9.0317E+00
 EPSSHRINKVR(%)  1.7248E+01


 TOTAL DATA POINTS NORMALLY DISTRIBUTED (N):          220
 N*LOG(2PI) CONSTANT TO OBJECTIVE FUNCTION:    404.332954610056
 OBJECTIVE FUNCTION VALUE WITHOUT CONSTANT:   -525.930050165287
 OBJECTIVE FUNCTION VALUE WITH CONSTANT:      -121.597095555231
 REPORTED OBJECTIVE FUNCTION DOES NOT CONTAIN CONSTANT

 TOTAL EFFECTIVE ETAS (NIND*NETA):                            40


 #TERE:
 Elapsed estimation  time in seconds:     0.21
 Elapsed covariance  time in seconds:     0.13
 Elapsed postprocess time in seconds:     0.01

 ********************               FIRST ORDER CONDITIONAL ESTIMATION WITH INTERACTION              ********************
 #OBJT:**************                       MINIMUM VALUE OF OBJECTIVE FUNCTION                      ********************
 #OBJV:********************************************     -525.930       **************************************************

 ********************               FIRST ORDER CONDITIONAL ESTIMATION WITH INTERACTION              ********************
 ********************                             FINAL PARAMETER ESTIMATE                           ********************

 THETA - VECTOR OF FIXED EFFECTS PARAMETERS   *********
         TH 1      TH 2      TH 3      TH 4
         3.21E+00  2.95E+01  1.24E+00  1.03E-01

 OMEGA - COV MATRIX FOR RANDOM EFFECTS - ETAS  ********
         ETA1      ETA2
 ETA1
+        9.10E-02
 ETA2
+        0.00E+00  4.48E-02

 SIGMA - COV MATRIX FOR RANDOM EFFECTS - EPSILONS  ****
         EPS1
 EPS1
+        1.00E+00

 OMEGA - CORR MATRIX FOR RANDOM EFFECTS - ETAS  *******
         ETA1      ETA2
 ETA1
+        3.02E-01
 ETA2
+        0.00E+00  2.12E-01

 SIGMA - CORR MATRIX FOR RANDOM EFFECTS - EPSILONS  ***
         EPS1
 EPS1
+        1.00E+00

 ********************               FIRST ORDER CONDITIONAL ESTIMATION WITH INTERACTION              ********************
 ********************                            STANDARD ERROR OF ESTIMATE                          ********************

 THETA - VECTOR OF FIXED EFFECTS PARAMETERS   *********
         TH 1      TH 2      TH 3      TH 4
         2.18E-01  1.45E+00  4.04E-02  5.48E-03

 OMEGA - COV MATRIX FOR RANDOM EFFECTS - ETAS  ********
         ETA1      ETA2
 ETA1
+        2.93E-02
 ETA2
+       .........  1.48E-02

 SIGMA - COV MATRIX FOR RANDOM EFFECTS - EPSILONS  ****
         EPS1
 EPS1
+       .........

 OMEGA - CORR MATRIX FOR RANDOM EFFECTS - ETAS  *******
         ETA1      ETA2
 ETA1
+        4.85E-02
 ETA2
+       .........  3.50E-02

 SIGMA - CORR MATRIX FOR RANDOM EFFECTS - EPSILONS  ***
         EPS1
 EPS1
+       .........

 ********************               FIRST ORDER CONDITIONAL ESTIMATION WITH INTERACTION              ********************
 ********************                          COVARIANCE MATRIX OF ESTIMATE                         ********************

            TH 1      TH 2      TH 3      TH 4      OM11      OM12      OM22      SG11
 TH 1
+        4.75E-02
 TH 2
+        5.23E-03  2.11E+00
 TH 3
+        2.39E-04  1.02E-02  1.63E-03
 TH 4
+        2.36E-05  1.59E-04 -9.94E-07  3.01E-05
 OM11
+       -2.28E-05  5.85E-04  3.35E-05 -8.01E-07  8.56E-04
 OM12
+       ......... ......... ......... ......... ......... .........
 OM22
+       -2.71E-05  1.22E-04  9.11E-06 -1.15E-06  3.80E-07 .........  2.20E-04
 SG11
+       ......... ......... ......... ......... ......... ......... ......... .........

 ********************               FIRST ORDER CONDITIONAL ESTIMATION WITH INTERACTION              ********************
 ********************                          CORRELATION MATRIX OF ESTIMATE                        ********************

            TH 1      TH 2      TH 3      TH 4      OM11      OM12      OM22      SG11
 TH 1
+        2.18E-01
 TH 2
+        1.65E-02  1.45E+00
 TH 3
+        2.72E-02  1.73E-01  4.04E-02
 TH 4
+        1.97E-02  2.00E-02 -4.49E-03  5.48E-03
 OM11
+       -3.57E-03  1.38E-02  2.83E-02 -4.99E-03  2.93E-02
 OM12
+       ......... ......... ......... ......... ......... .........
 OM22
+       -8.37E-03  5.66E-03  1.52E-02 -1.41E-02  8.76E-04 .........  1.48E-02
 SG11
+       ......... ......... ......... ......... ......... ......... ......... .........
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 Elapsed finaloutput time in seconds:     0.01
 #CPUT: Total CPU Time in Seconds,        0.925
