Mon 05/15/2023
10:32 PM
;; 1. Based on: run7
;; 2. Description:
;; x1. Author: Iasiimwe
$PROBLEM    2 cmpt,lvr,3 trnst,CLint/Vc corr
; Shouldn't be better - should just not be worse; aim is to change CL to one based on CLint, which is more meaningful - no additional parameter added.
$ABBREVIATED DERIV2=NO
; For analysis
$INPUT      C RECN STUDYN SUBJID ID ID_2 FORM AMT NTIME TIME_ORGNL
            TIME EVID CMT DVID DV MDV M1_F DV_M3 MDV_M3 M3_F DV_M5
            MDV_M5 M5_F DV_M6 MDV_M6 M6_F LLOQ BLQ AGE SEX RACE WT HT
            BMI FFM FAT SMK=DROP SMK_2 ALC=DROP ALC_2 GENO=DROP
            PREDOSE USUBJID=DROP
; For VPC

; $INPUT C RECN STUDYN SUBJID ID ID_2 FORM AMT NTIME TIME_ORGNL TIME EVID CMT DVID DV_M1 MDV_M1 M1_F DV MDV M3_F DV_M5 MDV_M5 M5_F DV_M6 MDV_M6 M6_F LLOQ BLQ AGE SEX RACE WT HT BMI FFM FAT SMK=DROP SMK_2 ALC=DROP ALC_2 GENO=DROP PREDOSE USUBJID=DROP
$DATA      desipramine_poppk_11_05_2023.csv IGNORE=C
            IGNORE=(M3_F.EQ.1,PREDOSE.EQ.1,STUDYN.EQ.700,STUDYN.EQ.800)
$SUBROUTINE ADVAN5
$MODEL      COMP (DEPOT,DEFDOS) COMP (CENTRAL,DEFOBS) COMP
            (PERIPHERAL) COMP (LIVER) COMP (TRANSIT1) COMP (TRANSIT2)
            COMP (TRANSIT3)
$PK
TVCLint = THETA(1)
TVV2 = THETA(2)
TVKTR = THETA(3)
TVV3 = THETA(4)
TVBIO = THETA(5)
TVQ = THETA(6)

CLint = TVCLint * EXP(ETA(1))
V2 = TVV2 * EXP(ETA(2))
KTR = TVKTR * EXP(ETA(3))
V3 = TVV3 * EXP(ETA(4))
BIO = TVBIO * EXP(ETA(5))
Q = TVQ * EXP(ETA(6))

; Central volume scaling
S2=V2

; Hepatic blood flow and volume
QHB = 3.75 * WT**0.75 ; Hepatic blood flow (PMIDs: 20840444, 30091858)
QH = QHB * 0.96 ; Hepatic plasma flow (see below)
VH = 1 ; Liver volume fixed to 1 L (PMID: 30091858)

; Well-stirred hepatic clearance
FU = 0.2 ; Fraction of desipramine unbound in plasma
BPR = 0.96 ; Desipramine blood:plasma ratio
FUB = FU/BPR ; Fraction unbound in blood
EH = CLint*FUB/(QH+(CLint*FUB)) ; Hepatic extraction/clearance
FH = 1-EH ; Fraction reaching systemic circulation
CLH = QH*EH ; Hepatic clearance

; Micro-rate parameter definitions
F1 = BIO
K15 = KTR
K56 = KTR
K67 = KTR
K74 = KTR
K42 = FH * QH/VH
K40 = CLH/VH
K24 = QH/V2
K23 = Q/V2
K32 = Q/V3

$THETA  (0,500) ; CLint
 (0,1000) ; Vc
 (0,1) ; KTR
 (0,500) ; Vp
 1 FIX ; BIO
 (0,50) ; Q
 (0,0.3) ; Proportional
 (0,0.2) ; Additive
$OMEGA  BLOCK(2)
 0.6  ;  BSV CLint
 0.01 0.1  ;     BSV Vc
$OMEGA  0.1  ;    BSV KTR
 0  FIX  ;     BSV Vp
 0  FIX  ;    BSV BIO
 0  FIX  ;      BSV Q
$ERROR ; Beal method 3
; residual error is coded using THETAs rather than EPS’s or ERR
ADD = THETA(7)
PROP = F*THETA(8)
SD = SQRT(ADD*ADD+PROP*PROP) ; combined error model
IF (BLQ.EQ.1) THEN
   F_FLAG=1 ; probability that F is less than LLOQ for missing concentrations
   Y=PHI((LLOQ-F)/SD)
ELSE
   F_FLAG=0 ; regular likelihood for measured concentrations
   Y = F + SD*EPS(1)
ENDIF

IPRED=F

W = 1
IRES = DV-IPRED
IWRES = IRES/W

$SIGMA  1  FIX  ; Not estimated
$ESTIMATION METHOD=1 LAPLACIAN INTERACTION NUMERICAL SLOW
            MAXEVALS=9999 POSTHOC NOABORT SIGL=9 PRINT=5 NSIG=2
$COVARIANCE UNCONDITIONAL MATRIX=S
$TABLE      ID TIME DV IPRED WRES CWRES CLint ETA1 V2 ETA2 KTR ETA3 V3
            ETA6 NOPRINT ONEHEADER FILE=run9results.csv

NM-TRAN MESSAGES
 WARNINGS AND ERRORS (IF ANY) FOR PROBLEM    1
 (WARNING  2) NM-TRAN INFERS THAT THE DATA ARE POPULATION.

1NONLINEAR MIXED EFFECTS MODEL PROGRAM (NONMEM) VERSION 7.5.1
 ORIGINALLY DEVELOPED BY STUART BEAL, LEWIS SHEINER, AND ALISON BOECKMANN
 CURRENT DEVELOPERS ARE ROBERT BAUER, ICON DEVELOPMENT SOLUTIONS,
 AND ALISON BOECKMANN. IMPLEMENTATION, EFFICIENCY, AND STANDARDIZATION
 PERFORMED BY NOUS INFOSYSTEMS.
 PROBLEM NO.:         1
 2 cmpt,lvr,3 trnst,CLint/Vc corr
 TOT. NO. OF OBS RECS:     1121
 TOT. NO. OF INDIVIDUALS:      114
 GENERAL LINEAR KINETICS MODEL (ADVAN5)
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 #TBLN:      1
 #METH: Laplacian Conditional Estimation with Interaction
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
 #TERM:
0MINIMIZATION SUCCESSFUL
 NO. OF FUNCTION EVALUATIONS USED:      997
 NO. OF SIG. DIGITS IN FINAL EST.:  2.1

 ETABAR IS THE ARITHMETIC MEAN OF THE ETA-ESTIMATES,
 AND THE P-VALUE IS GIVEN FOR THE NULL HYPOTHESIS THAT THE TRUE MEAN IS 0.

 ETABAR:         1.2505E-02  2.8412E-03 -9.4913E-03  0.0000E+00  0.0000E+00  0.0000E+00
 SE:             7.3139E-02  2.5425E-02  2.8452E-02  0.0000E+00  0.0000E+00  0.0000E+00
 N:                     114         114         114         114         114         114

 P VAL.:         8.6424E-01  9.1102E-01  7.3869E-01  1.0000E+00  1.0000E+00  1.0000E+00

 ETASHRINKSD(%)  7.6792E-01  9.6760E+00  4.7088E+00  0.0000E+00  0.0000E+00  0.0000E+00
 ETASHRINKVR(%)  1.5299E+00  1.8416E+01  9.1958E+00  0.0000E+00  0.0000E+00  0.0000E+00
 EBVSHRINKSD(%)  6.1881E-01  8.8516E+00  3.9777E+00  0.0000E+00  0.0000E+00  0.0000E+00
 EBVSHRINKVR(%)  1.2338E+00  1.6920E+01  7.7971E+00  0.0000E+00  0.0000E+00  0.0000E+00
 RELATIVEINF(%)  9.8421E+01  8.1948E+01  9.1624E+01  0.0000E+00  0.0000E+00  0.0000E+00
 EPSSHRINKSD(%)  1.4023E+01
 EPSSHRINKVR(%)  2.6080E+01


 TOTAL DATA POINTS NORMALLY DISTRIBUTED (N):         1121
 N*LOG(2PI) CONSTANT TO OBJECTIVE FUNCTION:    2060.2601914448760
 OBJECTIVE FUNCTION VALUE WITHOUT CONSTANT:    2797.8711943826752
 OBJECTIVE FUNCTION VALUE WITH CONSTANT:       4858.1313858275516
 REPORTED OBJECTIVE FUNCTION DOES NOT CONTAIN CONSTANT

 TOTAL EFFECTIVE ETAS (NIND*NETA):                           342


 #TERE:
 Elapsed estimation  time in seconds:  4850.13
 Elapsed covariance  time in seconds:   132.03
 Elapsed postprocess time in seconds:     4.69

 ********************                LAPLACIAN CONDITIONAL ESTIMATION WITH INTERACTION               ********************
 #OBJT:**************                       MINIMUM VALUE OF OBJECTIVE FUNCTION                      ********************
 #OBJV:********************************************     2797.871       **************************************************

 ********************                LAPLACIAN CONDITIONAL ESTIMATION WITH INTERACTION               ********************
 ********************                             FINAL PARAMETER ESTIMATE                           ********************

 THETA - VECTOR OF FIXED EFFECTS PARAMETERS   *********
         TH 1      TH 2      TH 3      TH 4      TH 5      TH 6      TH 7      TH 8
         4.75E+02  9.40E+02  1.30E+00  3.25E+02  1.00E+00  6.16E+01  3.59E-01  1.58E-01

 OMEGA - COV MATRIX FOR RANDOM EFFECTS - ETAS  ********
         ETA1      ETA2      ETA3      ETA4      ETA5      ETA6
 ETA1
+        6.19E-01
 ETA2
+        3.17E-02  9.03E-02
 ETA3
+        0.00E+00  0.00E+00  1.02E-01
 ETA4
+        0.00E+00  0.00E+00  0.00E+00  0.00E+00
 ETA5
+        0.00E+00  0.00E+00  0.00E+00  0.00E+00  0.00E+00
 ETA6
+        0.00E+00  0.00E+00  0.00E+00  0.00E+00  0.00E+00  0.00E+00

 SIGMA - COV MATRIX FOR RANDOM EFFECTS - EPSILONS  ****
         EPS1
 EPS1
+        1.00E+00

 OMEGA - CORR MATRIX FOR RANDOM EFFECTS - ETAS  *******
         ETA1      ETA2      ETA3      ETA4      ETA5      ETA6
 ETA1
+        7.87E-01
 ETA2
+        1.34E-01  3.01E-01
 ETA3
+        0.00E+00  0.00E+00  3.19E-01
 ETA4
+        0.00E+00  0.00E+00  0.00E+00  0.00E+00
 ETA5
+        0.00E+00  0.00E+00  0.00E+00  0.00E+00  0.00E+00
 ETA6
+        0.00E+00  0.00E+00  0.00E+00  0.00E+00  0.00E+00  0.00E+00

 SIGMA - CORR MATRIX FOR RANDOM EFFECTS - EPSILONS  ***
         EPS1
 EPS1
+        1.00E+00

 ********************                LAPLACIAN CONDITIONAL ESTIMATION WITH INTERACTION               ********************
 ********************                            STANDARD ERROR OF ESTIMATE                          ********************

 THETA - VECTOR OF FIXED EFFECTS PARAMETERS   *********
         TH 1      TH 2      TH 3      TH 4      TH 5      TH 6      TH 7      TH 8
         3.93E+01  5.98E+01  4.97E-02  4.17E+01 .........  1.81E+01  1.33E-02  2.65E-03

 OMEGA - COV MATRIX FOR RANDOM EFFECTS - ETAS  ********
         ETA1      ETA2      ETA3      ETA4      ETA5      ETA6
 ETA1
+        8.81E-02
 ETA2
+        3.14E-02  2.12E-02
 ETA3
+       ......... .........  1.42E-02
 ETA4
+       ......... ......... ......... .........
 ETA5
+       ......... ......... ......... ......... .........
 ETA6
+       ......... ......... ......... ......... ......... .........

 SIGMA - COV MATRIX FOR RANDOM EFFECTS - EPSILONS  ****
         EPS1
 EPS1
+       .........

 OMEGA - CORR MATRIX FOR RANDOM EFFECTS - ETAS  *******
         ETA1      ETA2      ETA3      ETA4      ETA5      ETA6
 ETA1
+        5.60E-02
 ETA2
+        1.31E-01  3.52E-02
 ETA3
+       ......... .........  2.23E-02
 ETA4
+       ......... ......... ......... .........
 ETA5
+       ......... ......... ......... ......... .........
 ETA6
+       ......... ......... ......... ......... ......... .........

 SIGMA - CORR MATRIX FOR RANDOM EFFECTS - EPSILONS  ***
         EPS1
 EPS1
+       .........
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 Elapsed finaloutput time in seconds:     0.54
 #CPUT: Total CPU Time in Seconds,     4908.359
