Mon Jun 12 22:06:01 CEST 2023
$PROBLEM wbc

$DATA wbc.csv IGNORE=@

$INPUT ID TIME EVID AMT DV CMT CLI V1I V2I RXROW

$SUBROUTINES ADVAN13 TOL=6 ATOL=12 SSTOL=6 SSATOL=12

$MODEL NCOMPARTMENTS=7
     COMP(CENTR, DEFDOSE) ; centr
     COMP(PERIPH) ; periph
     COMP(PROL) ; prol
     COMP(TR1) ; tr1
     COMP(TR2) ; tr2
     COMP(TR3) ; tr3
     COMP(CIRC) ; circ

$PK
  MU_1=THETA(1)
  MU_2=THETA(2)
  MU_3=THETA(3)
  CIRC0=DEXP(MU_1+ETA(1)) ; CIRC0 <- exp(log_CIRC0)
  MTT=DEXP(MU_2+ETA(2)) ; MTT <- exp(log_MTT)
  SLOPU=DEXP(MU_3+ETA(3)) ; SLOPU <- exp(log_SLOPU)
  GAMMA=DEXP(THETA(4)) ; GAMMA <- exp(log_GAMMA)
  A_0(3)=CIRC0 ; prol(0) = CIRC0
  A_0(4)=CIRC0 ; tr1(0) = CIRC0
  A_0(5)=CIRC0 ; tr2(0) = CIRC0
  A_0(6)=CIRC0 ; tr3(0) = CIRC0
  A_0(7)=CIRC0 ; circ(0) = CIRC0

$DES
  CL=CLI ; CL = CLI
  V1=V1I ; V1 = V1I
  V2=V2I ; V2 = V2I
  RXR1=204 ; Q = 204
  CONC=A(1)/V1 ; CONC = centr/V1
  NN=3 ; NN = 3
  KTR=(NN+1)/MTT ; KTR = (NN + 1)/MTT
  EDRUG=1-SLOPU*CONC ; EDRUG = 1 - SLOPU * CONC

  FDBK=(CIRC0/A(7))**GAMMA ; FDBK = (CIRC0/circ)^GAMMA
  CIRC=A(7) ; CIRC = circ
  DADT(1) = A(2)*RXR1/V2-A(1)*(CL/V1+RXR1/V1) ; d/dt(centr) = periph * Q/V2 - centr * (CL/V1 + Q/V1)
  DADT(2) = A(1)*RXR1/V1-A(2)*RXR1/V2 ; d/dt(periph) = centr * Q/V1 - periph * Q/V2
  DADT(3) = KTR*A(3)*EDRUG*FDBK-KTR*A(3) ; d/dt(prol) = KTR * prol * EDRUG * FDBK - KTR * prol
  DADT(4) = KTR*A(3)-KTR*A(4) ; d/dt(tr1) = KTR * prol - KTR * tr1
  DADT(5) = KTR*A(4)-KTR*A(5) ; d/dt(tr2) = KTR * tr1 - KTR * tr2
  DADT(6) = KTR*A(5)-KTR*A(6) ; d/dt(tr3) = KTR * tr2 - KTR * tr3
  DADT(7) = KTR*A(6)-KTR*A(7) ; d/dt(circ) = KTR * tr3 - KTR * circ

$ERROR
  IPRED = A(7)
  W=DSQRT((IPRED*THETA(5))**2) ; W1 ~ sqrt((rx_pred_f_ * prop.err)^2)
  IF (W .EQ. 0.0) W = 1
  Y     = IPRED + W*EPS(1)

$THETA (1.8317        ) ; 1 - log_CIRC0
       (8.3733        ) ; 2 - log_MTT
       (6.3774        ) ; 3 - log_SLOPU
       (-11.558       ) ; 4 - log_GAMMA
       (0,     0.46465) ; 5 - prop.err

$OMEGA 0.097905 ; eta.CIRC0
$OMEGA 3e-06 ; eta.MTT
$OMEGA 2e-05 ; eta.SLOPU

$SIGMA 1 FIX

$ESTIMATION METHOD=1 INTER MAXEVALS=100000 SIGDIG=3 SIGL=12 PRINT=1 NOABORT

$COVARIANCE

$TABLE ID ETAS(1:LAST) OBJI FIRSTONLY ONEHEADER NOPRINT
     FORMAT=s1PE17.9 NOAPPEND FILE=wbc.eta

$TABLE ID TIME IPRED PRED RXROW ONEHEADER NOPRINT
    FORMAT=s1PE17.9 NOAPPEND FILE=wbc.pred

NM-TRAN MESSAGES
 WARNINGS AND ERRORS (IF ANY) FOR PROBLEM    1
 (WARNING  2) NM-TRAN INFERS THAT THE DATA ARE POPULATION.

1NONLINEAR MIXED EFFECTS MODEL PROGRAM (NONMEM) VERSION 7.4.3
 ORIGINALLY DEVELOPED BY STUART BEAL, LEWIS SHEINER, AND ALISON BOECKMANN
 CURRENT DEVELOPERS ARE ROBERT BAUER, ICON DEVELOPMENT SOLUTIONS,
 AND ALISON BOECKMANN. IMPLEMENTATION, EFFICIENCY, AND STANDARDIZATION
 PERFORMED BY NOUS INFOSYSTEMS.
 PROBLEM NO.:         1
 wbc
 TOT. NO. OF OBS RECS:      176
 TOT. NO. OF INDIVIDUALS:       45
 GENERAL NONLINEAR KINETICS MODEL WITH STIFF/NONSTIFF EQUATIONS (LSODA, ADVAN13)
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 #TBLN:      1
 #METH: First Order Conditional Estimation with Interaction
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
 #TERM:
0MINIMIZATION SUCCESSFUL
 HOWEVER, PROBLEMS OCCURRED WITH THE MINIMIZATION.
 REGARD THE RESULTS OF THE ESTIMATION STEP CAREFULLY, AND ACCEPT THEM ONLY
 AFTER CHECKING THAT THE COVARIANCE STEP PRODUCES REASONABLE OUTPUT.
 NO. OF FUNCTION EVALUATIONS USED:       83
 NO. OF SIG. DIGITS IN FINAL EST.:  4.3

 ETABAR IS THE ARITHMETIC MEAN OF THE ETA-ESTIMATES,
 AND THE P-VALUE IS GIVEN FOR THE NULL HYPOTHESIS THAT THE TRUE MEAN IS 0.

 ETABAR:         2.9934E-05 -3.5616E-11 -3.5913E-11
 SE:             3.8901E-02  1.8660E-08  2.1611E-08
 N:                      45          45          45

 P VAL.:         9.9939E-01  9.9848E-01  9.9867E-01

 ETASHRINKSD(%)  1.5657E+01  9.9993E+01  9.9997E+01
 ETASHRINKVR(%)  2.8863E+01  1.0000E+02  1.0000E+02
 EBVSHRINKSD(%)  1.6592E+01  9.9802E+01  9.9928E+01
 EBVSHRINKVR(%)  3.0432E+01  1.0000E+02  1.0000E+02
 EPSSHRINKSD(%)  6.4175E+00
 EPSSHRINKVR(%)  1.2423E+01


 TOTAL DATA POINTS NORMALLY DISTRIBUTED (N):          176
 N*LOG(2PI) CONSTANT TO OBJECTIVE FUNCTION:    323.466363688045
 OBJECTIVE FUNCTION VALUE WITHOUT CONSTANT:    586.869020672728
 OBJECTIVE FUNCTION VALUE WITH CONSTANT:       910.335384360773
 REPORTED OBJECTIVE FUNCTION DOES NOT CONTAIN CONSTANT

 TOTAL EFFECTIVE ETAS (NIND*NETA):                           133


 #TERE:
 Elapsed estimation  time in seconds:    59.16
 Elapsed covariance  time in seconds:    66.61
 Elapsed postprocess time in seconds:     0.95

 ********************               FIRST ORDER CONDITIONAL ESTIMATION WITH INTERACTION              ********************
 #OBJT:**************                       MINIMUM VALUE OF OBJECTIVE FUNCTION                      ********************
 #OBJV:********************************************      586.869       **************************************************

 ********************               FIRST ORDER CONDITIONAL ESTIMATION WITH INTERACTION              ********************
 ********************                             FINAL PARAMETER ESTIMATE                           ********************

 THETA - VECTOR OF FIXED EFFECTS PARAMETERS   *********
         TH 1      TH 2      TH 3      TH 4      TH 5
         1.83E+00  8.37E+00  6.38E+00 -1.16E+01  4.65E-01

 OMEGA - COV MATRIX FOR RANDOM EFFECTS - ETAS  ********
         ETA1      ETA2      ETA3
 ETA1
+        9.79E-02
 ETA2
+        0.00E+00  3.00E-06
 ETA3
+        0.00E+00  0.00E+00  2.00E-05

 SIGMA - COV MATRIX FOR RANDOM EFFECTS - EPSILONS  ****
         EPS1
 EPS1
+        1.00E+00

 OMEGA - CORR MATRIX FOR RANDOM EFFECTS - ETAS  *******
         ETA1      ETA2      ETA3
 ETA1
+        3.13E-01
 ETA2
+        0.00E+00  1.73E-03
 ETA3
+        0.00E+00  0.00E+00  4.47E-03

 SIGMA - CORR MATRIX FOR RANDOM EFFECTS - EPSILONS  ***
         EPS1
 EPS1
+        1.00E+00

 ********************               FIRST ORDER CONDITIONAL ESTIMATION WITH INTERACTION              ********************
 ********************                            STANDARD ERROR OF ESTIMATE                          ********************

 THETA - VECTOR OF FIXED EFFECTS PARAMETERS   *********
         TH 1      TH 2      TH 3      TH 4      TH 5
         5.83E-02  4.74E-02  1.77E-01  1.78E+00  1.38E-02

 OMEGA - COV MATRIX FOR RANDOM EFFECTS - ETAS  ********
         ETA1      ETA2      ETA3
 ETA1
+        3.13E-02
 ETA2
+       .........  2.75E-06
 ETA3
+       ......... .........  2.05E-05

 SIGMA - COV MATRIX FOR RANDOM EFFECTS - EPSILONS  ****
         EPS1
 EPS1
+       .........

 OMEGA - CORR MATRIX FOR RANDOM EFFECTS - ETAS  *******
         ETA1      ETA2      ETA3
 ETA1
+        4.99E-02
 ETA2
+       .........  7.93E-04
 ETA3
+       ......... .........  2.29E-03

 SIGMA - CORR MATRIX FOR RANDOM EFFECTS - EPSILONS  ***
         EPS1
 EPS1
+       .........

 ********************               FIRST ORDER CONDITIONAL ESTIMATION WITH INTERACTION              ********************
 ********************                          COVARIANCE MATRIX OF ESTIMATE                         ********************

            TH 1      TH 2      TH 3      TH 4      TH 5      OM11      OM12      OM13      OM22      OM23      OM33      SG11
 TH 1
+        3.40E-03
 TH 2
+       -1.72E-03  2.25E-03
 TH 3
+       -1.43E-03  5.45E-03  3.12E-02
 TH 4
+        1.08E-02 -3.33E-02 -1.89E-01  3.18E+00
 TH 5
+        8.45E-05 -1.86E-04 -1.10E-03  2.42E-02  1.90E-04
 OM11
+       -1.03E-03  1.25E-03  1.08E-03  5.99E-04  3.39E-05  9.77E-04
 OM12
+       ......... ......... ......... ......... ......... ......... .........
 OM13
+       ......... ......... ......... ......... ......... ......... ......... .........
 OM22
+        5.97E-08 -5.65E-08  6.21E-09  8.42E-07  6.69E-09 -5.00E-08 ......... .........  7.55E-12
 OM23
+       ......... ......... ......... ......... ......... ......... ......... ......... ......... .........
 OM33
+        3.71E-07 -1.89E-07  1.25E-06 -1.73E-06  1.60E-09 -3.13E-07 ......... .........  5.31E-11 .........  4.20E-10
 SG11
+       ......... ......... ......... ......... ......... ......... ......... ......... ......... ......... ......... .........

 ********************               FIRST ORDER CONDITIONAL ESTIMATION WITH INTERACTION              ********************
 ********************                          CORRELATION MATRIX OF ESTIMATE                        ********************

            TH 1      TH 2      TH 3      TH 4      TH 5      OM11      OM12      OM13      OM22      OM23      OM33      SG11
 TH 1
+        5.83E-02
 TH 2
+       -6.22E-01  4.74E-02
 TH 3
+       -1.39E-01  6.52E-01  1.77E-01
 TH 4
+        1.04E-01 -3.94E-01 -6.01E-01  1.78E+00
 TH 5
+        1.05E-01 -2.85E-01 -4.53E-01  9.84E-01  1.38E-02
 OM11
+       -5.67E-01  8.46E-01  1.96E-01  1.08E-02  7.88E-02  3.13E-02
 OM12
+       ......... ......... ......... ......... ......... ......... .........
 OM13
+       ......... ......... ......... ......... ......... ......... ......... .........
 OM22
+        3.73E-01 -4.34E-01  1.28E-02  1.72E-01  1.77E-01 -5.83E-01 ......... .........  2.75E-06
 OM23
+       ......... ......... ......... ......... ......... ......... ......... ......... ......... .........
 OM33
+        3.10E-01 -1.95E-01  3.46E-01 -4.74E-02  5.66E-03 -4.89E-01 ......... .........  9.43E-01 .........  2.05E-05
 SG11
+       ......... ......... ......... ......... ......... ......... ......... ......... ......... ......... ......... .........
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 Elapsed finaloutput time in seconds:     0.04
 #CPUT: Total CPU Time in Seconds,      125.395
